folder simulations: version=37; creator=Apsim 7.9-r0
  simulation ames_CC_270
    metfile met: filename=ames-met.met
    clock
      start_date = 01/01/1996  # Enter the start date of the simulation
      end_date = 31/12/2016  # Enter the end date of the simulation
    summaryfile
    area paddock
      fertiliser
      maize
        ini: filename=_master_maize_XML.xml
      soybean
        ini: filename=_master_soy_XML.xml
      folder Manager folder
        manager N Deposition
          #
          ppm = 0.0078  # What to multiply rain by?
          # Model side stuff
          varname = N_deposition  # Name of the NO3_N deposition variable as seen by the model
          fertmodule = fertiliser  # Name of module that applies nitrogen
          on start_of_day:
```
         
            [varname] = rain * [ppm]
            N_deposition_tot = N_deposition_tot + [varname]
            if (rain > 0) then
               [fertmodule] apply amount = [varname](kg/ha), depth = 0 (mm), type = NO3_N ()
            endif
```
        operations CC_maize_Nfert
          10/4/1980  ! my notes
          3/5/1999  fertiliser apply  amount = 270 (kg/ha), depth = 50 (mm), type = urea_n
          4/5/2000  fertiliser apply  amount = 270 (kg/ha), depth = 50 (mm), type = urea_n
          1/5/2001  fertiliser apply  amount = 270 (kg/ha), depth = 50 (mm), type = urea_n
          26/4/2002  fertiliser apply  amount = 270 (kg/ha), depth = 50 (mm), type = urea_n
          22/4/2003  fertiliser apply  amount = 270 (kg/ha), depth = 50 (mm), type = urea_n
          15/4/2004  fertiliser apply  amount = 270 (kg/ha), depth = 50 (mm), type = urea_n
          3/5/2005  fertiliser apply  amount = 270 (kg/ha), depth = 50 (mm), type = urea_n
          4/5/2006  fertiliser apply  amount = 270 (kg/ha), depth = 50 (mm), type = urea_n
          1/5/2007  fertiliser apply  amount = 270 (kg/ha), depth = 50 (mm), type = urea_n
          6/5/2008  fertiliser apply  amount = 270 (kg/ha), depth = 50 (mm), type = urea_n
          12/5/2009  fertiliser apply  amount = 270 (kg/ha), depth = 50 (mm), type = UAN_N
          5/5/2010  fertiliser apply  amount = 270 (kg/ha), depth = 50 (mm), type = UAN_N
          19/5/2011  fertiliser apply  amount = 270 (kg/ha), depth = 50 (mm), type = UAN_N
          10/5/2012  fertiliser apply  amount = 270 (kg/ha), depth = 50 (mm), type = UAN_N
          13/6/2013  fertiliser apply  amount = 270 (kg/ha), depth = 50 (mm), type = UAN_N
          6/5/2014  fertiliser apply  amount = 270 (kg/ha), depth = 50 (mm), type = urea_n
          18/5/2015  fertiliser apply  amount = 270 (kg/ha), depth = 50 (mm), type = urea_n
          6/5/2016  fertiliser apply  amount = 270 (kg/ha), depth = 50 (mm), type = UAN_N
          6/5/2017  fertiliser apply  amount = 0 (kg/ha), depth = 50 (mm), type = UAN_N
          6/5/2018  fertiliser apply  amount = 0 (kg/ha), depth = 50 (mm), type = UAN_N
          10/7/2019  fertiliser apply  amount = 270 (kg/ha), depth = 50 (mm), type = UAN_N
            ! start up period
          24/4/1992  fertiliser apply  amount = 170 (kg/ha), depth = 50 (mm), type = urea_n
          24/4/1994  fertiliser apply  amount = 170 (kg/ha), depth = 50 (mm), type = urea_n
          24/4/1996  fertiliser apply  amount = 170 (kg/ha), depth = 50 (mm), type = urea_n
          24/4/1998  fertiliser apply  amount = 170 (kg/ha), depth = 50 (mm), type = urea_n
        operations CC_corn_planitng
          5/5/1980  ! this is the maize of the maize-soy rotation in Ames
          19/5/1999  maize sow plants=7.9, sowing_depth=75,cultivar=psims_107RM, row_spacing=760,crop_class=maize ! Pioneer 34G81 (107 d relative maturity)
          5/5/2000  maize sow plants=7.4, sowing_depth=75,cultivar=psims_AmesHail, row_spacing=760,crop_class=maizev! Pioneer 34G81 (107 d)
          9/5/2001  maize sow plants=6.5, sowing_depth=50,cultivar=psims_103RM, row_spacing=760,crop_class=maize !Pioneer P34G13 (103?)
          3/5/2002  maize sow plants=7.9, sowing_depth=75,cultivar=psims_105RM, row_spacing=760,crop_class=maize ! Dekalb 55-51 RR/YGCB (105 d)
          29/4/2003  maize sow plants=7.8, sowing_depth=50,cultivar=psims_108RM, row_spacing=760,crop_class=maize ! Dekalb 58-24 RR/YGCB (108 d)
          27/4/2004  maize sow plants=8.0, sowing_depth=75,cultivar=psims_107RM, row_spacing=760,crop_class=maize ! Dekalb 57-81 RR/YGCB (107 d)
          5/5/2005  maize sow plants=8.0, sowing_depth=75,cultivar=psims_106RM, row_spacing=760,crop_class=maize ! Pioneer 35Y62 HXX/RR2/LL (106 d)
          9/5/2006  maize sow plants=8.0, sowing_depth=75,cultivar=psims_106RM,row_spacing=760,crop_class=maize ! Pioneer 35Y61 (106 d)
          13/5/2007  maize sow plants=8.0, sowing_depth=75,cultivar=psims_109RM,row_spacing=760,crop_class=maize ! Pioneer 34A20 (HXX/RR2/LL) (109 d)
          14/5/2008  maize sow plants=7.4, sowing_depth=75,cultivar=psims_111RM,row_spacing=760,crop_class=maize ! Dekalb DKC61-69 (111 d)
          5/5/2009  maize sow plants=8.0, sowing_depth=75,cultivar=psims_105RM, row_spacing=760,crop_class=maize ! Pioneer 35K33 (HXX/RR2/LL) (105 d)
          29/4/2010  maize sow plants=8.0, sowing_depth=75,cultivar=psims_105RM, row_spacing=760,crop_class=maize ! Pioneer 35F44 (HXX/RR2/LL) (105 d)
          11/5/2011  maize sow plants=7.9, sowing_depth=75,cultivar=psims_106RM,row_spacing=760,crop_class=maize ! Fontanelle 6T510 (106 d)
          10/5/2012  maize sow plants=7.9, sowing_depth=75,cultivar=psims_104RM, row_spacing=760,crop_class=maize ! Pioneer P0528XR (HXX/LL/RR2) (105 d)
          24/5/2013  maize sow plants=7.9, sowing_depth=75,cultivar=psims_AmesHail, row_spacing=760,crop_class=maize ! Pioneer 0461XR (HXX/LL/RR2) (104 d)
          7/5/2014  maize sow plants=7.9, sowing_depth=75,cultivar=psims_105RM, row_spacing=760,crop_class=maize ! Pioneer 0591AMX (105 d)
          13/5/2015  maize sow plants=8.9, sowing_depth=75,cultivar=psims_107RM, row_spacing=760,crop_class=maize ! FS 57QX1 RIB (107)
          27/4/2016  maize sow plants=8.6, sowing_depth=75,cultivar=psims_105RM,row_spacing=760,crop_class=maize ! Pioneer P0570AMXT (105 d)
          1/5/2017  maize sow plants=8.6, sowing_depth = 75, cultivar=psims_105RM,row_spacing=760,crop_class=maize ! Pioneer P0570AMXT (105 d)
          1/5/2018  maize sow plants=8.6, sowing_depth=75,cultivar=psims_105RM,row_spacing=760,crop_class=maize ! Pioneer P0570AMXT (105 d)
          5/6/2019  maize sow plants=8.6, sowing_depth=75,cultivar=psims_105RM,row_spacing=760,crop_class=maize ! Pioneer P0570AMXT (105 d)
            ! start up period
          1/5/1991  soybean sow plants=40.5,sowing_depth=50,cultivar=psims_24MG,row_spacing=760,crop_class=plant
          1/5/1992  maize sow plants=7.9, sowing_depth=50,cultivar=psims_106RM, row_spacing=760,crop_class=maize
          1/5/1993  soybean sow plants=40.5,sowing_depth=50,cultivar=psims_24MG,row_spacing=760,crop_class=plant
          1/5/1994  maize sow plants=7.9, sowing_depth=50,cultivar=psims_106RM, row_spacing=760,crop_class=maize
          1/5/1995  soybean sow plants=40.5,sowing_depth=50,cultivar=psims_24MG,row_spacing=760,crop_class=plant
          1/5/1996  maize sow plants=7.9, sowing_depth=50,cultivar=psims_106RM, row_spacing=760,crop_class=maize
          1/5/1997  soybean sow plants=40.5,sowing_depth=50,cultivar=psims_24MG,row_spacing=760,crop_class=plant
          1/5/1998  maize sow plants=7.9, sowing_depth=50,cultivar=psims_106RM, row_spacing=760,crop_class=maize
        operations CC_harvest
          5/5/1980  ! ask isaiah probably you need to put both end_crop and then harvest
          21/10/1999  maize harvest
          21/10/1999  maize end_crop
          26/9/2000  maize harvest
          26/9/2000  maize end_crop
          15/10/2001  maize harvest
          15/10/2001  maize end_crop
          8/10/2002  maize harvest
          8/10/2002  maize end_crop
          21/10/2003  maize harvest
          21/10/2003  maize end_crop
          12/10/2004  maize harvest
          12/10/2004  maize end_crop
          17/10/2005  maize harvest
          17/10/2005  maize end_crop
          19/10/2006  maize harvest
          19/10/2006  maize end_crop
          11/10/2007  maize harvest
          11/10/2007  maize end_crop
          3/11/2008  maize harvest
          3/11/2008  maize end_crop
          13/10/2009  maize harvest
          13/10/2009  maize end_crop
          7/10/2010  maize harvest
          7/10/2010  maize end_crop
          20/10/2011  maize harvest
          20/10/2011  maize end_crop
          4/10/2012  maize harvest
          4/10/2012  maize end_crop
          8/10/2013  maize harvest
          8/10/2013  maize end_crop
          17/10/2014  maize harvest
          17/10/2014  maize end_crop
          7/10/2015  maize harvest
          7/10/2015  maize end_crop
          11/10/2016  maize harvest
          11/10/2016  maize end_crop
          11/10/2017  maize harvest
          11/10/2017  maize end_crop
          11/10/2018  maize harvest
          11/10/2018  maize end_crop
          6/11/2019  maize harvest
          6/11/2019  maize end_crop
            ! start up period
          20/10/1991  soybean harvest
          20/10/1991  soybean end_crop
          20/10/1992  maize harvest
          20/10/1992  maize end_crop
          20/10/1993  soybean harvest
          20/10/1993  soybean end_crop
          20/10/1994  maize harvest
          20/10/1994  maize end_crop
          20/10/1995  soybean harvest
          20/10/1995  soybean end_crop
          20/10/1996  maize harvest
          20/10/1996  maize end_crop
          20/10/1997  soybean harvest
          20/10/1997  soybean end_crop
          20/10/1998  maize harvest
          20/10/1998  maize end_crop
          21/11/1999  !'surfaceorganicmatter' tillage type = user_defined, f_incorp = 0.5 (), tillage_depth = 250
          26/10/2000  !'surfaceorganicmatter' tillage type = user_defined, f_incorp = 0.5 (), tillage_depth = 250
          15/11/2001  !'surfaceorganicmatter' tillage type = user_defined, f_incorp = 0.5 (), tillage_depth = 250
          8/11/2002  !'surfaceorganicmatter' tillage type = user_defined, f_incorp = 0.5 (), tillage_depth = 250
          21/11/2003  !'surfaceorganicmatter' tillage type = user_defined, f_incorp = 0.5 (), tillage_depth = 250
          12/11/2004  !'surfaceorganicmatter' tillage type = user_defined, f_incorp = 0.5 (), tillage_depth = 250
        operations Tillage1
          10/4/1980  ! my notes
          5/5/1999  'surfaceorganicmatter' tillage type = user_defined, f_incorp = 0.25 (), tillage_depth = 150
          4/11/1999  'surfaceorganicmatter' tillage type = user_defined, f_incorp = 0.5 (), tillage_depth = 250
          21/4/2000  'surfaceorganicmatter' tillage type = user_defined, f_incorp = 0.25 (), tillage_depth = 150
          10/10/2000  'surfaceorganicmatter' tillage type = user_defined, f_incorp = 0.3 (), tillage_depth = 250
          25/4/2001  'surfaceorganicmatter' tillage type = user_defined, f_incorp = 0.15 (), tillage_depth = 150
          29/11/2001  'surfaceorganicmatter' tillage type = user_defined, f_incorp = 0.5 (), tillage_depth = 250
          19/4/2002  'surfaceorganicmatter' tillage type = user_defined, f_incorp = 0.25 (), tillage_depth = 150
          22/10/2002  'surfaceorganicmatter' tillage type = user_defined, f_incorp = 0.3 (), tillage_depth = 250
          15/4/2003  'surfaceorganicmatter' tillage type = user_defined, f_incorp = 0.25 (), tillage_depth = 150
          4/11/2003  'surfaceorganicmatter' tillage type = user_defined, f_incorp = 0.6 (), tillage_depth = 250
          15/4/2004  'surfaceorganicmatter' tillage type = user_defined, f_incorp = 0.29 (), tillage_depth = 150
          26/10/2004  'surfaceorganicmatter' tillage type = user_defined, f_incorp = 0.5 (), tillage_depth = 250
          26/4/2005  'surfaceorganicmatter' tillage type = user_defined, f_incorp = 0.25 (), tillage_depth = 150
          31/10/2005  'surfaceorganicmatter' tillage type = user_defined, f_incorp = 0.5 (), tillage_depth = 250
          25/4/2006  'surfaceorganicmatter' tillage type = user_defined, f_incorp = 0.25 (), tillage_depth = 150
          2/11/2006  'surfaceorganicmatter' tillage type = user_defined, f_incorp = 0.5 (), tillage_depth = 250
          29/4/2007  'surfaceorganicmatter' tillage type = user_defined, f_incorp = 0.25 (), tillage_depth = 150
          25/10/2007  'surfaceorganicmatter' tillage type = user_defined, f_incorp = 0.5 (), tillage_depth = 250
          30/4/2008  'surfaceorganicmatter' tillage type = user_defined, f_incorp = 0.25 (), tillage_depth = 150
          17/11/2008  'surfaceorganicmatter' tillage type = user_defined, f_incorp = 0.5 (), tillage_depth = 250
          21/4/2009  'surfaceorganicmatter' tillage type = user_defined, f_incorp = 0.25 (), tillage_depth = 150
          27/10/2009  'surfaceorganicmatter' tillage type = user_defined, f_incorp = 0.6 (), tillage_depth = 250
          15/4/2010  'surfaceorganicmatter' tillage type = user_defined, f_incorp = 0.25 (), tillage_depth = 150
          21/10/2010  'surfaceorganicmatter' tillage type = user_defined, f_incorp = 0.5 (), tillage_depth = 250
          27/4/2011  'surfaceorganicmatter' tillage type = user_defined, f_incorp = 0.25 (), tillage_depth = 150
          3/11/2011  'surfaceorganicmatter' tillage type = user_defined, f_incorp = 0.5 (), tillage_depth = 250
          26/4/2012  'surfaceorganicmatter' tillage type = user_defined, f_incorp = 0.25 (), tillage_depth = 150
          18/10/2012  'surfaceorganicmatter' tillage type = user_defined, f_incorp = 0.5 (), tillage_depth = 250
          10/5/2013  'surfaceorganicmatter' tillage type = user_defined, f_incorp = 0.25 (), tillage_depth = 150
          22/10/2013  'surfaceorganicmatter' tillage type = user_defined, f_incorp = 0.6 (), tillage_depth = 250
          23/4/2014  'surfaceorganicmatter' tillage type = user_defined, f_incorp = 0.25 (), tillage_depth = 150
          31/10/2014  'surfaceorganicmatter' tillage type = user_defined, f_incorp = 0.5 (), tillage_depth = 250
          29/4/2015  'surfaceorganicmatter' tillage type = user_defined, f_incorp = 0.25 (), tillage_depth = 150
          21/10/2015  'surfaceorganicmatter' tillage type = user_defined, f_incorp = 0.5 (), tillage_depth = 250
          13/4/2016  'surfaceorganicmatter' tillage type = user_defined, f_incorp = 0.25 (), tillage_depth = 150
          25/10/2016  'surfaceorganicmatter' tillage type = user_defined, f_incorp = 0.5 (), tillage_depth = 250
          17/4/2017  'surfaceorganicmatter' tillage type = user_defined, f_incorp = 0.25 (), tillage_depth = 150
          20/11/2017  'surfaceorganicmatter' tillage type = user_defined, f_incorp = 0.5 (), tillage_depth = 250
          17/4/2018  'surfaceorganicmatter' tillage type = user_defined, f_incorp = 0.25 (), tillage_depth = 150
          20/11/2018  'surfaceorganicmatter' tillage type = user_defined, f_incorp = 0.5 (), tillage_depth = 250
          17/4/2019  'surfaceorganicmatter' tillage type = user_defined, f_incorp = 0.25 (), tillage_depth = 150
          20/11/2019  'surfaceorganicmatter' tillage type = user_defined, f_incorp = 0.5 (), tillage_depth = 250
            ! start up period
          17/4/1991  'surfaceorganicmatter' tillage type = user_defined, f_incorp = 0.25 (), tillage_depth = 150
          20/11/1991  'surfaceorganicmatter' tillage type = user_defined, f_incorp = 0.5 (), tillage_depth = 250
          17/4/1992  'surfaceorganicmatter' tillage type = user_defined, f_incorp = 0.25 (), tillage_depth = 150
          20/11/1992  'surfaceorganicmatter' tillage type = user_defined, f_incorp = 0.5 (), tillage_depth = 250
          17/4/1993  'surfaceorganicmatter' tillage type = user_defined, f_incorp = 0.25 (), tillage_depth = 150
          20/11/1993  'surfaceorganicmatter' tillage type = user_defined, f_incorp = 0.5 (), tillage_depth = 250
          17/4/1994  'surfaceorganicmatter' tillage type = user_defined, f_incorp = 0.25 (), tillage_depth = 150
          20/11/1994  'surfaceorganicmatter' tillage type = user_defined, f_incorp = 0.5 (), tillage_depth = 250
          17/4/1995  'surfaceorganicmatter' tillage type = user_defined, f_incorp = 0.25 (), tillage_depth = 150
          20/11/1995  'surfaceorganicmatter' tillage type = user_defined, f_incorp = 0.5 (), tillage_depth = 250
          17/4/1996  'surfaceorganicmatter' tillage type = user_defined, f_incorp = 0.25 (), tillage_depth = 150
          20/11/1996  'surfaceorganicmatter' tillage type = user_defined, f_incorp = 0.5 (), tillage_depth = 250
          17/4/1997  'surfaceorganicmatter' tillage type = user_defined, f_incorp = 0.25 (), tillage_depth = 150
          20/11/1997  'surfaceorganicmatter' tillage type = user_defined, f_incorp = 0.5 (), tillage_depth = 250
          17/4/1998  'surfaceorganicmatter' tillage type = user_defined, f_incorp = 0.25 (), tillage_depth = 150
          20/11/1998  'surfaceorganicmatter' tillage type = user_defined, f_incorp = 0.6 (), tillage_depth = 250
      manager Calculations
        on start_of_day:
```
crop_buac = maize.yield * 0.0159 / 0.85 + soybean.yield * 0.0149/0.87
cornbuac = maize.yield * 0.0159 / 0.85
soybuac = soybean.yield *0.0149/0.87
crop_yield = maize.yield + soybean.yield
biomass_crop = maize.biomass + soybean.biomass
CropET = es + maize.ep + soybean.ep
CropT = maize.ep + soybean.ep
root_crop = maize.root_depth + soybean.root_depth
flowering_crop = maize.flowering_date + soybean.flowering_date
maturity_crop = maize.maturity_date + soybean.maturity_date
lai_crop = maize.lai + soybean.lai
Nupt_crop = 10 * maize.biomass_n + 10 * soybean.biomass_n
Nupt_grain = 10 * maize.grain_n + 10 * soybean.grain_n

swdef_expan_crop = maize.swdef_expan + soybean.swdef_expan
oxdef_photo_crop = maize.oxdef_photo + soybean.oxdef_photo
nfact_expan_crop = maize.nfact_expan + soybean.nfact_expan

Nleaching = subsurface_drain_no3 + flow_no3(11)
N_loss_rate = subsurface_drain_no3 + flow_no3(11) + dnit()
W_loss_rate = subsurface_drain + flow(11)

co2 = 1.6471 * year - 2917.8    ! linear Interpolation 350 ppm in 1980, 406 ppm in 2018

Harvest_date =  TargetStageDOY + maize.DaysAfterSowing + soybean.DaysAfterSowing 

if watertable < 500 then
WT50cm = 1
else
WT50cm = 0
endif

no3_30cm = no3(1) + no3(2) + no3(3) + no3(4) + no3(5)


stover_kg = maize.green_biomass - maize.yield +  soybean.green_biomass - soybean.yield
stover_Nitr = 10*maize.green_biomass_n + 10*soybean.green_biomass_n - Nupt_grain

if stover_Nitr > 0 then
stover_cn_ratio = stover_kg *0.4 / stover_Nitr  
endif


if soybean.biomass > 0 then
soy_hi = soybean.yield / soybean.biomass
else
soy_hi = 0
endif

cropHI = soy_hi + maize.hi

root_kg = 10* maize.RootGreenWt + 10* soybean.RootGreenWt
rootNconc = maize.RootGreenNConc + soybean.RootGreenNConc

if biomass_crop > 0 then
RootShoot = root_kg / biomass_crop
else
RootShoot = 0
endif

if Nupt_crop > 0 then
crop_NHI = Nupt_grain / Nupt_crop
else
crop_NHI = 0
endif




SOC_7cm = 0.166 * oc(1) + 0.166 * oc(2) + 0.333 * oc(3) + 0.333 * oc(4)
SOC_22cm = 0.333 * oc(4) + 0.666 * oc(5)
SOC_45cm = 0.5 * oc(6) + 0.5 * oc(7)
SOC_75cm = 0.5 * oc(8) + 0.5 * oc(9)
SOC_105cm = 0.5 * oc(10) + 0.5 * oc(11)
```
      tracker
        variable:
          maximum of crop_buac on end_of_day from SpecialReport5 to SpecialReport6 as CropYield
          maximum of cornbuac on end_of_day from SpecialReport5 to SpecialReport6 as corn_buac
          maximum of soybuac on end_of_day from SpecialReport5 to SpecialReport6 as soy_buac
          maximum of root_crop on end_of_day from SpecialReport5 to SpecialReport6 as RootDepth
          maximum of flowering_crop on end_of_day from SpecialReport5 to SpecialReport6 as FlowerDate
          maximum of maturity_crop on end_of_day from SpecialReport5 to SpecialReport6 as MaturityDate
          maximum of lai_crop on end_of_day from SpecialReport5 to SpecialReport6 as LAI_maximum
          sum of CropET on end_of_day from SpecialReport5 to SpecialReport6 as ETAnnual
          sum of CropT on end_of_day from SpecialReport5 to SpecialReport6 as CropTranspiration
          average of swdef_expan_crop on end_of_day from sowing to harvesting as AvgDroughtStress
          average of oxdef_photo_crop on end_of_day from sowing to harvesting as AvgExcessiveWStress
          average of nfact_expan_crop on end_of_day from sowing to harvesting as AvgNStress
          average of watertable on end_of_day from sowing to harvesting as AvgWTInseason
          value of surfaceom_wt on sowing as ResidueWTatSowing
          value of surfaceom_n on sowing as ResidueNatSowing
          value of maize.plants on harvesting as PlantDensityH
          value of maize.plants on sowing as PlantDensityS
          average of sw(1) on last 14 start_of_day as SWAverage
      tracker tracker1: variable=value of SWAverage on sowing as SWSowing
      manager2 Stage Day of Year
        TargetStage = sowing  # Target stage name (as specified in XML)
        TargetCrop = maize
```csharp
using System;
using ModelFramework;
using CSGeneral;

public class Script 
{      
   [Link] Paddock MyPaddock; // Can be used to dynamically get access to simulation structure and variables
   [Input] DateTime Today;   // Equates to the value of the current simulation date - value comes from CLOCK
   [Param] string TargetStage;         // The value for these will come from the Properties page.
   [Param] string TargetCrop;
   [Output] int TargetStageDAS;   // This variable is visible to the outputfile and other scripts under this name
   [Output] int TargetStageDOY; 

   private string stage, yesterday_stage;
   private int daysaftersowing;

   // The following event handler will be called once at the beginning of the simulation
   [EventHandler] public void OnInitialised()
   {

      
      
   }

   // The following event handler will be called each day 
   [EventHandler] public void OnProcess()
   {

      MyPaddock.Get(TargetCrop + ".StageName", out stage);//Gets crop.stagename and crop.daysaftersowing
      MyPaddock.Get(TargetCrop + ".DaysAfterSowing", out daysaftersowing);
      
      if (yesterday_stage != TargetStage && stage == TargetStage)
      {
         TargetStageDAS = daysaftersowing;
         TargetStageDOY = Today.DayOfYear;
      }
      
      if (stage == "nocrop")
      {
         TargetStageDAS = 0;
         TargetStageDOY = 0;
      }
      
      
      
      yesterday_stage = stage;
   }

}
```
      manager Stage Day Info
        StageTarget = emergence  # Target Stage (from xml)
        CropTarget = maize  # Target Crop
        DOYName = emergDOY  # Name of the variable (DOY)
        DASName = emergDAS  # Name of the variable (DAS)
        on init:
```
 yesterday_stage = 'nocrop'
```
        on end_of_day:
```
  if ([CropTarget].StageName = '[StageTarget]' AND yesterday_stage <> '[StageTarget]') then
       [DOYName] = day 
       [DASName] = [CropTarget].DaysAfterSowing
  endif


 if ([CropTarget].StageName = 'nocrop') then
       [DOYName] = 0
       [DASName] = 0
 endif

 yesterday_stage = [CropTarget].StageName
```
      manager2 InitialiseWaterTableOnce
        InitDOY = 1  # Day of year to initialise the water table
        WTDepth = 1000  # Depth to water table (mm)
```vb
Imports System
Imports ModelFramework
Imports CSGeneral
Imports System.Collections.Generic

Public Class Script
   
   <Link()> Dim MySimulation As Simulation
   <Link()> Dim Clock As Clock
   <Param()> Dim InitDOY As Integer
   <Param()> Dim WTDepth As Single
   <Input> Private dlayer As Double()           'Array of soil layer thicknesses - for calculation of mineral N in the soil
   <Input> Dim Today As DateTime                ' Equates to the value of the current simulation date - from CLOCK
   
   <Output> Dim ProfileDepth As Double
   <Output> Dim BBCPotential As Double
   <Output> Dim InitPsi() As Double
   <Output> Dim InitWTD As Boolean       'created to help initialize WTD on first day of the simulation, not DOY = 1
      
   <EventHandler()> Public Sub OnInit()
      ProfileDepth = 0
      BBCPotential = 0
      InitWTD = False
      
   End Sub
   
   <EventHandler()> Public Sub OnPrepare()

      'If (today.DayOfYear = InitDOY) Then
      If (InitWTD = False) Then
         ProfileDepth = MathUtility.Sum(dlayer)
         BBCPotential = (ProfileDepth - WTDepth) / 10
         ReDim InitPsi(dlayer.length - 1) 
         
         InitPsi(dlayer.length - 1) = BBCPotential 
         InitPsi(0) = -WTDepth / 10.0
         InitPsi(1) = InitPsi(0) + (dlayer(0) + dlayer(1) / 2) / 10
         Dim i As Integer
         
         For i = 2 To dlayer.length - 2
            InitPsi(i) = InitPsi(i - 1) + (dlayer(i - 1) + dlayer(i)) / 2 / 10   
         Next
         
         'Dim SWIM As Component = MySimulation.LinkByName("SWIM")
         MySimulation.Set("psi", InitPsi)
         MySimulation.Set("bbc_potential", BBCPotential)
         InitWTD = True
         
      End If      
      
      
   End Sub


End Class
```
      manager2 Reporter_Annual
        date = 1-jan  # Date for the special report
        date2 = 31-dec  # date for second one
```csharp
using System;
using ModelFramework;
using CSGeneral;

public class Script 
{      
   [Link] Paddock MyPaddock; // Can be used to dynamically get access to simulation structure and variables
   [Input] DateTime Today;   // Equates to the value of the current simulation date - value comes from CLOCK
   [Param] string date;         // The value for this will come from the Properties page.
   [Param] string date2;
   
   [Event] public event NullTypeDelegate SpecialReport5;
   [Event] public event NullTypeDelegate SpecialReport6;

   
   // The following event handler will be called once at the beginning of the simulation
   [EventHandler] public void OnInitialised()
   {
      
   }
      
   // The following event handler will be called each day at the beginning of the day
   [EventHandler] public void OnPrepare()
   {
      if (DateUtility.DatesEqual(date, Today))
         SpecialReport5.Invoke();
      
      if (DateUtility.DatesEqual(date2, Today))
         SpecialReport6.Invoke();
   }
   
}
```
      manager Temperature Day Info
        TempTarget = mint  # Maxt or mint
        TempValue = 0  # Value (in deg C)
        DOYName = mintZeroDOY  # Name of the variable (DOY)
        date1 = 15-aug  # Start date
        date2 = 31-dec  # End date
        on init:
```
 flag = 0
```
        on process:
```
 if (date_within('[date1], [date2]')) then
     

     if ([TempTarget] < [TempValue] and flag = 0) then
        [DOYName] = day
        flag = 1
     endif

 else
 [DOYName] = 0
 flag = 0

 endif
```
      outputfile: filename=ames_CC_270.out; title=ames_CC_270
        variables My Variables
          variables: dd/mm/yyyy as Date, year, CropYield, corn_buac, soy_buac, PlantDensityS, PlantDensityH, RootDepth, emergDOY, FlowerDate, MaturityDate, LAI_maximum, ETAnnual, CropTranspiration, AvgDroughtStress, AvgExcessiveWStress, AvgNStress, AvgWTInseason, ResidueWTatSowing, ResidueNatSowing, SWAverage, SWSowing
        events My Variables Events: event=end_year
      surfaceom SurfaceOrganicMatter
        PoolName = soybean  # Organic Matter pool name
        type = soybean  # Organic Matter type
        mass = 2000  # Initial surface residue (kg/ha)
        cnr = 45  # C:N ratio of initial residue
        standing_fraction = 0.0  # Fraction of residue standing
        ini: filename=SurfaceOM_7.9.xml
      Soil Soil_Ames: SoilType=Nicollet; NearestTown=Ames; Region=Boone; State=Iowa; Country=US; ApsoilNumber=34; Latitude=42.02204; Longitude=-93.769115; YearOfSampling=0; DataSource=mesured data and web soil survey; Comments=hydrological parameters and BD from Saxton and Rawls, 2006
        Water
          Thickness  BD    AirDry  LL15   DUL    SAT       KS
          25         1.25  0.087   0.174  0.31   0.445     146
          25         1.25  0.087   0.174  0.31   0.455     146
          50         1.25  0.087   0.174  0.3    0.42      146
          100        1.25  0.132   0.165  0.25   0.43      146
          100        1.25  0.12    0.12   0.22   0.35      146
          150        1.35  0.11    0.11   0.21   0.34      146
          150        1.35  0.102   0.102  0.22   0.33      133
          150        1.36  0.126   0.126  0.265  0.393     133
          150        1.36  0.133   0.133  0.261  0.393     133
          150        1.36  0.128   0.128  0.253  0.393     388
          150        1.6   0.128   0.128  0.2    0.393     388
          300        1.6   0.09    0.09   0.2    0.393     388
          300        1.6   0.09    0.09   0.2    0.284579  54.2361
          300        1.6   0.09    0.09   0.2    0.272798  33.1104
          300        1.6   0.09    0.09   0.2    0.262658  20.2134
          300        1.6   0.09    0.09   0.2    0.25393   12.34
          300        1.6   0.09    0.09   0.2    0.246418  7.5334
          300        1.6   0.09    0.09   0.2    0.239952  4.59904
          300        1.6   0.09    0.09   0.2    0.234387  2.80765
          300        1.6   0.09    0.09   0.2    0.229598  1.71403
          BD source: Field measured and checked for sensibility (layer 2, 3, 4)
          AirDry source: Estimated based on local knowledge (layer 1, 2, 3, 4)
          LL15 source: Estimated based on local knowledge (layer 2, 3, 4)
          DUL source: Field measured and checked for sensibility (layer 1, 2, 3, 4)
          SAT source: Calculated from measured, estimated or calculated BD (layer 1, 2, 3, 4)
          SoilCrop maize
            LL=[0.174, 0.174, 0.174, 0.165, 0.12, 0.136161, 0.143527, 0.18676725, 0.197952, 0.200536, 0.174202, 0.169252, 0.178877, 0.188, 0.188, 0.188, 0.188, 0.188, 0.188, 0.188]
            KL=[0.08, 0.08, 0.08, 0.08, 0.08, 0.08, 0.08, 0.08, 0.08, 0.08, 0.08, 0.0422964, 0.0350564, 0.0261367, 0.022015, 0.0162927, 0.0111758, 0.0067466, 0.00313554, 0.000603434]
            XF=[1, 1, 1, 1, 1, 1, 1, 1, 1, 1, 1, 1, 0.2, 0, 0, 0, 0, 0, 0, 0]
            LL source: Estimated based on local knowledge (layer 2, 3, 4)
          SoilCrop soybean
            LL=[0.174, 0.174, 0.174, 0.165, 0.12, 0.136161, 0.143527, 0.18676725, 0.197952, 0.200536, 0.174202, 0.169252, 0.178877, 0.188, 0.188, 0.188, 0.188, 0.188, 0.188, 0.188]
            KL=[0.08, 0.08, 0.08, 0.08, 0.08, 0.08, 0.08, 0.08, 0.08, 0.08, 0.08, 0.0422964, 0.0350564, 0.0261367, 0.022015, 0.0162927, 0.0111758, 0.0067466, 0.00313554, 0.000603434]
            XF=[1, 1, 1, 1, 1, 1, 1, 1, 1, 1, 1, 1, 0.2, 0, 0, 0, 0, 0, 0, 0]
            LL source: Estimated based on local knowledge (layer 1, 2, 3, 4)
        SoilOrganicMatter: RootCN=29.8; RootWt=1586.8; SoilCN=12.5; EnrACoeff=7.4; EnrBCoeff=0.2; OCUnits=Total
          Thickness  OC    FBiom       FInert
          25         2.47  0.165       0.41975
          25         2.41  0.165       0.41975
          50         2.41  0.110863    0.41975
          100        2.38  0.0699684   0.4827125
          100        1.97  0.0498419   0.5246875
          150        1.95  0.0384185   0.802815
          150        0.97  0.0306479   0.82524
          150        0.97  0.0256472   0.84916
          150        0.49  0.0226493   0.87009
          150        0.49  0.0201211   0.999
          150        0.49  0.0183055   0.999
          300        0.49  0.0162662   0.999
          300        0.49  0.014237    0.999
          300        0.49  0.01274218  0.999
          300        0.49  0.0115872   0.999
          300        0.1   0.0106631   0.999
          300        0.1   0.00990398  0.999
          300        0.1   0.0092672   0.999
          300        0.1   0.00872398  0.999
          300        0.1   0.0082541   0.999
          OC source: Estimated based on local knowledge (layer 1, 2, 3, 4)
        Analysis: PHUnits=Water; BoronUnits=HotWater
          Thickness  PH    CEC    ParticleSizeSand  ParticleSizeSilt  ParticleSizeClay
          25         7.48  25.8   41.3              29.78             28.92
          25         7.48  25.8   41.3              29.78             28.92
          50         7.48  25.8   41.3              29.78             28.92
          100        7.38  25.85  40.16             32.59             27.26
          100        7.43  26.57  37.77             33.01             29.22
          150        7.43  26.57  37.77             33.01             29.22
          150        7.73  23.41  44.39             28.07             27.54
          150        7.73  23.41  44.39             28.07             27.54
          150        8.08  33.6   49.07             28.9              22.03
          150        8.08  33.6   49.07             28.9              22.03
          150        8.08  33.6   49.07             28.9              22.03
          300        8.08  33.6   49.07             28.9              22.03
          300        8.08  33.6   49.07             28.9              22.03
          300        8.08  33.6   49.07             28.9              22.03
          300        8.08  33.6   49.07             28.9              22.03
          300        8.08  33.6   49.07             28.9              22.03
          300        8.08  33.6   49.07             28.9              22.03
          300        8.08  33.6   49.07             28.9              22.03
          300        8.08  33.6   49.07             28.9              22.03
          300        8.08  33.6   49.07             28.9              22.03
          PH source: Estimated based on local knowledge (layer 1, 2, 3, 4)
          ParticleSizeSand, ParticleSizeSilt source: Measured (layer 1)
          ParticleSizeClay source: Measured (layer 1, 2)
        Sample Initial nitrogen: NO3Units=ppm; NH4Units=ppm; SWUnits=Volumetric; OCUnits=Total; PHUnits=Water
          Thickness  NO3    NH4  SW
          25         7.04   4    0.31
          25         7.36   4    0.31
          50         4.8    4    0.3
          100        2.4    4    0.25
          100        1.6    4    0.22
          150        0.988  4    0.21
          150        0.988  4    0.22
          150        0.539  1    0.265
          150        0.539  1    0.261
          150        0.49   1    0.253
          150        0.292  1    0.2
          300        0.104  0.3  0.393
          300        0.188  0.4  0.285
          300        0.167  0    0.273
          300        0      0    0.263
          300        0.188  0.4  0.254
          300        0.188  0.4  0.246
          300        0.188  0.4  0.24
          300        0.167  0    0.234
          300        0      0    0.23
        Swim: Salb=0.13; CN2Bare=65; CNRed=20; CNCov=0.8; KDul=0.25; PSIDul=-300; VC=true; DTmin=0; DTmax=1440; MaxWaterIncrement=10; SpaceWeightingFactor=0; SoluteSpaceWeightingFactor=0; Diagnostics=false
          SwimSoluteParameters: Dis=15; Disp=0.75; A=1; DTHP=1
            zero: DTHC, WaterTableCl, WaterTableNO3, WaterTableNH4, WaterTableUrea, WaterTableTracer, WaterTableMineralisationInhibitor, WaterTableUreaseInhibitor, WaterTableNitrificationInhibitor, WaterTableDenitrificationInhibitor
            Thickness  NO3Exco  NO3FIP  NH4Exco  NH4FIP  UreaExco  UreaFIP  ClExco  ClFIP
            1000       0        1       100      1       0         1        0       1
            1000       0        1       100      1       0         1        0       1
            1000       0        1       100      1       0         1        0       1
          SwimSubsurfaceDrain: DrainDepth=900; DrainSpacing=45000; DrainRadius=100; Klat=250; ImpermDepth=3900
        SoilTemperature: BoundaryLayerConductance=20
          Thickness=[25, 25, 50, 100, 100, 150, 150, 150, 150, 150, 150, 300, 300, 300, 300, 300, 300, 300, 300, 300]
          InitialSoilTemperature=[10, 10, 10, 10, 10, 10, 10, 10, 10, 10, 9, 9, 9, 10, 10, 10, 10, 9, 9, 9]
        ini: filename=Soil_7.9.xml
      manager WT_script1
        on start_of_day:
```
bbc_potential = 390 - 130 ! profile depth minus WR


if AnnualRain > 0 then 
EORRatio = AnnualEO / AnnualRain  ! EO is potential ET theoretical not affected by Rain
endif

RainSurplus = AnnualRain - AnnualEO
```
      manager2 Kill Plants Early Maize
        # Control Area
        cropToKill = maize
        startStage = 1  # Start stage to kill crop over
        endStage = 3.5  # End stage to kill crop
        maxLayer = 3  # How many layers to calc sw effects over
        moistLim = 2  # Number of days to average moisture over
        tempLim = 2  # Number of days to average min temp over
        # Linear Interpolation Area (comma separate values)
        xMoistString = 0,0.5,1.5,2  # Moisture Linear interpolation x values (0 = ll, 1 = dul, 2 = sat)
        yMoistString = 0.01,0.0,0.0,0.03  # Moisture Linear interpolation y values (0 = no effect, 1 = crop dies)
        xTempString = -3.5,0.0  # Temp Linear interpolation x values (oC)
        yTempString = 0.1,0.0  # Temp Linear interpolation y values (0 = no effect, 1 = crop dies)
```csharp
using System;
using ModelFramework;
using CSGeneral;
using System.Linq;
using System.Collections.Generic;

public class Script 
{      
   [Link] Paddock MyPaddock; // Can be used to dynamically get access to simulation structure and variables
   [Input] DateTime Today;   // Equates to the value of the current simulation date - value comes from CLOCK
      
   
   [Input] double[] sw;
   [Input] double[] ll15;
   [Input] double[] dul;
   [Input] double[] sat;
   [Input] double mint;
   
   [Param] int maxLayer;       //Max layer to calculate SW stuff over
   [Param] int moistLim;       //Tracker day limits
   [Param] int tempLim;
   [Param] double startStage; //Stages to kill between
   [Param] double endStage;
   [Param] string cropToKill;
   
   //Linear interpolaton function definitions
   [Param] string xMoistString;
   [Param] string yMoistString;
   
   [Param] string xTempString;
   [Param] string yTempString;
   
   //Linear interpolation function 
   [Output] double B;        // An example of how to make a variable available to other APSIM modules


   //This is the crop that we will be killing
   private Component comp;
   
   //Data for linear interpolation functions
   private double[] xMoist;
   private double[] yMoist;
   
   private double[] xTemp;
   private double[] yTemp;
   
   private List<double> moistTracker = new List<double>();
   private List<double> tempTracker = new List<double>();
   
   //The linear interpolation method in MathUtility needs this for some reason
   private bool lin_int; 
   // The following event handler will be called once at the beginning of the simulation
   [EventHandler] public void OnInitialised()
   {
      
      comp = (Component) MyPaddock.LinkByName(cropToKill);
      
      xMoist = (from a in xMoistString.Split(',')
            select Convert.ToDouble(a)).ToArray();
      
      yMoist = (from a in yMoistString.Split(',')
            select Convert.ToDouble(a)).ToArray();
      
      xTemp = (from a in xTempString.Split(',')
            select Convert.ToDouble(a)).ToArray();
      
      yTemp = (from a in yTempString.Split(',')
            select Convert.ToDouble(a)).ToArray();
      
   }

   // The following event handler will be called each day at the beginning of the day
   [EventHandler] public void OnPrepare()
   {
      double currentStage;
      MyPaddock.Get(cropToKill + ".stage", out currentStage);
      
      moistTracker.Add(sw.Take(maxLayer).Average());
      if (moistTracker.Count > moistLim)
         moistTracker.RemoveAt(0);
      
      tempTracker.Add(mint);
      if (tempTracker.Count > tempLim)
         tempTracker.RemoveAt(0);
      
      if (currentStage > startStage && currentStage <= endStage)
      {
         double moist_x = CalcSWPercentX(ll15.Take(maxLayer).Average(),
            dul.Take(maxLayer).Average(),
            sat.Take(maxLayer).Average(),
            moistTracker.Average());
         
         double moistKillFR = MathUtility.LinearInterpReal(moist_x, xMoist, yMoist, out lin_int);
         
         double temp_x = tempTracker.Average();
         double tempKillFR = MathUtility.LinearInterpReal(temp_x, xTemp, yTemp, out lin_int);
         
         double killFR = Math.Max(moistKillFR, tempKillFR);
         //Don't even bother if killFR is 0.
         if (killFR > 0.0)
         {
            KillCropType data = new KillCropType();
            data.KillFraction = (float) killFR;
            comp.Publish("kill_crop", data);
         }
      }
      
   }
   
   //Calculates sw "percent" for linear interpolation function X axis
   private double CalcSWPercentX(double ll, double dul, double sat, double sw)
   {
      double ret;
      if (sw < dul)
      {
         ret = (sw - ll) / (dul - ll);
         return MathUtility.Constrain(ret, 0.0, 1.0);
         
      }
      else 
      {
         ret = 1.0 + (sw - dul) / (sat - dul);
         return MathUtility.Constrain(ret, 1.0, 2.0);
      }
       
      
      
   }

}
```
      manager2 MaizeRUELimit
        # Tracking Information for SW and Temp Disease
        moistDaysBefore = 14  # Days before sowing to track average moisture over
        moistDaysAfter = 1  # Days after sowing to keep tracking moisture over
        moistMaxLayers = 2  # Number of soil layers to track moisture over
        coldStage = 4  # Crop Stage to track coldness up to
        coldTT = 4  # TT must be under this to be considered cold
        # Linear Interpolation Function Definitions (always comma separated)
        xSurfaceOMString = 0,2500,10000  # Comma separated x coordinates for surfaceOM linear interpolation function (kg Maize Residue/ha)
        ySurfaceOMString = 1,1,0.96  # Comma separated y coordinates for above function
        xMoistureString = 0,1,2  # Comma separated x moisture coordinates for disease (0 = ll, 1 = dul, 2 = sat)
        yMoistureString = 0.97,1.0,0.94  # Comma separated y modifier for the above x coordinates
        xTTString = 0,15,100  # Comma separated TT number for temperatue disease
        yTTString = 1,0.96,0.92  # Comma separated y modifier for TT
        # Previous Crop at Start of Simulation
        prevCrop = maize  # Previous crop? relevant to year 1 only
```csharp
using System;
using System.Collections.Generic; //For List 
using ModelFramework; //APSIM model objects found here
using CSGeneral; //MathUtility and other utilities
using System.Linq; //Lots of good syntax and methods here for objects that extend the Enumerable interface (like lists or arrays)

public class Script 
{      
   [Link] Paddock MyPaddock; // Can be used to dynamicall15y get access to simulation structure and variables
   [Link] Maize LocalMaize; //Need this to get maize's TT.
   [Input] DateTime Today;   
   [Input] double surfaceom_wt; //Input links by name
   [Input] double[] sw;
   [Input] double[] ll15;
   [Input] double[] dul;
   [Input] double[] sat;
   
   [Param] int moistDaysBefore;
   [Param] int moistDaysAfter;
   [Param] int moistMaxLayers;
   
   [Param] double coldStage;
   [Param] double coldTT; 
   
   
   
   [Param] string xSurfaceOMString; //Comma separated list of x coordinates for SurfaceOM linear interpolation.
   [Param] string ySurfaceOMString; // Comma separated list of y coordinates for the same function
   
   [Param] string xMoistureString;
   [Param] string yMoistureString;
   
   [Param] string xTTString;
   [Param] string yTTString;
   
   [Param] string prevCrop; //was the previous crop maize?
   
   
   private List<double> moistTracker = new List<double>();
   private List<double> ttTracker = new List<double>();


   //Arrays that store the Linear interpolation function values
   private double[] xSurfaceOM;
   private double[] ySurfaceOM;
   
   private double[] xMoist;
   private double[] yMoist;
   
   private double[] xTT;
   private double[] yTT;
   
   private double[] localRue;
   private double[] newRue;
   private bool afterSowing = false;
   private bool lin_int; //Linear interpolation expects a bool as an out arg for some reason...
   private int dasCount = 0;
   private bool prevCropMaize;
   
   [Output] double resmod;
   [Output] double moistmod;
   [Output] double ttmod;
   [Output] float myTT;
   
   private double stageYesterday;
   // The foll15owing event handler will15 be call15ed once at the beginning of the simulation
   [EventHandler] public void OnInitialised()
   {
      //Linq query syntax
      xSurfaceOM = (from a in xSurfaceOMString.Split(',')
           select Convert.ToDouble(a)).ToArray();
      
      ySurfaceOM = (from a in ySurfaceOMString.Split(',')
            select Convert.ToDouble(a)).ToArray();
      
      xMoist = (from a in xMoistureString.Split(',')
            select Convert.ToDouble(a)).ToArray();
      
      yMoist = (from a in yMoistureString.Split(',')
            select Convert.ToDouble(a)).ToArray();
      
      xTT = (from a in xTTString.Split(',')
            select Convert.ToDouble(a)).ToArray();
      
      yTT = (from a in yTTString.Split(',')
            select Convert.ToDouble(a)).ToArray();
      
      if (prevCrop == "maize")
         prevCropMaize = true;
      else
         prevCropMaize = false;
      

   }
   
   
   //Ideall15y we would read RUE here, but cultivar parameters are not set until later
   [EventHandler] public void OnSowing()
   {
      afterSowing = true;
      dasCount = 0;
      
      resmod = 1.0;
      moistmod = 1.0;
      ttmod = 1.0;
      
   }

   
   [EventHandler] public void OnProcess()
   {
      //Did not sow maize
      if (afterSowing && LocalMaize.plant_status == "out")
      {
         afterSowing = false;
      }
      
      //Certain cultivar parameters do not get read until end of day. Need to somehow check previous crop too 
      if (afterSowing) 
      { 
         MyPaddock.Get("rue", out localRue); //Need to get RUE even if maize not prev crop for other diseases
         
         if (prevCropMaize)
            resmod = MathUtility.LinearInterpReal(surfaceom_wt, xSurfaceOM, ySurfaceOM, out lin_int);
         
         afterSowing = false;
      }
      
      double moisture = sw.Take(moistMaxLayers).Average();
      moistTracker.Add(moisture);
      
      if (moistTracker.Count > moistDaysBefore + moistDaysAfter)
         moistTracker.RemoveAt(0);
      
      if (dasCount == moistDaysAfter) 
      {
         double x_moist = CalcSWDiseaseX(
            ll15.Take(moistMaxLayers).Average(), 
            dul.Take(moistMaxLayers).Average(),
            sat.Take(moistMaxLayers).Average(),
            moistTracker.Average());
         
          moistmod = MathUtility.LinearInterpReal(x_moist, xMoist, yMoist, out lin_int);
      }
      
      //We must fill15 the ttTracker in the OnProcess step rather than here. Maybe the entire script should be...
      
      if (LocalMaize.stage > 0.0 && LocalMaize.stage < coldStage)
         if (LocalMaize.TT < coldTT)
            ttTracker.Add(coldTT - LocalMaize.TT);
      
      //Set the new RUE value when pass this stage
      if (stageYesterday < coldStage && LocalMaize.stage >= coldStage && prevCropMaize)  // remove this (&& prevCropMaize) to be generic
      {
         double tt_sum = ttTracker.Sum();
         ttmod = MathUtility.LinearInterpReal(tt_sum, xTT, yTT, out lin_int);
         
         ttTracker.Clear();
         
         
         newRue = localRue.Select(x => x * resmod * moistmod * ttmod).ToArray();
         MyPaddock.Set("maize.rue", newRue);
      }
      
      stageYesterday = (double) LocalMaize.stage;
      
      dasCount++;
   }
   
   [EventHandler] public void OnHarvesting()
   {
      //If maize is not what is being harvested then the previous crop wasn't maize!
      //Incompatible with intercropping
      if (LocalMaize.plant_status != "out")
         prevCropMaize = true;
      else
         prevCropMaize = false;
   }
   
   
   //Calculates sw "percent" for linear interpolation function X axis
   private double CalcSWDiseaseX(double ll15, double dul, double sat, double sw)
   {
      double ret;
      if (sw < dul)
      {
         ret = (sw - ll15) / (dul - ll15);
         return MathUtility.Constrain(ret, 0.0, 1.0);
         
      }
      else 
      {
         ret = 1.0 + (sw - dul) / (sat - dul);
         return MathUtility.Constrain(ret, 1.0, 2.0);
      }
       
      
      
   }
   
   
   

}
```
      manager2 MaizeXFLimit
        # Tracking Information for SW and Temp Disease
        moistDaysBefore = 14  # Days before sowing to track average moisture over
        moistDaysAfter = 1  # Days after sowing to keep tracking moisture over
        moistMaxLayers = 2  # Number of soil layers to track moisture over
        coldStage = 4  # Crop Stage to track coldness up to
        coldTT = 5  # TT must be under this to be considered cold
        # Linear Interpolation Function Definitions (always comma separated)
        xSurfaceOMString = 0,2500,10000  # Comma separated x coordinates for surfaceOM linear interpolation function (kg Maize Residue/ha)
        ySurfaceOMString = 1,1,0.96  # Comma separated y coordinates for above function
        xMoistureString = 0,1,2  # Comma separated x moisture coordinates for disease (0 = ll, 1 = dul, 2 = sat)
        yMoistureString = 0.94,1.0,0.88  # Comma separated y modifier for the above x coordinates
        xTTString = 0,15,100  # Comma separated TT number for temperatue disease
        yTTString = 1,0.92,0.84  # Comma separated y modifier for TT
        # Previous Crop at Start of Simulation
        prevCrop = maize  # Previous crop? relevant to year 1 only
```csharp
using System;
using System.Collections.Generic; //For List 
using ModelFramework; //APSIM model objects found here
using CSGeneral; //MathUtility and other utilities
using System.Linq; //Lots of good syntax and methods here for objects that extend the Enumerable interface (like lists or arrays)

public class Script 
{      
   [Link] Paddock MyPaddock; // Can be used to dynamicall15y get access to simulation structure and variables
   [Link] Maize LocalMaize; //Need this to get maize's TT.
   [Input] DateTime Today;   
   [Input] double surfaceom_wt; //Input links by name
   [Input] double[] sw;
   [Input] double[] ll15;
   [Input] double[] dul;
   [Input] double[] sat;
   
   [Param] int moistDaysBefore;
   [Param] int moistDaysAfter;
   [Param] int moistMaxLayers;
   
   [Param] double coldStage;
   [Param] double coldTT; 
   
   
   
   [Param] string xSurfaceOMString; //Comma separated list of x coordinates for SurfaceOM linear interpolation.
   [Param] string ySurfaceOMString; // Comma separated list of y coordinates for the same function
   
   [Param] string xMoistureString;
   [Param] string yMoistureString;
   
   [Param] string xTTString;
   [Param] string yTTString;
   
   [Param] string prevCrop; //was the previous crop maize?
   
   
   private List<double> moistTracker = new List<double>();
   private List<double> ttTracker = new List<double>();


   //Arrays that store the Linear interpolation function values
   private double[] xSurfaceOM;
   private double[] ySurfaceOM;
   
   private double[] xMoist;
   private double[] yMoist;
   
   private double[] xTT;
   private double[] yTT;
   
   private double[] localRue;
   private double[] newRue;
   private bool afterSowing = false;
   private bool lin_int; //Linear interpolation expects a bool as an out arg for some reason...
   private int dasCount = 0;
   private bool prevCropMaize;
   
   [Output] double resmod;
   [Output] double moistmod;
   [Output] double ttmod;
   [Output] float myTT;
   
   private double stageYesterday;
   // The foll15owing event handler will15 be call15ed once at the beginning of the simulation
   [EventHandler] public void OnInitialised()
   {
      //Linq query syntax
      xSurfaceOM = (from a in xSurfaceOMString.Split(',')
           select Convert.ToDouble(a)).ToArray();
      
      ySurfaceOM = (from a in ySurfaceOMString.Split(',')
            select Convert.ToDouble(a)).ToArray();
      
      xMoist = (from a in xMoistureString.Split(',')
            select Convert.ToDouble(a)).ToArray();
      
      yMoist = (from a in yMoistureString.Split(',')
            select Convert.ToDouble(a)).ToArray();
      
      xTT = (from a in xTTString.Split(',')
            select Convert.ToDouble(a)).ToArray();
      
      yTT = (from a in yTTString.Split(',')
            select Convert.ToDouble(a)).ToArray();
      
      if (prevCrop == "maize")
         prevCropMaize = true;
      else
         prevCropMaize = false;
      

   }
   
   
   //Ideall15y we would read RUE here, but cultivar parameters are not set until later
   [EventHandler] public void OnSowing()
   {
      afterSowing = true;
      dasCount = 0;
      
      resmod = 1.0;
      moistmod = 1.0;
      ttmod = 1.0;
      
   }

   
   [EventHandler] public void OnProcess()
   {
      //Did not sow maize
      if (afterSowing && LocalMaize.plant_status == "out")
      {
         afterSowing = false;
      }
      
      //Certain cultivar parameters do not get read until end of day. Need to somehow check previous crop too 
      if (afterSowing) 
      { 
         MyPaddock.Get("maize.xf", out localRue); //Need to get RUE even if maize not prev crop for other diseases
         
         if (prevCropMaize)
            resmod = MathUtility.LinearInterpReal(surfaceom_wt, xSurfaceOM, ySurfaceOM, out lin_int);
         
         afterSowing = false;
      }
      
      double moisture = sw.Take(moistMaxLayers).Average();
      moistTracker.Add(moisture);
      
      if (moistTracker.Count > moistDaysBefore + moistDaysAfter)
         moistTracker.RemoveAt(0);
      
      if (dasCount == moistDaysAfter) 
      {
         double x_moist = CalcSWDiseaseX(
            ll15.Take(moistMaxLayers).Average(), 
            dul.Take(moistMaxLayers).Average(),
            sat.Take(moistMaxLayers).Average(),
            moistTracker.Average());
         
          moistmod = MathUtility.LinearInterpReal(x_moist, xMoist, yMoist, out lin_int);
      }
      
      //We must fill15 the ttTracker in the OnProcess step rather than here. Maybe the entire script should be...
      
      if (LocalMaize.stage > 0.0 && LocalMaize.stage < coldStage)
         if (LocalMaize.TT < coldTT)
            ttTracker.Add(coldTT - LocalMaize.TT);
      
      //Set the new RUE value when pass this stage
      if (stageYesterday < coldStage && LocalMaize.stage >= coldStage && prevCropMaize)  // remove this (&& prevCropMaize) to be generic
      {
         double tt_sum = ttTracker.Sum();
         ttmod = MathUtility.LinearInterpReal(tt_sum, xTT, yTT, out lin_int);
         
         ttTracker.Clear();
         
         
         newRue = localRue.Select(x => x * resmod * moistmod * ttmod).ToArray();
         MyPaddock.Set("maize.xf", newRue);
      }
      
      stageYesterday = (double) LocalMaize.stage;
      
      dasCount++;
   }
   
   [EventHandler] public void OnHarvesting()
   {
      //If maize is not what is being harvested then the previous crop wasn't maize!
      //Incompatible with intercropping
      if (LocalMaize.plant_status != "out")
         prevCropMaize = true;
      else
         prevCropMaize = false;
   }
   
   
   //Calculates sw "percent" for linear interpolation function X axis
   private double CalcSWDiseaseX(double ll15, double dul, double sat, double sw)
   {
      double ret;
      if (sw < dul)
      {
         ret = (sw - ll15) / (dul - ll15);
         return MathUtility.Constrain(ret, 0.0, 1.0);
         
      }
      else 
      {
         ret = 1.0 + (sw - dul) / (sat - dul);
         return MathUtility.Constrain(ret, 1.0, 2.0);
      }
       
      
      
   }
   
   
   

}
```
  simulation ames_CS_270
    metfile met: filename=ames-met.met
    clock
      start_date = 01/01/1996  # Enter the start date of the simulation
      end_date = 31/12/2016  # Enter the end date of the simulation
    summaryfile
    area paddock
      fertiliser
      maize
        ini: filename=_master_maize_XML.xml
      soybean
        ini: filename=_master_soy_XML.xml
      folder Manager folder
        manager N Deposition: same as ames_CC_270.paddock.Manager folder.N Deposition
        operations CS_maize_Nfert
          10/4/1980  ! my notes
          3/5/1999  fertiliser apply  amount = 270 (kg/ha), depth = 50 (mm), type = urea_n
          1/5/2001  fertiliser apply  amount = 270 (kg/ha), depth = 50 (mm), type = urea_n
          22/4/2003  fertiliser apply  amount = 270 (kg/ha), depth = 50 (mm), type = urea_n
          3/5/2005  fertiliser apply  amount = 270 (kg/ha), depth = 50 (mm), type = urea_n
          1/5/2007  fertiliser apply  amount = 270 (kg/ha), depth = 50 (mm), type = urea_n
          12/5/2009  fertiliser apply  amount = 270 (kg/ha), depth = 50 (mm), type = UAN_N
          19/5/2011  fertiliser apply  amount = 270 (kg/ha), depth = 50 (mm), type = UAN_N
          13/6/2013  fertiliser apply  amount = 270 (kg/ha), depth = 50 (mm), type = UAN_N
          18/5/2015  fertiliser apply  amount = 270 (kg/ha), depth = 50 (mm), type = urea_n
          6/5/2017  fertiliser apply  amount = 0 (kg/ha), depth = 50 (mm), type = UAN_N
          6/5/2018  fertiliser apply  amount = 0 (kg/ha), depth = 50 (mm), type = UAN_N
          10/7/2019  fertiliser apply  amount = 270 (kg/ha), depth = 50 (mm), type = urea_n
            ! start up period
          24/4/1991  fertiliser apply  amount = 170 (kg/ha), depth = 50 (mm), type = urea_n
          24/4/1993  fertiliser apply  amount = 170 (kg/ha), depth = 50 (mm), type = urea_n
          24/4/1995  fertiliser apply  amount = 170 (kg/ha), depth = 50 (mm), type = urea_n
          24/4/1997  fertiliser apply  amount = 170 (kg/ha), depth = 50 (mm), type = urea_n
        operations CS_soy_planitng
          5/5/1980  ! this is the maize of the maize-soy rotation in Ames
          5/5/2000  soybean sow plants=37.1,sowing_depth=50,cultivar=psims_22MG,row_spacing=760,crop_class=plant
          3/5/2002  soybean sow plants=37.1,sowing_depth=50,cultivar=psims_24MG,row_spacing=760,crop_class=plant
          11/5/2004  soybean sow plants=39.8,sowing_depth=50,cultivar=psims_28MG,row_spacing=760,crop_class=plant
          18/5/2006  soybean sow plants=39.8,sowing_depth=50,cultivar=psims_30MG,row_spacing=760,crop_class=plant
          20/5/2008  soybean sow plants=37.1,sowing_depth=50,cultivar=psims_26MG,row_spacing=760,crop_class=plant
          6/5/2010  soybean sow plants=39.8,sowing_depth=50,cultivar=psims_22MG,row_spacing=760,crop_class=plant
          15/5/2012  soybean sow plants=37.1,sowing_depth=50,cultivar=psims_26MG,row_spacing=760,crop_class=plant
          20/5/2014  soybean sow plants=39.5,sowing_depth=50,cultivar=psims_24MG,row_spacing=760,crop_class=plant
          17/5/2016  soybean sow plants=34.6,sowing_depth=50,cultivar=psims_22MG,row_spacing=760,crop_class=plant
        operations CS_corn_planitng
          5/5/1980  ! this is the maize of the maize-soy rotation in Ames
          19/5/1999  maize sow plants=7.9, sowing_depth=75,cultivar=psims_107RM, row_spacing=760,crop_class=maize ! Pioneer 34G81 (107 d relative maturity)
          9/5/2001  maize sow plants=7.5, sowing_depth=50,cultivar=psims_103RM, row_spacing=760,crop_class=maize !Pioneer P34G13 (103?)
          29/4/2003  maize sow plants=7.8, sowing_depth=50,cultivar=psims_108RM, row_spacing=760,crop_class=maize ! Dekalb 58-24 RR/YGCB (108 d)
          5/5/2005  maize sow plants=8.0, sowing_depth=75,cultivar=psims_106RM, row_spacing=760,crop_class=maize ! Pioneer 35Y62 HXX/RR2/LL (106 d)
          13/5/2007  maize sow plants=8.0, sowing_depth=75,cultivar=psims_109RM,row_spacing=760,crop_class=maize ! Pioneer 34A20 (HXX/RR2/LL) (109 d)
          5/5/2009  maize sow plants=8.0, sowing_depth=75,cultivar=psims_105RM, row_spacing=760,crop_class=maize ! Pioneer 35K33 (HXX/RR2/LL) (105 d)
          11/5/2011  maize sow plants=7.9, sowing_depth=75,cultivar=psims_106RM,row_spacing=760,crop_class=maize ! Fontanelle 6T510 (106 d)
          24/5/2013  maize sow plants=7.9, sowing_depth=75,cultivar=psims_AmesHail, row_spacing=760,crop_class=maize ! Pioneer 0461XR (HXX/LL/RR2) (104 d)
          13/5/2015  maize sow plants=8.9, sowing_depth=75,cultivar=psims_107RM, row_spacing=760,crop_class=maize ! FS 57QX1 RIB (107)
          1/5/2017  maize sow plants=8.6, sowing_depth=75,cultivar=psims_105RM,row_spacing=760,crop_class=maize ! Pioneer P0570AMXT (105 d)
          1/5/2018  maize sow plants=8.6, sowing_depth = 75, cultivar=psims_105RM,row_spacing=760,crop_class=maize ! Pioneer P0570AMXT (105 d)
          5/6/2019  maize sow plants=8.6, sowing_depth=75,cultivar=psims_105RM,row_spacing=760,crop_class=maize ! Pioneer P0570AMXT (105 d)
            ! start up period
          1/5/1991  maize sow plants=7.9, sowing_depth=50,cultivar=psims_106RM, row_spacing=760,crop_class=maize
          1/5/1992  soybean sow plants=40.5,sowing_depth=50,cultivar=psims_24MG,row_spacing=760,crop_class=plant
          1/5/1993  maize sow plants=7.9, sowing_depth=50,cultivar=psims_106RM, row_spacing=760,crop_class=maize
          1/5/1994  soybean sow plants=40.5,sowing_depth=50,cultivar=psims_24MG,row_spacing=760,crop_class=plant
          1/5/1995  maize sow plants=7.9, sowing_depth=50,cultivar=psims_106RM, row_spacing=760,crop_class=maize
          1/5/1996  soybean sow plants=40.5,sowing_depth=50,cultivar=psims_24MG,row_spacing=760,crop_class=plant
          1/5/1997  maize sow plants=7.9, sowing_depth=50,cultivar=psims_106RM, row_spacing=760,crop_class=maize
          1/5/1998  soybean sow plants=40.5,sowing_depth=50,cultivar=psims_24MG,row_spacing=760,crop_class=plant
        operations CS_harvest
          5/5/1980  ! ask isaiah probably you need to put both end_crop and then harvest
          21/10/1999  maize harvest
          21/10/1999  maize end_crop
          12/10/2000  soybean harvest
          12/10/2000  soybean end_crop
          15/10/2001  maize end_crop
          15/10/2001  maize harvest
          9/10/2002  soybean harvest
          9/10/2002  soybean end_crop
          21/10/2003  maize harvest
          21/10/2003  maize end_crop
          28/9/2004  soybean harvest
          28/9/2004  soybean end_crop
          17/10/2005  maize harvest
          17/10/2005  maize end_crop
          20/10/2006  soybean harvest
          20/10/2006  soybean end_crop
          11/10/2007  maize harvest
          11/10/2007  maize end_crop
          1/10/2008  soybean harvest
          1/10/2008  soybean end_crop
          13/10/2009  maize harvest
          13/10/2009  maize end_crop
          30/9/2010  soybean harvest
          30/9/2010  soybean end_crop
          20/10/2011  maize harvest
          20/10/2011  maize end_crop
          12/10/2012  soybean harvest
          12/10/2012  soybean end_crop
          8/10/2013  maize harvest
          8/10/2013  maize end_crop
          7/10/2014  soybean harvest
          7/10/2014  soybean end_crop
          7/10/2015  maize harvest
          7/10/2015  maize end_crop
          4/10/2016  soybean harvest
          4/10/2016  soybean end_crop
          7/10/2017  maize harvest
          7/10/2017  maize end_crop
          7/10/2018  maize harvest
          7/10/2018  maize end_crop
          6/11/2019  maize harvest
          6/11/2019  maize end_crop
            ! start up period
          20/10/1991  maize harvest
          20/10/1991  maize end_crop
          20/10/1992  soybean harvest
          20/10/1992  soybean end_crop
          20/10/1993  maize harvest
          20/10/1993  maize end_crop
          20/10/1994  soybean harvest
          20/10/1994  soybean end_crop
          20/10/1995  maize harvest
          20/10/1995  maize end_crop
          20/10/1996  soybean harvest
          20/10/1996  soybean end_crop
          20/10/1997  maize harvest
          20/10/1997  maize end_crop
          20/10/1998  soybean harvest
          20/10/1998  soybean end_crop
        operations Tillage1: same as ames_CC_270.paddock.Manager folder.Tillage1
      manager Calculations: same as ames_CC_270.paddock.Calculations
      tracker: same as ames_CC_270.paddock.tracker
      tracker tracker1: variable=value of SWAverage on sowing as SWSowing
      manager2 Stage Day of Year: same as ames_CC_270.paddock.Stage Day of Year
      manager Stage Day Info: same as ames_CC_270.paddock.Stage Day Info
      manager2 InitialiseWaterTableOnce: same as ames_CC_270.paddock.InitialiseWaterTableOnce
      manager2 Reporter_Annual: same as ames_CC_270.paddock.Reporter_Annual
      manager Temperature Day Info: same as ames_CC_270.paddock.Temperature Day Info
      outputfile: filename=ames_CS_270.out; title=ames_CS_270
        variables My Variables: same as ames_CC_270.paddock.outputfile.My Variables
        events My Variables Events: event=end_year
      surfaceom SurfaceOrganicMatter
        PoolName = soybean  # Organic Matter pool name
        type = soybean  # Organic Matter type
        mass = 2000  # Initial surface residue (kg/ha)
        cnr = 45  # C:N ratio of initial residue
        standing_fraction = 0.0  # Fraction of residue standing
        ini: filename=SurfaceOM_7.9.xml
      Soil Soil_Ames: same as ames_CC_270.paddock.Soil_Ames
      manager WT_script1
        on start_of_day:
        script: same as in ames_CC_270.paddock.WT_script1
      manager2 Kill Plants Early Maize: same as ames_CC_270.paddock.Kill Plants Early Maize
      manager2 Kill Plants Early Soy
        # Control Area
        cropToKill = soybean
        startStage = 1  # Start stage to kill crop over
        endStage = 3.5  # End stage to kill crop
        maxLayer = 3  # How many layers to calc sw effects over
        moistLim = 2  # Number of days to average moisture over
        tempLim = 2  # Number of days to average min temp over
        # Linear Interpolation Area (comma separate values)
        xMoistString = 0,0.5,1.5,2  # Moisture Linear interpolation x values (0 = ll, 1 = dul, 2 = sat)
        yMoistString = 0.01,0.0,0.0,0.03  # Moisture Linear interpolation y values (0 = no effect, 1 = crop dies)
        xTempString = -3.5,0.0  # Temp Linear interpolation x values (oC)
        yTempString = 0.1,0.0  # Temp Linear interpolation y values (0 = no effect, 1 = crop dies)
        script: same as in ames_CC_270.paddock.Kill Plants Early Maize
      manager2 MaizeRUELimit: same as ames_CC_270.paddock.MaizeRUELimit
      manager2 MaizeXFLimit: same as ames_CC_270.paddock.MaizeXFLimit
  simulation ames_SC_270
    metfile met: filename=ames-met.met
    clock
      start_date = 01/01/1996  # Enter the start date of the simulation
      end_date = 31/12/2016  # Enter the end date of the simulation
    summaryfile
    area paddock
      fertiliser
      maize
        ini: filename=_master_maize_XML.xml
      soybean
        ini: filename=_master_soy_XML.xml
      folder Manager folder
        manager N Deposition: same as ames_CC_270.paddock.Manager folder.N Deposition
        operations SC_maize_Nfert
          10/4/1980  ! my notes
          2/5/2000  fertiliser apply  amount = 270 (kg/ha), depth = 50 (mm), type = urea_n
          26/4/2002  fertiliser apply  amount = 270 (kg/ha), depth = 50 (mm), type = urea_n
          15/4/2004  fertiliser apply  amount = 270 (kg/ha), depth = 50 (mm), type = urea_n
          4/5/2006  fertiliser apply  amount = 270 (kg/ha), depth = 50 (mm), type = urea_n
          6/5/2008  fertiliser apply  amount = 270 (kg/ha), depth = 50 (mm), type = urea_n
          5/5/2010  fertiliser apply  amount = 270(kg/ha), depth = 50 (mm), type = UAN_N
          10/5/2012  fertiliser apply  amount = 270(kg/ha), depth = 50 (mm), type = UAN_N
          6/5/2014  fertiliser apply  amount = 270 (kg/ha), depth = 50 (mm), type = urea_n
          6/5/2016  fertiliser apply  amount = 270(kg/ha), depth = 50 (mm), type = UAN_N
          6/5/2017  fertiliser apply  amount = 0 (kg/ha), depth = 50 (mm), type = UAN_N
          6/5/2018  fertiliser apply  amount = 0 (kg/ha), depth = 50 (mm), type = UAN_N
            ! start up period
          24/4/1992  fertiliser apply  amount = 170 (kg/ha), depth = 50 (mm), type = urea_n
          24/4/1994  fertiliser apply  amount = 170 (kg/ha), depth = 50 (mm), type = urea_n
          24/4/1996  fertiliser apply  amount = 170 (kg/ha), depth = 50 (mm), type = urea_n
          24/4/1998  fertiliser apply  amount = 170 (kg/ha), depth = 50 (mm), type = urea_n
        operations SC_soy_planitng
          5/5/1980  ! this is the maize of the maize-soy rotation in Ames
          19/5/1999  soybean sow plants=37.1,sowing_depth=50,cultivar=psims_22MG,row_spacing=760,crop_class=plant
          9/5/2001  soybean sow plants=37.1,sowing_depth=50,cultivar=psims_26MG,row_spacing=760,crop_class=plant
          29/4/2003  soybean sow plants=37.1,sowing_depth=50,cultivar=psims_26MG,row_spacing=760,crop_class=plant
          10/5/2005  soybean sow plants=39.8,sowing_depth=50,cultivar=psims_28MG,row_spacing=760,crop_class=plant
          18/5/2007  soybean sow plants=38,sowing_depth=50,cultivar=psims_30MG,row_spacing=760,crop_class=plant
          8/5/2009  soybean sow plants=39.8,sowing_depth=50,cultivar=psims_26MG,row_spacing=760,crop_class=plant
          19/5/2011  soybean sow plants=38.3,sowing_depth=50,cultivar=psims_24MG,row_spacing=760,crop_class=plant
          13/6/2013  soybean sow plants=35.6,sowing_depth=50,cultivar=psims_AmesHailSoy,row_spacing=760,crop_class=plant
          22/5/2015  soybean sow plants=34.6,sowing_depth=50,cultivar=psims_28MG,row_spacing=760,crop_class=plant
          10/7/2019  soybean sow plants=34.6,sowing_depth=50,cultivar=psims_28MG,row_spacing=760,crop_class=plant
        operations SC_corn_planitng
          5/5/1980  ! this is the maize of the maize-soy rotation in Ames
          5/5/2000  maize sow plants=7.4, sowing_depth=75,cultivar=psims_AmesHail, row_spacing=760,crop_class=maizev! Pioneer 34G81 (107 d)
          3/5/2002  maize sow plants=7.9, sowing_depth=75,cultivar=psims_105RM, row_spacing=760,crop_class=maize ! Dekalb 55-51 RR/YGCB (105 d)
          27/4/2004  maize sow plants=8.0, sowing_depth=75,cultivar=psims_107RM, row_spacing=760,crop_class=maize ! Dekalb 57-81 RR/YGCB (107 d)
          9/5/2006  maize sow plants=8.0, sowing_depth=75,cultivar=psims_106RM,row_spacing=760,crop_class=maize ! Pioneer 35Y61 (106 d)
          14/5/2008  maize sow plants=7.4, sowing_depth=75,cultivar=psims_111RM,row_spacing=760,crop_class=maize ! Dekalb DKC61-69 (111 d)
          29/4/2010  maize sow plants=8.0, sowing_depth=75,cultivar=psims_105RM, row_spacing=760,crop_class=maize ! Pioneer 35F44 (HXX/RR2/LL) (105 d)
          10/5/2012  maize sow plants=7.9, sowing_depth=75,cultivar=psims_104RM, row_spacing=760,crop_class=maize ! Pioneer P0528XR (HXX/LL/RR2) (105 d)
          7/5/2014  maize sow plants=7.9, sowing_depth=75,cultivar=psims_105RM, row_spacing=760,crop_class=maize ! Pioneer 0591AMX (105 d)
          27/4/2016  maize sow plants=8.6, sowing_depth=75,cultivar=psims_105RM,row_spacing=760,crop_class=maize ! Pioneer P0570AMXT (105 d)
          27/4/2017  maize sow plants=8.6, sowing_depth=75,cultivar=psims_105RM,row_spacing=760,crop_class=maize ! Pioneer P0570AMXT (105 d)
          28/4/2018  maize sow plants=8.6, sowing_depth=75,cultivar=psims_105RM,row_spacing=760,crop_class=maize ! Pioneer P0570AMXT (105 d)
            ! start up period
          1/5/1991  soybean sow plants=40.5,sowing_depth=50,cultivar=psims_24MG,row_spacing=760,crop_class=plant
          1/5/1992  maize sow plants=7.9, sowing_depth=50,cultivar=psims_106RM, row_spacing=760,crop_class=maize
          1/5/1993  soybean sow plants=40.5,sowing_depth=50,cultivar=psims_24MG,row_spacing=760,crop_class=plant
          1/5/1994  maize sow plants=7.9, sowing_depth=50,cultivar=psims_106RM, row_spacing=760,crop_class=maize
          1/5/1995  soybean sow plants=40.5,sowing_depth=50,cultivar=psims_24MG,row_spacing=760,crop_class=plant
          1/5/1996  maize sow plants=7.9, sowing_depth=50,cultivar=psims_106RM, row_spacing=760,crop_class=maize
          1/5/1997  soybean sow plants=40.5,sowing_depth=50,cultivar=psims_24MG,row_spacing=760,crop_class=plant
          1/5/1998  maize sow plants=7.9, sowing_depth=50,cultivar=psims_106RM, row_spacing=760,crop_class=maize
        operations SC_harvest
          5/5/1980  ! ask isaiah probably you need to put both end_crop and then harvest
          6/10/1999  soybean harvest
          6/10/1999  soybean end_crop
          26/9/2000  maize harvest
          26/9/2000  maize end_crop
          4/10/2001  soybean harvest
          4/10/2001  soybean end_crop
          8/10/2002  maize harvest
          8/10/2002  maize end_crop
          6/10/2003  soybean harvest
          6/10/2003  soybean end_crop
          12/10/2004  maize harvest
          12/10/2004  maize end_crop
          30/9/2005  soybean harvest
          30/9/2005  soybean end_crop
          19/10/2006  maize harvest
          19/10/2006  maize end_crop
          9/10/2007  soybean harvest
          9/10/2007  soybean end_crop
          3/11/2008  maize harvest
          3/11/2008  maize end_crop
          13/10/2009  soybean harvest
          13/10/2009  soybean end_crop
          7/10/2010  maize harvest
          7/10/2010  maize end_crop
          30/9/2011  soybean harvest
          30/9/2011  soybean end_crop
          4/10/2012  maize harvest
          4/10/2012  maize end_crop
          10/10/2013  soybean harvest
          10/10/2013  soybean end_crop
          17/10/2014  maize harvest
          17/10/2014  maize end_crop
          14/10/2015  soybean harvest
          14/10/2015  soybean end_crop
          11/10/2016  maize harvest
          11/10/2016  maize end_crop
          11/10/2017  maize harvest
          11/10/2017  maize end_crop
          11/10/2018  maize harvest
          11/10/2018  maize end_crop
          6/11/2019  soybean harvest
          6/11/2019  soybean end_crop
            ! start up period
          20/10/1991  soybean harvest
          20/10/1991  soybean end_crop
          20/10/1992  maize harvest
          20/10/1992  maize end_crop
          20/10/1993  soybean harvest
          20/10/1993  soybean end_crop
          20/10/1994  maize harvest
          20/10/1994  maize end_crop
          20/10/1995  soybean harvest
          20/10/1995  soybean end_crop
          20/10/1996  maize harvest
          20/10/1996  maize end_crop
          20/10/1997  soybean harvest
          20/10/1997  soybean end_crop
          20/10/1998  maize harvest
          20/10/1998  maize end_crop
        operations Tillage1: same as ames_CC_270.paddock.Manager folder.Tillage1
      manager Calculations: same as ames_CC_270.paddock.Calculations
      tracker: same as ames_CC_270.paddock.tracker
      tracker tracker1: variable=value of SWAverage on sowing as SWSowing
      manager2 Stage Day of Year: same as ames_CC_270.paddock.Stage Day of Year
      manager Stage Day Info: same as ames_CC_270.paddock.Stage Day Info
      manager2 InitialiseWaterTableOnce: same as ames_CC_270.paddock.InitialiseWaterTableOnce
      manager2 Reporter_Annual: same as ames_CC_270.paddock.Reporter_Annual
      manager Temperature Day Info: same as ames_CC_270.paddock.Temperature Day Info
      outputfile: filename=ames_SC_270.out; title=ames_SC_270
        variables My Variables: same as ames_CC_270.paddock.outputfile.My Variables
        events My Variables Events: event=end_year
      surfaceom SurfaceOrganicMatter
        PoolName = soybean  # Organic Matter pool name
        type = soybean  # Organic Matter type
        mass = 2000  # Initial surface residue (kg/ha)
        cnr = 45  # C:N ratio of initial residue
        standing_fraction = 0.0  # Fraction of residue standing
        ini: filename=SurfaceOM_7.9.xml
      Soil Soil_Ames: same as ames_CC_270.paddock.Soil_Ames
      manager WT_script1
        on start_of_day:
        script: same as in ames_CC_270.paddock.WT_script1
      manager2 Kill Plants Early Maize: same as ames_CC_270.paddock.Kill Plants Early Maize
      manager2 Kill Plants Early Soy: same as ames_CS_270.paddock.Kill Plants Early Soy
      manager2 MaizeRUELimit: same as ames_CC_270.paddock.MaizeRUELimit
      manager2 MaizeXFLimit: same as ames_CC_270.paddock.MaizeXFLimit
