folder simulations: version=37; creator=Apsim 7.9-r4044
  memo my notes
    Ames

    sotirios 1/18/2020:
    svp to 0.65 based on earlier ET study
    add co2 effect on transpiration and N conc (script) and xml code for co2
    psims cultivars used as a start
    then changed the tt from maturity to harvest from 150 to 500 gdd so the model harvest the crop via operational manager and not 150 gdd after maturity
    then changed the RUE from 1.8 (optimum) to 1.6 for rainfed envrionments (hatfield research) or other value per cultivar
    temp_grain_crit_stress = 34 from 38

    mitch to do: txt files names; redo oter stuff

    difference between v2 and v3: v3 has an ini for soilorganic mater and soil
  folder Ames
    folder common
      manager Calculations
        on start_of_day:
```
crop_buac = maize.yield * 0.0159 / 0.85 + soybean.yield * 0.0149/0.87
cornbuac = maize.yield * 0.0159 / 0.85
soybuac = soybean.yield *0.0149/0.87
crop_yield = maize.yield + soybean.yield
biomass_crop = maize.biomass + soybean.biomass
CropET = es + maize.ep + soybean.ep
CropT = maize.ep + soybean.ep
root_crop = maize.root_depth + soybean.root_depth
flowering_crop = maize.flowering_date + soybean.flowering_date
maturity_crop = maize.maturity_date + soybean.maturity_date
lai_crop = maize.lai + soybean.lai
Nupt_crop = 10 * maize.biomass_n + 10 * soybean.biomass_n
Nupt_grain = 10 * maize.grain_n + 10 * soybean.grain_n

swdef_expan_crop = maize.swdef_expan + soybean.swdef_expan
oxdef_photo_crop = maize.oxdef_photo + soybean.oxdef_photo
nfact_expan_crop = maize.nfact_expan + soybean.nfact_expan

Nleaching = subsurface_drain_no3 + flow_no3(11)
N_loss_rate = subsurface_drain_no3 + flow_no3(11) + dnit()
W_loss_rate = subsurface_drain + flow(11)

co2 = 1.6471 * year - 2917.8    ! linear Interpolation 350 ppm in 1980, 406 ppm in 2018

Harvest_date =  TargetStageDOY + maize.DaysAfterSowing + soybean.DaysAfterSowing 

if watertable < 500 then
WT50cm = 1
else
WT50cm = 0
endif

no3_30cm = no3(1) + no3(2) + no3(3) + no3(4) + no3(5)


stover_kg = maize.green_biomass - maize.yield +  soybean.green_biomass - soybean.yield
stover_Nitr = 10*maize.green_biomass_n + 10*soybean.green_biomass_n - Nupt_grain

if stover_Nitr > 0 then
stover_cn_ratio = stover_kg *0.4 / stover_Nitr  
endif


if soybean.biomass > 0 then
soy_hi = soybean.yield / soybean.biomass
else
soy_hi = 0
endif

cropHI = soy_hi + maize.hi

root_kg = 10* maize.RootGreenWt + 10* soybean.RootGreenWt
rootNconc = maize.RootGreenNConc + soybean.RootGreenNConc

if biomass_crop > 0 then
RootShoot = root_kg / biomass_crop
else
RootShoot = 0
endif

if Nupt_crop > 0 then
crop_NHI = Nupt_grain / Nupt_crop
else
crop_NHI = 0
endif




SOC_7cm = 0.166 * oc(1) + 0.166 * oc(2) + 0.333 * oc(3) + 0.333 * oc(4)
SOC_22cm = 0.333 * oc(4) + 0.666 * oc(5)
SOC_45cm = 0.5 * oc(6) + 0.5 * oc(7)
SOC_75cm = 0.5 * oc(8) + 0.5 * oc(9)
SOC_105cm = 0.5 * oc(10) + 0.5 * oc(11)
```
      tracker
        variable:
          maximum of crop_buac on end_of_day from SpecialReport5 to SpecialReport6 as CropYield
          maximum of cornbuac on end_of_day from SpecialReport5 to SpecialReport6 as corn_buac
          maximum of soybuac on end_of_day from SpecialReport5 to SpecialReport6 as soy_buac
          maximum of biomass_crop on end_of_day from SpecialReport5 to SpecialReport6 as Bioma
          maximum of root_crop on end_of_day from SpecialReport5 to SpecialReport6 as RootDepth
          maximum of flowering_crop on end_of_day from SpecialReport5 to SpecialReport6 as FlowerDate
          maximum of maturity_crop on end_of_day from SpecialReport5 to SpecialReport6 as MaturityDate
          maximum of lai_crop on end_of_day from SpecialReport5 to SpecialReport6 as LAI_maximum
          sum of CropET on end_of_day from SpecialReport5 to SpecialReport6 as ETAnnual
          sum of CropT on end_of_day from SpecialReport5 to SpecialReport6 as CropTranspiration
          maximum of Nupt_crop on end_of_day from SpecialReport5 to SpecialReport6 as TotalNupt
          maximum of Nupt_grain on end_of_day from SpecialReport5 to SpecialReport6 as GrainlNupt
          average of swdef_expan_crop on end_of_day from sowing to harvesting as AvgDroughtStress
          average of oxdef_photo_crop on end_of_day from sowing to harvesting as AvgExcessiveWStress
          average of nfact_expan_crop on end_of_day from sowing to harvesting as AvgNStress
          average of watertable on end_of_day from sowing to harvesting as AvgWTInseason
          sum of eo on end_of_day from SpecialReport5 to SpecialReport6 as EOAnnual
          sum of runoff on end_of_day from SpecialReport5 to SpecialReport6 as RunoffAnnual
          sum of W_loss_rate on end_of_day from SpecialReport5 to SpecialReport6 as Drainage
          maximum of fertiliser on end_of_day from SpecialReport5 to SpecialReport6 as NR
          sum of dlt_n_min() on end_of_day from SpecialReport5 to SpecialReport6 as GrossMiner
          sum of dlt_n_min_tot() on end_of_day from SpecialReport5 to SpecialReport6 as NetMiner
          sum of N_loss_rate on end_of_day from SpecialReport5 to SpecialReport6 as NlossTotal
          sum of dnit() on end_of_day from SpecialReport5 to SpecialReport6 as Denitr
          sum of Nleaching on end_of_day from SpecialReport5 to SpecialReport6 as NLeachAnnual
          average of watertable on end_of_day from SpecialReport5 to SpecialReport6 as AvgWT
          value of no3() on harvesting as NO3_atHarvest
          value of no3() on sowing as NO3_atSowing
          value of no3_30cm on sowing as NO3_30cmHarvest
          value of no3_30cm on sowing as NO3_30cmSowing
          maximum of crop_yield on end_of_day from SpecialReport5 to SpecialReport6 as CropYield_kg
          maximum of Harvest_date on end_of_day from SpecialReport5 to SpecialReport6 as Harvest_doy
          maximum of cropHI on end_of_day from SpecialReport5 to SpecialReport6 as crop_hi
          maximum of maize.grain_no on end_of_day from SpecialReport5 to SpecialReport6 as Maize_GrainsNumber
          maximum of maize.grain_size on end_of_day from SpecialReport5 to SpecialReport6 as Maize_GrainSize
          value of surfaceom_wt on sowing as ResidueWTatSowing
          value of surfaceom_n on sowing as ResidueNatSowing
          sum of WT50cm on end_of_day from sowing to harvesting as DaysWTbelow50cm
          sum of dlt_n_fixed on end_of_day from SpecialReport5 to SpecialReport6 as SoyNfixed
          value of stover_kg on harvesting as StoverWT
          value of stover_Nitr on harvesting as StoverNitrogen
          value of stover_cn_ratio on harvesting as StoverCN
          value of fom_c() on SpecialReport5 as FOM_january
          value of biom_c() on SpecialReport5 as BIOM_january
          value of root_kg on harvesting as RootWt_atHarv
          value of RootShoot on harvesting as RS_ratio
          value of rootNconc on harvesting as NconcRoot
          value of crop_NHI on harvesting as NHI_crop
          sum of dlt_n_min_res() on end_of_day from SpecialReport7 to SpecialReport8 as Res_MI_NtoJ
          sum of dlt_n_min() on end_of_day from SpecialReport7 to SpecialReport8 as Gross_MI_NtoJ
          sum of dlt_n_min_tot() on end_of_day from SpecialReport7 to SpecialReport8 as Net_MI_NtoJ
      Soil Soil_Ames: SoilType=Nicollet; NearestTown=Ames; Region=Boone; State=Iowa; Country=US; ApsoilNumber=34; Latitude=42.02204; Longitude=-93.769115; YearOfSampling=0; DataSource=mesured data and web soil survey; Comments=hydrological parameters and BD from Saxton and Rawls, 2006
        Water
          Thickness  BD    AirDry  LL15   DUL    SAT       KS
          25         1.25  0.087   0.174  0.31   0.445     146
          25         1.25  0.087   0.174  0.31   0.455     146
          50         1.25  0.087   0.174  0.3    0.42      146
          100        1.25  0.132   0.165  0.25   0.43      146
          100        1.25  0.12    0.12   0.22   0.35      146
          150        1.35  0.11    0.11   0.21   0.34      146
          150        1.35  0.102   0.102  0.22   0.33      133
          150        1.36  0.126   0.126  0.265  0.393     133
          150        1.36  0.133   0.133  0.261  0.393     133
          150        1.36  0.128   0.128  0.253  0.393     388
          150        1.6   0.128   0.128  0.2    0.393     388
          300        1.6   0.09    0.09   0.2    0.393     388
          300        1.6   0.09    0.09   0.2    0.284579  54.2361
          300        1.6   0.09    0.09   0.2    0.272798  33.1104
          300        1.6   0.09    0.09   0.2    0.262658  20.2134
          300        1.6   0.09    0.09   0.2    0.25393   12.34
          300        1.6   0.09    0.09   0.2    0.246418  7.5334
          300        1.6   0.09    0.09   0.2    0.239952  4.59904
          300        1.6   0.09    0.09   0.2    0.234387  2.80765
          300        1.6   0.09    0.09   0.2    0.229598  1.71403
          BD source: Field measured and checked for sensibility (layer 2, 3, 4)
          AirDry source: Estimated based on local knowledge (layer 1, 2, 3, 4)
          LL15 source: Estimated based on local knowledge (layer 2, 3, 4)
          DUL source: Field measured and checked for sensibility (layer 1, 2, 3, 4)
          SAT source: Calculated from measured, estimated or calculated BD (layer 1, 2, 3, 4)
          SoilCrop maize
            LL=[0.174, 0.174, 0.174, 0.165, 0.12, 0.136161, 0.143527, 0.18676725, 0.197952, 0.200536, 0.174202, 0.169252, 0.178877, 0.188, 0.188, 0.188, 0.188, 0.188, 0.188, 0.188]
            KL=[0.08, 0.08, 0.08, 0.08, 0.08, 0.08, 0.08, 0.08, 0.08, 0.08, 0.08, 0.0422964, 0.0350564, 0.0261367, 0.022015, 0.0162927, 0.0111758, 0.0067466, 0.00313554, 0.000603434]
            XF=[1, 1, 1, 1, 1, 1, 1, 1, 1, 1, 1, 1, 0.2, 0.1, 0, 0, 0, 0, 0, 0]
            LL source: Estimated based on local knowledge (layer 2, 3, 4)
          SoilCrop soybean
            LL=[0.174, 0.174, 0.174, 0.165, 0.12, 0.136161, 0.143527, 0.18676725, 0.197952, 0.200536, 0.174202, 0.169252, 0.178877, 0.188, 0.188, 0.188, 0.188, 0.188, 0.188, 0.188]
            KL=[0.08, 0.08, 0.08, 0.08, 0.08, 0.08, 0.08, 0.08, 0.08, 0.08, 0.08, 0.0422964, 0.0350564, 0.0261367, 0.022015, 0.0162927, 0.0111758, 0.0067466, 0.00313554, 0.000603434]
            XF=[1, 1, 1, 1, 1, 1, 1, 1, 1, 1, 1, 1, 0.2, 0.1, 0, 0, 0, 0, 0, 0]
            LL source: Estimated based on local knowledge (layer 1, 2, 3, 4)
        SoilOrganicMatter: RootCN=29.8; RootWt=1586.8; SoilCN=12.5; EnrACoeff=7.4; EnrBCoeff=0.2; OCUnits=Total
          Thickness  OC    FBiom       FInert
          25         2.47  0.165       0.41975
          25         2.41  0.165       0.41975
          50         2.41  0.110863    0.41975
          100        2.38  0.0699684   0.4827125
          100        1.97  0.0498419   0.5246875
          150        1.95  0.0384185   0.802815
          150        0.97  0.0306479   0.82524
          150        0.97  0.0256472   0.84916
          150        0.49  0.0226493   0.87009
          150        0.49  0.0201211   0.999
          150        0.49  0.0183055   0.999
          300        0.49  0.0162662   0.999
          300        0.49  0.014237    0.999
          300        0.49  0.01274218  0.999
          300        0.49  0.0115872   0.999
          300        0.1   0.0106631   0.999
          300        0.1   0.00990398  0.999
          300        0.1   0.0092672   0.999
          300        0.1   0.00872398  0.999
          300        0.1   0.0082541   0.999
          OC source: Estimated based on local knowledge (layer 1, 2, 3, 4)
        Analysis: PHUnits=Water; BoronUnits=HotWater
          Thickness  PH    CEC    ParticleSizeSand  ParticleSizeSilt  ParticleSizeClay
          25         7.48  25.8   41.3              29.78             28.92
          25         7.48  25.8   41.3              29.78             28.92
          50         7.48  25.8   41.3              29.78             28.92
          100        7.38  25.85  40.16             32.59             27.26
          100        7.43  26.57  37.77             33.01             29.22
          150        7.43  26.57  37.77             33.01             29.22
          150        7.73  23.41  44.39             28.07             27.54
          150        7.73  23.41  44.39             28.07             27.54
          150        8.08  33.6   49.07             28.9              22.03
          150        8.08  33.6   49.07             28.9              22.03
          150        8.08  33.6   49.07             28.9              22.03
          300        8.08  33.6   49.07             28.9              22.03
          300        8.08  33.6   49.07             28.9              22.03
          300        8.08  33.6   49.07             28.9              22.03
          300        8.08  33.6   49.07             28.9              22.03
          300        8.08  33.6   49.07             28.9              22.03
          300        8.08  33.6   49.07             28.9              22.03
          300        8.08  33.6   49.07             28.9              22.03
          300        8.08  33.6   49.07             28.9              22.03
          300        8.08  33.6   49.07             28.9              22.03
          PH source: Estimated based on local knowledge (layer 1, 2, 3, 4)
          ParticleSizeSand, ParticleSizeSilt source: Measured (layer 1)
          ParticleSizeClay source: Measured (layer 1, 2)
        Sample Initial nitrogen: NO3Units=ppm; NH4Units=ppm; SWUnits=Volumetric; OCUnits=Total; PHUnits=Water
          Thickness  NO3    NH4  SW
          25         7.04   4    0.31
          25         7.36   4    0.31
          50         4.8    4    0.3
          100        2.4    4    0.25
          100        1.6    4    0.22
          150        0.988  4    0.21
          150        0.988  4    0.22
          150        0.539  1    0.265
          150        0.539  1    0.261
          150        0.49   1    0.253
          150        0.292  1    0.2
          300        0.104  0.3  0.393
          300        0.188  0.4  0.285
          300        0.167  0    0.273
          300        0      0    0.263
          300        0.188  0.4  0.254
          300        0.188  0.4  0.246
          300        0.188  0.4  0.24
          300        0.167  0    0.234
          300        0      0    0.23
        Swim: Salb=0.13; CN2Bare=65; CNRed=20; CNCov=0.8; KDul=0.25; PSIDul=-300; VC=true; DTmin=0; DTmax=1440; MaxWaterIncrement=10; SpaceWeightingFactor=0; SoluteSpaceWeightingFactor=0; Diagnostics=false
          SwimSoluteParameters: Dis=15; Disp=0.75; A=1; DTHP=1
            zero: DTHC, WaterTableCl, WaterTableNO3, WaterTableNH4, WaterTableUrea, WaterTableTracer, WaterTableMineralisationInhibitor, WaterTableUreaseInhibitor, WaterTableNitrificationInhibitor, WaterTableDenitrificationInhibitor
            Thickness  NO3Exco  NO3FIP  NH4Exco  NH4FIP  UreaExco  UreaFIP  ClExco  ClFIP
            1000       0        1       100      1       0         1        0       1
            1000       0        1       100      1       0         1        0       1
            1000       0        1       100      1       0         1        0       1
        SoilTemperature: BoundaryLayerConductance=20
          Thickness=[25, 25, 50, 100, 100, 150, 150, 150, 150, 150, 150, 300, 300, 300, 300, 300, 300, 300, 300, 300]
          InitialSoilTemperature=[10, 10, 10, 10, 10, 10, 10, 10, 10, 10, 9, 9, 9, 10, 10, 10, 10, 9, 9, 9]
        ini: filename=Soil_7.9.xml
      surfaceom SurfaceOrganicMatter
        PoolName = soybean  # Organic Matter pool name
        type = soybean  # Organic Matter type
        mass = 2000  # Initial surface residue (kg/ha)
        cnr = 45  # C:N ratio of initial residue
        standing_fraction = 0.0  # Fraction of residue standing
        ini: filename=SurfaceOM_7.9.xml
      manager Stage Day Info
        StageTarget = emergence  # Target Stage (from xml)
        CropTarget = maize  # Target Crop
        DOYName = emergDOY  # Name of the variable (DOY)
        DASName = emergDAS  # Name of the variable (DAS)
        on init:
```
 yesterday_stage = 'nocrop'
```
        on end_of_day:
```
  if ([CropTarget].StageName = '[StageTarget]' AND yesterday_stage <> '[StageTarget]') then
       [DOYName] = day 
       [DASName] = [CropTarget].DaysAfterSowing
  endif


 if ([CropTarget].StageName = 'nocrop') then
       [DOYName] = 0
       [DASName] = 0
 endif

 yesterday_stage = [CropTarget].StageName
```
      manager2 Stage Day of Year
        TargetStage = sowing  # Target stage name (as specified in XML)
        TargetCrop = maize
```csharp
using System;
using ModelFramework;
using CSGeneral;

public class Script 
{      
   [Link] Paddock MyPaddock; // Can be used to dynamically get access to simulation structure and variables
   [Input] DateTime Today;   // Equates to the value of the current simulation date - value comes from CLOCK
   [Param] string TargetStage;         // The value for these will come from the Properties page.
   [Param] string TargetCrop;
   [Output] int TargetStageDAS;   // This variable is visible to the outputfile and other scripts under this name
   [Output] int TargetStageDOY; 

   private string stage, yesterday_stage;
   private int daysaftersowing;

   // The following event handler will be called once at the beginning of the simulation
   [EventHandler] public void OnInitialised()
   {

      
      
   }

   // The following event handler will be called each day 
   [EventHandler] public void OnProcess()
   {

      MyPaddock.Get(TargetCrop + ".StageName", out stage);//Gets crop.stagename and crop.daysaftersowing
      MyPaddock.Get(TargetCrop + ".DaysAfterSowing", out daysaftersowing);
      
      if (yesterday_stage != TargetStage && stage == TargetStage)
      {
         TargetStageDAS = daysaftersowing;
         TargetStageDOY = Today.DayOfYear;
      }
      
      if (stage == "nocrop")
      {
         TargetStageDAS = 0;
         TargetStageDOY = 0;
      }
      
      
      
      yesterday_stage = stage;
   }

}
```
      manager2 InitialiseWaterTableOnce
        InitDOY = 1  # Day of year to initialise the water table
        WTDepth = 1000  # Depth to water table (mm)
```vb
Imports System
Imports ModelFramework
Imports CSGeneral
Imports System.Collections.Generic

Public Class Script
   
   <Link()> Dim MySimulation As Simulation
   <Link()> Dim Clock As Clock
   <Param()> Dim InitDOY As Integer
   <Param()> Dim WTDepth As Single
   <Input> Private dlayer As Double()           'Array of soil layer thicknesses - for calculation of mineral N in the soil
   <Input> Dim Today As DateTime                ' Equates to the value of the current simulation date - from CLOCK
   
   <Output> Dim ProfileDepth As Double
   <Output> Dim BBCPotential As Double
   <Output> Dim InitPsi() As Double
   <Output> Dim InitWTD As Boolean       'created to help initialize WTD on first day of the simulation, not DOY = 1
      
   <EventHandler()> Public Sub OnInit()
      ProfileDepth = 0
      BBCPotential = 0
      InitWTD = False
      
   End Sub
   
   <EventHandler()> Public Sub OnPrepare()

      'If (today.DayOfYear = InitDOY) Then
      If (InitWTD = False) Then
         ProfileDepth = MathUtility.Sum(dlayer)
         BBCPotential = (ProfileDepth - WTDepth) / 10
         ReDim InitPsi(dlayer.length - 1) 
         
         InitPsi(dlayer.length - 1) = BBCPotential 
         InitPsi(0) = -WTDepth / 10.0
         InitPsi(1) = InitPsi(0) + (dlayer(0) + dlayer(1) / 2) / 10
         Dim i As Integer
         
         For i = 2 To dlayer.length - 2
            InitPsi(i) = InitPsi(i - 1) + (dlayer(i - 1) + dlayer(i)) / 2 / 10   
         Next
         
         'Dim SWIM As Component = MySimulation.LinkByName("SWIM")
         MySimulation.Set("psi", InitPsi)
         MySimulation.Set("bbc_potential", BBCPotential)
         InitWTD = True
         
      End If      
      
      
   End Sub


End Class
```
      manager2 Reporter_Annual
        date = 1-jan  # Date for the special report
        date2 = 31-dec  # date for second one
```csharp
using System;
using ModelFramework;
using CSGeneral;

public class Script 
{      
   [Link] Paddock MyPaddock; // Can be used to dynamically get access to simulation structure and variables
   [Input] DateTime Today;   // Equates to the value of the current simulation date - value comes from CLOCK
   [Param] string date;         // The value for this will come from the Properties page.
   [Param] string date2;
   
   [Event] public event NullTypeDelegate SpecialReport5;
   [Event] public event NullTypeDelegate SpecialReport6;

   
   // The following event handler will be called once at the beginning of the simulation
   [EventHandler] public void OnInitialised()
   {
      
   }
      
   // The following event handler will be called each day at the beginning of the day
   [EventHandler] public void OnPrepare()
   {
      if (DateUtility.DatesEqual(date, Today))
         SpecialReport5.Invoke();
      
      if (DateUtility.DatesEqual(date2, Today))
         SpecialReport6.Invoke();
   }
   
}
```
      manager Temperature Day Info
        TempTarget = mint  # Maxt or mint
        TempValue = 0  # Value (in deg C)
        DOYName = mintZeroDOY  # Name of the variable (DOY)
        date1 = 15-aug  # Start date
        date2 = 31-dec  # End date
        on init:
```
 flag = 0
```
        on process:
```
 if (date_within('[date1], [date2]')) then
     

     if ([TempTarget] < [TempValue] and flag = 0) then
        [DOYName] = day
        flag = 1
     endif

 else
 [DOYName] = 0
 flag = 0

 endif
```
      manager WT_script
        on start_of_day:
```
bbc_potential = 390 - 130 ! profile depth minus WR


if AnnualRain > 0 then 
EORRatio = AnnualEO / AnnualRain  ! EO is potential ET theoretical not affected by Rain
endif

RainSurplus = AnnualRain - AnnualEO
```
      outputfile: filename=.out
        variables My Variables
          variables: dd/mm/yyyy as Date, year, CropYield, corn_buac, soy_buac, Bioma, RootDepth, TargetStageDOY as sowDOY, emergDOY, FlowerDate, MaturityDate, Harvest_doy, mintZeroDOY as FallFrostDOY, LAI_maximum, ETAnnual, CropTranspiration, TotalNupt, GrainlNupt, AvgDroughtStress, AvgExcessiveWStress, AvgNStress, AvgWTInseason, DaysWTbelow50cm, EOAnnual, RunoffAnnual, Drainage, NR, GrossMiner, NetMiner, NlossTotal, Denitr, NLeachAnnual, AvgWT, NO3_atHarvest, NO3_atSowing, NO3_30cmHarvest, NO3_30cmSowing, CropYield_kg, SOC_7cm, SOC_22cm, SOC_45cm, SOC_75cm, SOC_105cm, crop_hi, Maize_GrainsNumber, Maize_GrainSize, ResidueWTatSowing, ResidueNatSowing, SoyNfixed, StoverWT, StoverNitrogen, StoverCN, FOM_january, BIOM_january, RootWt_atHarv, RS_ratio, NconcRoot, NHI_crop
        events My Variables Events: event=end_year
      clock
        start_date = 01/01/1991  # Enter the start date of the simulation
        end_date = 31/12/2019  # Enter the end date of the simulation
    folder Ames_Weather
      simulation Ames_weather
        metfile met: filename=Ames.Dec31.2019.met
        clock -> /simulations/Ames/common/clock
        summaryfile
        area paddock
          surfaceom SurfaceOrganicMatter
            PoolName = soybean  # Organic Matter pool name
            type = soybean  # Organic Matter type
            mass = 2000  # Initial surface residue (kg/ha)
            cnr = 45  # C:N ratio of initial residue
            standing_fraction = 0.0  # Fraction of residue standing
          fertiliser
          maize
            ini: filename=XML_corn7.9.xml
          soybean
            ini: filename=XML_soy7.9.xml
          manager WT_script
            on start_of_day:
            script: same as in Ames.common.WT_script
          manager Calculations
            on start_of_day:
```
crop_buac = maize.yield * 0.0159 / 0.85 + soybean.yield * 0.149/0.87


if maxt > 34 then !this is 93 oF
heat = 1
else
heat = 0
endif

if mint < 4.5 then  ! this is 40 oF
cold = 1
else
cold = 0
endif

if rain > 24 then !this is 1 inch
rainy = 1
else
rainy = 0
endif

if rain < 0.01 then 
drought = 1
else
drought = 0
endif

if radn > 20 then 
sunny = 1
else
sunny = 0
endif

if radn < 10 then 
cloudy = 1
else
cloudy = 0
endif

avgT = 0.5 * (mint + maxt)
```
          outputfile: filename=Ames_weather.out; title=Ames_weather
            variables My Variables
              variables: dd/mm/yyyy as Date, year, CropYield, HeatDaysInSeason, ColdDaysInSeason, RainAnnual, RadInSeason, AvgMaxTInSeason, AvgMinTInSeason, GDDInSeason, RainInSeason, RainAprJun, RainAbove1inAprJun, AvgTAprJun, ColdAprJun, HeatJuly, RadJuly, RainJuly, AvgTJuly, RainAbove1inJul, HeatAug, RadAug, RainAug, AvgTAug, RainAbove1inAug, ColdAug, RadSep, RainSep, AvgTSep, RainAbove1inSep, ColdSep, TargetStageDOY as sowDOY
            events My Variables Events: event=end_year
          folder Manager folder
            manager N Deposition
              #
              ppm = 0.0078  # What to multiply rain by?
              # Model side stuff
              varname = N_deposition  # Name of the NO3_N deposition variable as seen by the model
              fertmodule = fertiliser  # Name of module that applies nitrogen
              on start_of_day:
```
         
            [varname] = rain * [ppm]
            N_deposition_tot = N_deposition_tot + [varname]
            if (rain > 0) then
               [fertmodule] apply amount = [varname](kg/ha), depth = 0 (mm), type = NO3_N ()
            endif
```
            manager Fall Tillage
              # When should tillage be done
              tillage_date = 20-nov  # Enter tillage date (dd-mmm)
              # Tillage application details
              surfaceommodule = SurfaceOrganicMatter  # Module used to apply the tillage
              tillage_type = chisel
              tillage_depth = 50  # User_defined depth of seedbed preparation (mm)
              tillage_f_incorp = 0.25  # User_defined fraction of surface residues to incorporate (0-1)
              on start_of_day:
```
         if (today = date('[tillage_date]') then
            if ('[tillage_type]' = 'user_defined') then
                '[surfaceommodule]' tillage type = [tillage_type], f_incorp = [tillage_f_incorp] (), tillage_depth = [tillage_depth]
            else
                '[surfaceommodule]' tillage type = [tillage_type]
            endif
            ready_to_till_pre_sow = 0
            till_day_pre_sow = 0
         endif
```
            manager Spring Tillage
              # When should tillage be done
              tillage_date = 10-apr  # Enter tillage date (dd-mmm)
              # Tillage application details
              surfaceommodule = SurfaceOrganicMatter  # Module used to apply the tillage
              tillage_type = user_defined
              tillage_depth = 100  # User_defined depth of seedbed preparation (mm)
              tillage_f_incorp = 0.40  # User_defined fraction of surface residues to incorporate (0-1)
              on start_of_day:
              script: same as in Ames.Ames_Weather.Ames_weather.paddock.Manager folder.Fall Tillage
            manager Spring Cultivator
              # When should tillage be done
              tillage_date = 20-apr  # Enter tillage date (dd-mmm)
              # Tillage application details
              surfaceommodule = SurfaceOrganicMatter  # Module used to apply the tillage
              tillage_type = user_defined
              tillage_depth = 50  # User_defined depth of seedbed preparation (mm)
              tillage_f_incorp = 0.15  # User_defined fraction of surface residues to incorporate (0-1)
              on start_of_day:
              script: same as in Ames.Ames_Weather.Ames_weather.paddock.Manager folder.Fall Tillage
            operations CC_maize_Nfert
              10/4/1980  ! my notes
              3/5/1999  fertiliser apply  amount = 0 (kg/ha), depth = 50 (mm), type = urea_n
              4/5/2000  fertiliser apply  amount = 0 (kg/ha), depth = 50 (mm), type = urea_n
              1/5/2001  fertiliser apply  amount = 0 (kg/ha), depth = 50 (mm), type = urea_n
              26/4/2002  fertiliser apply  amount = 0 (kg/ha), depth = 50 (mm), type = urea_n
              22/4/2003  fertiliser apply  amount = 0 (kg/ha), depth = 50 (mm), type = urea_n
              15/4/2004  fertiliser apply  amount = 0 (kg/ha), depth = 50 (mm), type = urea_n
              3/5/2005  fertiliser apply  amount = 0 (kg/ha), depth = 50 (mm), type = urea_n
              4/5/2006  fertiliser apply  amount = 0 (kg/ha), depth = 50 (mm), type = urea_n
              1/5/2007  fertiliser apply  amount = 0 (kg/ha), depth = 50 (mm), type = urea_n
              6/5/2008  fertiliser apply  amount = 0 (kg/ha), depth = 50 (mm), type = urea_n
              12/5/2009  fertiliser apply  amount = 0 (kg/ha), depth = 50 (mm), type = UAN_N
              5/5/2010  fertiliser apply  amount = 0 (kg/ha), depth = 50 (mm), type = UAN_N
              19/5/2011  fertiliser apply  amount = 0 (kg/ha), depth = 50 (mm), type = UAN_N
              10/5/2012  fertiliser apply  amount = 0 (kg/ha), depth = 50 (mm), type = UAN_N
              13/6/2013  fertiliser apply  amount = 0 (kg/ha), depth = 50 (mm), type = UAN_N
              6/5/2014  fertiliser apply  amount = 0 (kg/ha), depth = 50 (mm), type = urea_n
              18/5/2015  fertiliser apply  amount = 0 (kg/ha), depth = 50 (mm), type = urea_n
              6/5/2016  fertiliser apply  amount = 0 (kg/ha), depth = 50 (mm), type = UAN_N
            operations CC_corn_planitng
              5/5/1980  ! this is the maize of the maize-soy rotation in Ames
              19/5/1999  maize sow plants=7.9, sowing_depth=50,cultivar=psims_107RM, row_spacing=760,crop_class=maize ! Pioneer 34G81 (107 d relative maturity)
              5/5/2000  maize sow plants=7.4, sowing_depth=50,cultivar=psims_107RM, row_spacing=760,crop_class=maizev! Pioneer 34G81 (107 d)
              9/5/2001  maize sow plants=7.5, sowing_depth=50,cultivar=psims_103RM, row_spacing=760,crop_class=maize !Pioneer P34G13 (103?)
              3/5/2002  maize sow plants=7.9, sowing_depth=50,cultivar=psims_105RM, row_spacing=760,crop_class=maize ! Dekalb 55-51 RR/YGCB (105 d)
              29/4/2003  maize sow plants=7.9, sowing_depth=50,cultivar=psims_108RM, row_spacing=760,crop_class=maize ! Dekalb 58-24 RR/YGCB (108 d)
              27/4/2004  maize sow plants=8.0, sowing_depth=50,cultivar=psims_107RM, row_spacing=760,crop_class=maize ! Dekalb 57-81 RR/YGCB (107 d)
              5/5/2005  maize sow plants=8.0, sowing_depth=50,cultivar=psims_106RM, row_spacing=760,crop_class=maize ! Pioneer 35Y62 HXX/RR2/LL (106 d)
              9/5/2006  maize sow plants=8.0, sowing_depth=50,cultivar=psims_106RM,row_spacing=760,crop_class=maize ! Pioneer 35Y61 (106 d)
              13/5/2007  maize sow plants=8.0, sowing_depth=50,cultivar=psims_109RM,row_spacing=760,crop_class=maize ! Pioneer 34A20 (HXX/RR2/LL) (109 d)
              14/5/2008  maize sow plants=7.4, sowing_depth=50,cultivar=psims_111RM,row_spacing=760,crop_class=maize ! Dekalb DKC61-69 (111 d)
              5/5/2009  maize sow plants=8.0, sowing_depth=50,cultivar=psims_105RM, row_spacing=760,crop_class=maize ! Pioneer 35K33 (HXX/RR2/LL) (105 d)
              29/4/2010  maize sow plants=8.0, sowing_depth=50,cultivar=psims_105RM, row_spacing=760,crop_class=maize ! Pioneer 35F44 (HXX/RR2/LL) (105 d)
              11/5/2011  maize sow plants=7.9, sowing_depth=50,cultivar=psims_106RM,row_spacing=760,crop_class=maize ! Fontanelle 6T510 (106 d)
              10/5/2012  maize sow plants=7.9, sowing_depth=50,cultivar=psims_105RM, row_spacing=760,crop_class=maize ! Pioneer P0528XR (HXX/LL/RR2) (105 d)
              24/5/2013  maize sow plants=7.9, sowing_depth=50,cultivar=psims_104RM, row_spacing=760,crop_class=maize ! Pioneer 0461XR (HXX/LL/RR2) (104 d)
              7/5/2014  maize sow plants=7.9, sowing_depth=50,cultivar=psims_105RM, row_spacing=760,crop_class=maize ! Pioneer 0591AMX (105 d)
              13/5/2015  maize sow plants=8.9, sowing_depth=50,cultivar=psims_107RM, row_spacing=760,crop_class=maize ! FS 57QX1 RIB (107)
              27/4/2016  maize sow plants=8.6, sowing_depth=50,cultivar=psims_105RM,row_spacing=760,crop_class=maize ! Pioneer P0570AMXT (105 d)
            operations CC_harvest
              5/5/1980  ! ask isaiah probably you need to put both end_crop and then harvest
              21/10/1999  maize end_crop
              21/10/1999  maize harvest
              26/9/2000  maize end_crop
              26/9/2000  maize harvest
              15/10/2001  maize end_crop
              15/10/2001  maize harvest
              8/10/2002  maize end_crop
              8/10/2002  maize harvest
              21/10/2003  maize end_crop
              21/10/2003  maize harvest
              12/10/2004  maize end_crop
              12/10/2004  maize harvest
              17/10/2005  maize end_crop
              17/10/2005  maize harvest
              19/10/2006  maize end_crop
              19/10/2006  maize harvest
              11/10/2007  maize end_crop
              11/10/2007  maize harvest
              3/11/2008  maize end_crop
              3/11/2008  maize harvest
              13/10/2009  maize end_crop
              13/10/2009  maize harvest
              7/10/2010  maize end_crop
              7/10/2010  maize harvest
              20/10/2011  maize end_crop
              20/10/2011  maize harvest
              4/10/2012  maize end_crop
              4/10/2012  maize harvest
              8/10/2013  maize end_crop
              8/10/2013  maize harvest
              17/10/2014  maize end_crop
              17/10/2014  maize harvest
              7/10/2015  maize end_crop
              7/10/2015  maize harvest
              11/10/2016  maize end_crop
              11/10/2016  maize harvest
            manager Harvest maize
              # Harvesting criteria
              crop = maize  # Enter name of crop to harvest when ripe
              on end_of_day:
```
           if ('[crop]' = 'cotton') then
              if ([crop].ozcot_status > 0) then
                  [crop] harvest
              endif
           elseif ([crop].StageName = 'harvest_ripe' or [crop].plant_status = 'dead') then
              [crop]  harvest
              [crop]  end_crop
           endif
```
          manager2 InitialiseWaterTableOnce: same as Ames.common.InitialiseWaterTableOnce
          manager2 Reporter_Annual
            date = 1-jan  # Date for the special report
            date2 = 31-dec  # date for second one
```csharp
using System;
using ModelFramework;
using CSGeneral;

public class Script 
{      
   [Link] Paddock MyPaddock; // Can be used to dynamically get access to simulation structure and variables
   [Input] DateTime Today;   // Equates to the value of the current simulation date - value comes from CLOCK
   [Param] string date;         // The value for this will come from the Properties page.
   [Param] string date2;
   
   [Event] public event NullTypeDelegate SpecialReport50;
   [Event] public event NullTypeDelegate SpecialReport60;

   
   // The following event handler will be called once at the beginning of the simulation
   [EventHandler] public void OnInitialised()
   {
      
   }
      
   // The following event handler will be called each day at the beginning of the day
   [EventHandler] public void OnPrepare()
   {
      if (DateUtility.DatesEqual(date, Today))
         SpecialReport50.Invoke();
      
      if (DateUtility.DatesEqual(date2, Today))
         SpecialReport60.Invoke();
   }
   
}
```
          manager2 Reporter_AprJun
            date = 1-apr  # Date for the special report
            date2 = 30-jun  # date for second one
```csharp
using System;
using ModelFramework;
using CSGeneral;

public class Script 
{      
   [Link] Paddock MyPaddock; // Can be used to dynamically get access to simulation structure and variables
   [Input] DateTime Today;   // Equates to the value of the current simulation date - value comes from CLOCK
   [Param] string date;         // The value for this will come from the Properties page.
   [Param] string date2;
   
   [Event] public event NullTypeDelegate SpecialReport7;
   [Event] public event NullTypeDelegate SpecialReport8;

   
   // The following event handler will be called once at the beginning of the simulation
   [EventHandler] public void OnInitialised()
   {
      
   }
      
   // The following event handler will be called each day at the beginning of the day
   [EventHandler] public void OnPrepare()
   {
      if (DateUtility.DatesEqual(date, Today))
         SpecialReport7.Invoke();
      
      if (DateUtility.DatesEqual(date2, Today))
         SpecialReport8.Invoke();
   }
   
}
```
          manager2 Reporter_July
            date = 1-jul  # Date for the special report
            date2 = 30-jul  # date for second one
```csharp
using System;
using ModelFramework;
using CSGeneral;

public class Script 
{      
   [Link] Paddock MyPaddock; // Can be used to dynamically get access to simulation structure and variables
   [Input] DateTime Today;   // Equates to the value of the current simulation date - value comes from CLOCK
   [Param] string date;         // The value for this will come from the Properties page.
   [Param] string date2;
   
   [Event] public event NullTypeDelegate SpecialReport9;
   [Event] public event NullTypeDelegate SpecialReport10;

   
   // The following event handler will be called once at the beginning of the simulation
   [EventHandler] public void OnInitialised()
   {
      
   }
      
   // The following event handler will be called each day at the beginning of the day
   [EventHandler] public void OnPrepare()
   {
      if (DateUtility.DatesEqual(date, Today))
         SpecialReport9.Invoke();
      
      if (DateUtility.DatesEqual(date2, Today))
         SpecialReport10.Invoke();
   }
   
}
```
          manager2 Reporter_August
            date = 1-aug  # Date for the special report
            date2 = 30-aug  # date for second one
```csharp
using System;
using ModelFramework;
using CSGeneral;

public class Script 
{      
   [Link] Paddock MyPaddock; // Can be used to dynamically get access to simulation structure and variables
   [Input] DateTime Today;   // Equates to the value of the current simulation date - value comes from CLOCK
   [Param] string date;         // The value for this will come from the Properties page.
   [Param] string date2;
   
   [Event] public event NullTypeDelegate SpecialReport2;
   [Event] public event NullTypeDelegate SpecialReport3;

   
   // The following event handler will be called once at the beginning of the simulation
   [EventHandler] public void OnInitialised()
   {
      
   }
      
   // The following event handler will be called each day at the beginning of the day
   [EventHandler] public void OnPrepare()
   {
      if (DateUtility.DatesEqual(date, Today))
         SpecialReport2.Invoke();
      
      if (DateUtility.DatesEqual(date2, Today))
         SpecialReport3.Invoke();
   }
   
}
```
          manager2 Reporter_Sept
            date = 1-sep  # Date for the special report
            date2 = 30-sep  # date for second one
```csharp
using System;
using ModelFramework;
using CSGeneral;

public class Script 
{      
   [Link] Paddock MyPaddock; // Can be used to dynamically get access to simulation structure and variables
   [Input] DateTime Today;   // Equates to the value of the current simulation date - value comes from CLOCK
   [Param] string date;         // The value for this will come from the Properties page.
   [Param] string date2;
   
   [Event] public event NullTypeDelegate SpecialReport4;
   [Event] public event NullTypeDelegate SpecialReport5;

   
   // The following event handler will be called once at the beginning of the simulation
   [EventHandler] public void OnInitialised()
   {
      
   }
      
   // The following event handler will be called each day at the beginning of the day
   [EventHandler] public void OnPrepare()
   {
      if (DateUtility.DatesEqual(date, Today))
         SpecialReport4.Invoke();
      
      if (DateUtility.DatesEqual(date2, Today))
         SpecialReport5.Invoke();
   }
   
}
```
          tracker
            variable:
              maximum of crop_buac on end_of_day from SpecialReport50 to SpecialReport60 as CropYield
              sum of heat on end_of_day from sowing to harvesting as HeatDaysInSeason
              sum of cold on end_of_day from sowing to harvesting as ColdDaysInSeason
              sum of rain on end_of_day from SpecialReport50 to SpecialReport60 as RainAnnual
              sum of radn on end_of_day from sowing to harvesting as RadInSeason
              average of maxt on end_of_day from sowing to harvesting as AvgMaxTInSeason
              average of mint on end_of_day from sowing to harvesting as AvgMinTInSeason
              sum of maize.tt on end_of_day from sowing to harvesting as GDDInSeason
              sum of rain on end_of_day from sowing to harvesting as RainInSeason
              sum of rain on end_of_day from SpecialReport7 to SpecialReport8 as RainAprJun
              sum of rainy on end_of_day from SpecialReport7 to SpecialReport8 as RainAbove1inAprJun
              average of avgT on end_of_day from SpecialReport7 to SpecialReport8 as AvgTAprJun
              sum of heat on end_of_day from SpecialReport9 to SpecialReport10 as HeatJuly
              sum of radn on end_of_day from SpecialReport9 to SpecialReport10 as RadJuly
              sum of rain on end_of_day from SpecialReport9 to SpecialReport10 as RainJuly
              average of avgT on end_of_day from SpecialReport9 to SpecialReport10 as AvgTJuly
              sum of rainy on end_of_day from SpecialReport9 to SpecialReport10 as RainAbove1inJul
              sum of heat on end_of_day from SpecialReport2 to SpecialReport3 as HeatAug
              sum of radn on end_of_day from SpecialReport2 to SpecialReport3 as RadAug
              sum of rain on end_of_day from SpecialReport2 to SpecialReport3 as RainAug
              average of avgT on end_of_day from SpecialReport2 to SpecialReport3 as AvgTAug
              sum of rainy on end_of_day from SpecialReport2 to SpecialReport3 as RainAbove1inAug
              sum of cold on end_of_day from SpecialReport2 to SpecialReport3 as ColdAug
              sum of radn on end_of_day from SpecialReport4 to SpecialReport5 as RadSep
              sum of rain on end_of_day from SpecialReport4 to SpecialReport5 as RainSep
              average of avgT on end_of_day from SpecialReport4 to SpecialReport5 as AvgTSep
              sum of rainy on end_of_day from SpecialReport4 to SpecialReport5 as RainAbove1inSep
              sum of cold on end_of_day from SpecialReport4 to SpecialReport5 as ColdSep
              sum of cold on end_of_day from SpecialReport7 to SpecialReport8 as ColdAprJun
          manager Stage Day Info: same as Ames.common.Stage Day Info
          manager2 Stage Day of Year: same as Ames.common.Stage Day of Year
          manager Temperature Day Info: same as Ames.common.Temperature Day Info
          manager2 Reporter_Annual1 -> /simulations/Ames/common/Reporter_Annual
          Soil Soil_Ames1 -> /simulations/Ames/common/Soil_Ames
    folder CC_270_base
      simulation CC_270_base
        metfile met: filename=Ames.Dec31.2019.met
        clock -> /simulations/Ames/common/clock
        summaryfile
        area paddock
          fertiliser
          maize
            ini: filename=XML_corn7.9.xml
          soybean
            ini: filename=XML_soy7.9.xml
          folder Manager folder
            manager N Deposition: same as Ames.Ames_Weather.Ames_weather.paddock.Manager folder.N Deposition
            manager fall tillage: same as Ames.Ames_Weather.Ames_weather.paddock.Manager folder.Fall Tillage
            manager Spring Tillage: same as Ames.Ames_Weather.Ames_weather.paddock.Manager folder.Spring Tillage
            manager Spring Cultivator: same as Ames.Ames_Weather.Ames_weather.paddock.Manager folder.Spring Cultivator
            operations CC_maize_Nfert
              10/4/1980  ! my notes
              3/5/1999  fertiliser apply  amount = 270 (kg/ha), depth = 50 (mm), type = urea_n
              4/5/2000  fertiliser apply  amount = 270 (kg/ha), depth = 50 (mm), type = urea_n
              1/5/2001  fertiliser apply  amount = 270 (kg/ha), depth = 50 (mm), type = urea_n
              26/4/2002  fertiliser apply  amount = 270 (kg/ha), depth = 50 (mm), type = urea_n
              22/4/2003  fertiliser apply  amount = 270 (kg/ha), depth = 50 (mm), type = urea_n
              15/4/2004  fertiliser apply  amount = 270 (kg/ha), depth = 50 (mm), type = urea_n
              3/5/2005  fertiliser apply  amount = 270 (kg/ha), depth = 50 (mm), type = urea_n
              4/5/2006  fertiliser apply  amount = 270 (kg/ha), depth = 50 (mm), type = urea_n
              1/5/2007  fertiliser apply  amount = 270 (kg/ha), depth = 50 (mm), type = urea_n
              6/5/2008  fertiliser apply  amount = 270 (kg/ha), depth = 50 (mm), type = urea_n
              12/5/2009  fertiliser apply  amount = 270 (kg/ha), depth = 50 (mm), type = UAN_N
              5/5/2010  fertiliser apply  amount = 270 (kg/ha), depth = 50 (mm), type = UAN_N
              19/5/2011  fertiliser apply  amount = 270 (kg/ha), depth = 50 (mm), type = UAN_N
              10/5/2012  fertiliser apply  amount = 270 (kg/ha), depth = 50 (mm), type = UAN_N
              13/6/2013  fertiliser apply  amount = 270 (kg/ha), depth = 50 (mm), type = UAN_N
              6/5/2014  fertiliser apply  amount = 270 (kg/ha), depth = 50 (mm), type = urea_n
              18/5/2015  fertiliser apply  amount = 270 (kg/ha), depth = 50 (mm), type = urea_n
              6/5/2016  fertiliser apply  amount = 270 (kg/ha), depth = 50 (mm), type = UAN_N
              6/5/2017  fertiliser apply  amount = 0 (kg/ha), depth = 50 (mm), type = UAN_N
              6/5/2018  fertiliser apply  amount = 0 (kg/ha), depth = 50 (mm), type = UAN_N
              10/7/2019  fertiliser apply  amount = 270 (kg/ha), depth = 50 (mm), type = UAN_N
                ! start up period
              24/4/1992  fertiliser apply  amount = 170 (kg/ha), depth = 50 (mm), type = urea_n
              24/4/1994  fertiliser apply  amount = 170 (kg/ha), depth = 50 (mm), type = urea_n
              24/4/1996  fertiliser apply  amount = 170 (kg/ha), depth = 50 (mm), type = urea_n
              24/4/1998  fertiliser apply  amount = 170 (kg/ha), depth = 50 (mm), type = urea_n
            operations CC_corn_planitng
              5/5/1980  ! this is the maize of the maize-soy rotation in Ames
              19/5/1999  maize sow plants=7.9, sowing_depth=50,cultivar=psims_107RM, row_spacing=760,crop_class=maize ! Pioneer 34G81 (107 d relative maturity)
              5/5/2000  maize sow plants=7.4, sowing_depth=50,cultivar=psims_AmesHail, row_spacing=760,crop_class=maizev! Pioneer 34G81 (107 d)
              9/5/2001  maize sow plants=7.5, sowing_depth=50,cultivar=psims_103RM, row_spacing=760,crop_class=maize !Pioneer P34G13 (103?)
              3/5/2002  maize sow plants=7.9, sowing_depth=50,cultivar=psims_105RM, row_spacing=760,crop_class=maize ! Dekalb 55-51 RR/YGCB (105 d)
              29/4/2003  maize sow plants=7.8, sowing_depth=50,cultivar=psims_108RM, row_spacing=760,crop_class=maize ! Dekalb 58-24 RR/YGCB (108 d)
              27/4/2004  maize sow plants=8.0, sowing_depth=50,cultivar=psims_107RM, row_spacing=760,crop_class=maize ! Dekalb 57-81 RR/YGCB (107 d)
              5/5/2005  maize sow plants=8.0, sowing_depth=50,cultivar=psims_106RM, row_spacing=760,crop_class=maize ! Pioneer 35Y62 HXX/RR2/LL (106 d)
              9/5/2006  maize sow plants=8.0, sowing_depth=50,cultivar=psims_106RM,row_spacing=760,crop_class=maize ! Pioneer 35Y61 (106 d)
              13/5/2007  maize sow plants=8.0, sowing_depth=50,cultivar=psims_109RM,row_spacing=760,crop_class=maize ! Pioneer 34A20 (HXX/RR2/LL) (109 d)
              14/5/2008  maize sow plants=7.4, sowing_depth=50,cultivar=psims_111RM,row_spacing=760,crop_class=maize ! Dekalb DKC61-69 (111 d)
              5/5/2009  maize sow plants=8.0, sowing_depth=50,cultivar=psims_105RM, row_spacing=760,crop_class=maize ! Pioneer 35K33 (HXX/RR2/LL) (105 d)
              29/4/2010  maize sow plants=8.0, sowing_depth=50,cultivar=psims_105RM, row_spacing=760,crop_class=maize ! Pioneer 35F44 (HXX/RR2/LL) (105 d)
              11/5/2011  maize sow plants=7.9, sowing_depth=50,cultivar=psims_106RM,row_spacing=760,crop_class=maize ! Fontanelle 6T510 (106 d)
              10/5/2012  maize sow plants=7.9, sowing_depth=50,cultivar=psims_105RM, row_spacing=760,crop_class=maize ! Pioneer P0528XR (HXX/LL/RR2) (105 d)
              24/5/2013  maize sow plants=7.9, sowing_depth=50,cultivar=psims_AmesHail, row_spacing=760,crop_class=maize ! Pioneer 0461XR (HXX/LL/RR2) (104 d)
              7/5/2014  maize sow plants=7.9, sowing_depth=50,cultivar=psims_105RM, row_spacing=760,crop_class=maize ! Pioneer 0591AMX (105 d)
              13/5/2015  maize sow plants=8.9, sowing_depth=50,cultivar=psims_107RM, row_spacing=760,crop_class=maize ! FS 57QX1 RIB (107)
              27/4/2016  maize sow plants=8.6, sowing_depth=50,cultivar=psims_105RM,row_spacing=760,crop_class=maize ! Pioneer P0570AMXT (105 d)
              1/5/2017  maize sow plants=8.6, sowing_depth=50,cultivar=psims_105RM,row_spacing=760,crop_class=maize ! Pioneer P0570AMXT (105 d)
              1/5/2018  maize sow plants=8.6, sowing_depth=50,cultivar=psims_105RM,row_spacing=760,crop_class=maize ! Pioneer P0570AMXT (105 d)
              5/6/2019  maize sow plants=8.6, sowing_depth=50,cultivar=psims_105RM,row_spacing=760,crop_class=maize ! Pioneer P0570AMXT (105 d)
                ! start up period
              1/5/1991  soybean sow plants=40.5,sowing_depth=50,cultivar=psims_24MG,row_spacing=760,crop_class=plant
              1/5/1992  maize sow plants=7.9, sowing_depth=50,cultivar=psims_106RM, row_spacing=760,crop_class=maize
              1/5/1993  soybean sow plants=40.5,sowing_depth=50,cultivar=psims_24MG,row_spacing=760,crop_class=plant
              1/5/1994  maize sow plants=7.9, sowing_depth=50,cultivar=psims_106RM, row_spacing=760,crop_class=maize
              1/5/1995  soybean sow plants=40.5,sowing_depth=50,cultivar=psims_24MG,row_spacing=760,crop_class=plant
              1/5/1996  maize sow plants=7.9, sowing_depth=50,cultivar=psims_106RM, row_spacing=760,crop_class=maize
              1/5/1997  soybean sow plants=40.5,sowing_depth=50,cultivar=psims_24MG,row_spacing=760,crop_class=plant
              1/5/1998  maize sow plants=7.9, sowing_depth=50,cultivar=psims_106RM, row_spacing=760,crop_class=maize
            operations CC_harvest
              5/5/1980  ! ask isaiah probably you need to put both end_crop and then harvest
              21/10/1999  maize harvest
              21/10/1999  maize end_crop
              26/9/2000  maize harvest
              26/9/2000  maize end_crop
              15/10/2001  maize harvest
              15/10/2001  maize end_crop
              8/10/2002  maize harvest
              8/10/2002  maize end_crop
              21/10/2003  maize harvest
              21/10/2003  maize end_crop
              12/10/2004  maize harvest
              12/10/2004  maize end_crop
              17/10/2005  maize harvest
              17/10/2005  maize end_crop
              19/10/2006  maize harvest
              19/10/2006  maize end_crop
              11/10/2007  maize harvest
              11/10/2007  maize end_crop
              3/11/2008  maize harvest
              3/11/2008  maize end_crop
              13/10/2009  maize harvest
              13/10/2009  maize end_crop
              7/10/2010  maize harvest
              7/10/2010  maize end_crop
              20/10/2011  maize harvest
              20/10/2011  maize end_crop
              4/10/2012  maize harvest
              4/10/2012  maize end_crop
              8/10/2013  maize harvest
              8/10/2013  maize end_crop
              17/10/2014  maize harvest
              17/10/2014  maize end_crop
              7/10/2015  maize harvest
              7/10/2015  maize end_crop
              11/10/2016  maize harvest
              11/10/2016  maize end_crop
              11/10/2017  maize harvest
              11/10/2017  maize end_crop
              11/10/2018  maize harvest
              11/10/2018  maize end_crop
              6/11/2019  maize harvest
              6/11/2019  maize end_crop
                ! start up period
              20/10/1991  soybean harvest
              20/10/1991  soybean end_crop
              20/10/1992  maize harvest
              20/10/1992  maize end_crop
              20/10/1993  soybean harvest
              20/10/1993  soybean end_crop
              20/10/1994  maize harvest
              20/10/1994  maize end_crop
              20/10/1995  soybean harvest
              20/10/1995  soybean end_crop
              20/10/1996  maize harvest
              20/10/1996  maize end_crop
              20/10/1997  soybean harvest
              20/10/1997  soybean end_crop
              20/10/1998  maize harvest
              20/10/1998  maize end_crop
          manager Calculations -> /simulations/Ames/common/Calculations
          tracker -> /simulations/Ames/common/tracker
          manager2 Stage Day of Year -> /simulations/Ames/common/Stage Day of Year
          manager Stage Day Info -> /simulations/Ames/common/Stage Day Info
          manager2 InitialiseWaterTableOnce -> /simulations/Ames/common/InitialiseWaterTableOnce
          manager2 Reporter_Annual -> /simulations/Ames/common/Reporter_Annual
          manager Temperature Day Info -> /simulations/Ames/common/Temperature Day Info
          manager WT_script -> /simulations/Ames/common/WT_script
          outputfile -> /simulations/Ames/common/outputfile: filename=CC_270_base.out; title=CC_270_base
            variables My Variables -> /simulations/Ames/common/outputfile/My Variables
            events My Variables Events -> /simulations/Ames/common/outputfile/My Variables Events
          Soil Soil_Ames1 -> /simulations/Ames/common/Soil_Ames
          surfaceom SurfaceOrganicMatter -> /simulations/Ames/common/SurfaceOrganicMatter
    folder CS_270_base
      simulation CS_270_base
        metfile met: filename=Ames.Dec31.2019.met
        clock -> /simulations/Ames/common/clock
        summaryfile
        area paddock
          fertiliser
          maize
            ini: filename=XML_corn7.9.xml
          soybean
            ini: filename=XML_soy7.9.xml
          folder Manager folder
            manager N Deposition: same as Ames.Ames_Weather.Ames_weather.paddock.Manager folder.N Deposition
            manager fall tillage
              # When should tillage be done
              tillage_date = 20-nov  # Enter tillage date (dd-mmm)
              # Tillage application details
              surfaceommodule = SurfaceOrganicMatter  # Module used to apply the tillage
              tillage_type = user_defined
              tillage_depth = 50  # User_defined depth of seedbed preparation (mm)
              tillage_f_incorp = 0.25  # User_defined fraction of surface residues to incorporate (0-1)
              on start_of_day:
              script: same as in Ames.Ames_Weather.Ames_weather.paddock.Manager folder.Fall Tillage
            manager Spring Tillage: same as Ames.Ames_Weather.Ames_weather.paddock.Manager folder.Spring Tillage
            manager Spring Cultivator: same as Ames.Ames_Weather.Ames_weather.paddock.Manager folder.Spring Cultivator
            operations CS_maize_Nfert
              10/4/1980  ! my notes
              3/5/1999  fertiliser apply  amount = 270 (kg/ha), depth = 50 (mm), type = urea_n
              1/5/2001  fertiliser apply  amount = 270 (kg/ha), depth = 50 (mm), type = urea_n
              22/4/2003  fertiliser apply  amount = 270 (kg/ha), depth = 50 (mm), type = urea_n
              3/5/2005  fertiliser apply  amount = 270 (kg/ha), depth = 50 (mm), type = urea_n
              1/5/2007  fertiliser apply  amount = 270 (kg/ha), depth = 50 (mm), type = urea_n
              12/5/2009  fertiliser apply  amount = 270 (kg/ha), depth = 50 (mm), type = UAN_N
              19/5/2011  fertiliser apply  amount = 270 (kg/ha), depth = 50 (mm), type = UAN_N
              13/6/2013  fertiliser apply  amount = 270 (kg/ha), depth = 50 (mm), type = UAN_N
              18/5/2015  fertiliser apply  amount = 270 (kg/ha), depth = 50 (mm), type = urea_n
              6/5/2017  fertiliser apply  amount = 0 (kg/ha), depth = 50 (mm), type = UAN_N
              6/5/2018  fertiliser apply  amount = 0 (kg/ha), depth = 50 (mm), type = UAN_N
              10/7/2019  fertiliser apply  amount = 270 (kg/ha), depth = 50 (mm), type = urea_n
                ! start up period
              24/4/1992  fertiliser apply  amount = 170 (kg/ha), depth = 50 (mm), type = urea_n
              24/4/1994  fertiliser apply  amount = 170 (kg/ha), depth = 50 (mm), type = urea_n
              24/4/1996  fertiliser apply  amount = 170 (kg/ha), depth = 50 (mm), type = urea_n
              24/4/1998  fertiliser apply  amount = 170 (kg/ha), depth = 50 (mm), type = urea_n
            operations CS_soy_planitng
              5/5/1980  ! this is the maize of the maize-soy rotation in Ames
              5/5/2000  soybean sow plants=37.1,sowing_depth=50,cultivar=psims_22MG,row_spacing=760,crop_class=plant
              3/5/2002  soybean sow plants=37.1,sowing_depth=50,cultivar=psims_24MG,row_spacing=760,crop_class=plant
              11/5/2004  soybean sow plants=39.8,sowing_depth=50,cultivar=psims_28MG,row_spacing=760,crop_class=plant
              18/5/2006  soybean sow plants=39.8,sowing_depth=50,cultivar=psims_30MG,row_spacing=760,crop_class=plant
              20/5/2008  soybean sow plants=37.1,sowing_depth=50,cultivar=psims_26MG,row_spacing=760,crop_class=plant
              6/5/2010  soybean sow plants=39.8,sowing_depth=50,cultivar=psims_22MG,row_spacing=760,crop_class=plant
              15/5/2012  soybean sow plants=37.1,sowing_depth=50,cultivar=psims_26MG,row_spacing=760,crop_class=plant
              20/5/2014  soybean sow plants=40.5,sowing_depth=50,cultivar=psims_24MG,row_spacing=760,crop_class=plant
              17/5/2016  soybean sow plants=34.6,sowing_depth=50,cultivar=psims_22MG,row_spacing=760,crop_class=plant
            operations CS_corn_planitng
              5/5/1980  ! this is the maize of the maize-soy rotation in Ames
              19/5/1999  maize sow plants=7.9, sowing_depth=50,cultivar=psims_107RM, row_spacing=760,crop_class=maize ! Pioneer 34G81 (107 d relative maturity)
              9/5/2001  maize sow plants=7.5, sowing_depth=50,cultivar=psims_103RM, row_spacing=760,crop_class=maize !Pioneer P34G13 (103?)
              29/4/2003  maize sow plants=7.9, sowing_depth=50,cultivar=psims_108RM, row_spacing=760,crop_class=maize ! Dekalb 58-24 RR/YGCB (108 d)
              5/5/2005  maize sow plants=8.0, sowing_depth=50,cultivar=psims_106RM, row_spacing=760,crop_class=maize ! Pioneer 35Y62 HXX/RR2/LL (106 d)
              13/5/2007  maize sow plants=8.0, sowing_depth=50,cultivar=psims_109RM,row_spacing=760,crop_class=maize ! Pioneer 34A20 (HXX/RR2/LL) (109 d)
              5/5/2009  maize sow plants=8.0, sowing_depth=50,cultivar=psims_105RM, row_spacing=760,crop_class=maize ! Pioneer 35K33 (HXX/RR2/LL) (105 d)
              11/5/2011  maize sow plants=7.8, sowing_depth=50,cultivar=psims_106RM,row_spacing=760,crop_class=maize ! Fontanelle 6T510 (106 d)
              24/5/2013  maize sow plants=7.9, sowing_depth=50,cultivar=psims_AmesHail, row_spacing=760,crop_class=maize ! Pioneer 0461XR (HXX/LL/RR2) (104 d)
              13/5/2015  maize sow plants=8.9, sowing_depth=50,cultivar=psims_107RM, row_spacing=760,crop_class=maize ! FS 57QX1 RIB (107)
              1/5/2017  maize sow plants=8.9, sowing_depth=50,cultivar=psims_107RM, row_spacing=760,crop_class=maize ! FS 57QX1 RIB (107)
              1/5/2018  maize sow plants=8.9, sowing_depth=50,cultivar=psims_107RM, row_spacing=760,crop_class=maize ! FS 57QX1 RIB (107)
              5/6/2019  maize sow plants=8.9, sowing_depth=50,cultivar=psims_107RM, row_spacing=760,crop_class=maize ! FS 57QX1 RIB (107)
                ! start up period
              1/5/1991  soybean sow plants=40.5,sowing_depth=50,cultivar=psims_24MG,row_spacing=760,crop_class=plant
              1/5/1992  maize sow plants=7.9, sowing_depth=50,cultivar=psims_106RM, row_spacing=760,crop_class=maize
              1/5/1993  soybean sow plants=40.5,sowing_depth=50,cultivar=psims_24MG,row_spacing=760,crop_class=plant
              1/5/1994  maize sow plants=7.9, sowing_depth=50,cultivar=psims_106RM, row_spacing=760,crop_class=maize
              1/5/1995  soybean sow plants=40.5,sowing_depth=50,cultivar=psims_24MG,row_spacing=760,crop_class=plant
              1/5/1996  maize sow plants=7.9, sowing_depth=50,cultivar=psims_106RM, row_spacing=760,crop_class=maize
              1/5/1997  soybean sow plants=40.5,sowing_depth=50,cultivar=psims_24MG,row_spacing=760,crop_class=plant
              1/5/1998  maize sow plants=7.9, sowing_depth=50,cultivar=psims_106RM, row_spacing=760,crop_class=maize
            operations CS_harvest
              5/5/1980  ! ask isaiah probably you need to put both end_crop and then harvest
              21/10/1999  maize harvest
              21/10/1999  maize end_crop
              12/10/2000  soybean harvest
              12/10/2000  soybean end_crop
              15/10/2001  maize end_crop
              15/10/2001  maize harvest
              9/10/2002  soybean harvest
              9/10/2002  soybean end_crop
              21/10/2003  maize harvest
              21/10/2003  maize end_crop
              28/9/2004  soybean harvest
              28/9/2004  soybean end_crop
              17/10/2005  maize harvest
              17/10/2005  maize end_crop
              20/10/2006  soybean harvest
              20/10/2006  soybean end_crop
              11/10/2007  maize harvest
              11/10/2007  maize end_crop
              1/10/2008  soybean harvest
              1/10/2008  soybean end_crop
              13/10/2009  maize harvest
              13/10/2009  maize end_crop
              30/9/2010  soybean harvest
              30/9/2010  soybean end_crop
              20/10/2011  maize harvest
              20/10/2011  maize end_crop
              12/10/2012  soybean harvest
              12/10/2012  soybean end_crop
              8/10/2013  maize harvest
              8/10/2013  maize end_crop
              7/10/2014  soybean harvest
              7/10/2014  soybean end_crop
              7/10/2015  maize harvest
              7/10/2015  maize end_crop
              4/10/2016  soybean harvest
              4/10/2016  soybean end_crop
              7/10/2017  maize harvest
              7/10/2017  maize end_crop
              7/10/2018  maize harvest
              7/10/2018  maize end_crop
              6/11/2019  maize harvest
              6/11/2019  maize end_crop
                ! start up period
              20/10/1991  soybean harvest
              20/10/1991  soybean end_crop
              20/10/1992  maize harvest
              20/10/1992  maize end_crop
              20/10/1993  soybean harvest
              20/10/1993  soybean end_crop
              20/10/1994  maize harvest
              20/10/1994  maize end_crop
              20/10/1995  soybean harvest
              20/10/1995  soybean end_crop
              20/10/1996  maize harvest
              20/10/1996  maize end_crop
              20/10/1997  soybean harvest
              20/10/1997  soybean end_crop
              20/10/1998  maize harvest
              20/10/1998  maize end_crop
          manager Calculations -> /simulations/Ames/common/Calculations
          tracker -> /simulations/Ames/common/tracker
          manager2 Stage Day of Year -> /simulations/Ames/common/Stage Day of Year
          manager Stage Day Info -> /simulations/Ames/common/Stage Day Info
          manager2 InitialiseWaterTableOnce -> /simulations/Ames/common/InitialiseWaterTableOnce
          manager2 Reporter_Annual -> /simulations/Ames/common/Reporter_Annual
          manager Temperature Day Info -> /simulations/Ames/common/Temperature Day Info
          manager WT_script -> /simulations/Ames/common/WT_script
          outputfile -> /simulations/Ames/common/outputfile: filename=CS_270_base.out; title=CS_270_base
            variables My Variables -> /simulations/Ames/common/outputfile/My Variables
            events My Variables Events -> /simulations/Ames/common/outputfile/My Variables Events
          Soil Soil_Ames1 -> /simulations/Ames/common/Soil_Ames
          surfaceom SurfaceOrganicMatter -> /simulations/Ames/common/SurfaceOrganicMatter
    folder SC_270_base
      simulation SC_270_base
        metfile met: filename=Ames.Dec31.2019.met
        clock -> /simulations/Ames/common/clock
        summaryfile
        area paddock
          fertiliser
          maize
            ini: filename=XML_corn7.9.xml
          soybean
            ini: filename=XML_soy7.9.xml
          folder Manager folder
            manager N Deposition: same as Ames.Ames_Weather.Ames_weather.paddock.Manager folder.N Deposition
            manager fall tillage
              # When should tillage be done
              tillage_date = 20-nov  # Enter tillage date (dd-mmm)
              # Tillage application details
              surfaceommodule = SurfaceOrganicMatter  # Module used to apply the tillage
              tillage_type = disc
              tillage_depth = 50  # User_defined depth of seedbed preparation (mm)
              tillage_f_incorp = 0.25  # User_defined fraction of surface residues to incorporate (0-1)
              on start_of_day:
              script: same as in Ames.Ames_Weather.Ames_weather.paddock.Manager folder.Fall Tillage
            manager Spring Tillage
              # When should tillage be done
              tillage_date = 10-apr  # Enter tillage date (dd-mmm)
              # Tillage application details
              surfaceommodule = SurfaceOrganicMatter  # Module used to apply the tillage
              tillage_type = chisel
              tillage_depth = 100  # User_defined depth of seedbed preparation (mm)
              tillage_f_incorp = 0.40  # User_defined fraction of surface residues to incorporate (0-1)
              on start_of_day:
              script: same as in Ames.Ames_Weather.Ames_weather.paddock.Manager folder.Fall Tillage
            manager Spring Cultivator
              # When should tillage be done
              tillage_date = 20-apr  # Enter tillage date (dd-mmm)
              # Tillage application details
              surfaceommodule = SurfaceOrganicMatter  # Module used to apply the tillage
              tillage_type = chisel
              tillage_depth = 50  # User_defined depth of seedbed preparation (mm)
              tillage_f_incorp = 0.15  # User_defined fraction of surface residues to incorporate (0-1)
              on start_of_day:
              script: same as in Ames.Ames_Weather.Ames_weather.paddock.Manager folder.Fall Tillage
            operations SC_maize_Nfert
              10/4/1980  ! my notes
              2/5/2000  fertiliser apply  amount = 270 (kg/ha), depth = 50 (mm), type = urea_n
              26/4/2002  fertiliser apply  amount = 270 (kg/ha), depth = 50 (mm), type = urea_n
              15/4/2004  fertiliser apply  amount = 270 (kg/ha), depth = 50 (mm), type = urea_n
              4/5/2006  fertiliser apply  amount = 270 (kg/ha), depth = 50 (mm), type = urea_n
              6/5/2008  fertiliser apply  amount = 270 (kg/ha), depth = 50 (mm), type = urea_n
              5/5/2010  fertiliser apply  amount = 270(kg/ha), depth = 50 (mm), type = UAN_N
              10/5/2012  fertiliser apply  amount = 270(kg/ha), depth = 50 (mm), type = UAN_N
              6/5/2014  fertiliser apply  amount = 270 (kg/ha), depth = 50 (mm), type = urea_n
              6/5/2016  fertiliser apply  amount = 270(kg/ha), depth = 50 (mm), type = UAN_N
              6/5/2017  fertiliser apply  amount = 0 (kg/ha), depth = 50 (mm), type = UAN_N
              6/5/2018  fertiliser apply  amount = 0 (kg/ha), depth = 50 (mm), type = UAN_N
                ! start up period
              24/4/1992  fertiliser apply  amount = 170 (kg/ha), depth = 50 (mm), type = urea_n
              24/4/1994  fertiliser apply  amount = 170 (kg/ha), depth = 50 (mm), type = urea_n
              24/4/1996  fertiliser apply  amount = 170 (kg/ha), depth = 50 (mm), type = urea_n
              24/4/1998  fertiliser apply  amount = 170 (kg/ha), depth = 50 (mm), type = urea_n
            operations SC_soy_planitng
              5/5/1980  ! this is the maize of the maize-soy rotation in Ames
              19/5/1999  soybean sow plants=37.1,sowing_depth=50,cultivar=psims_22MG,row_spacing=760,crop_class=plant
              9/5/2001  soybean sow plants=37.1,sowing_depth=50,cultivar=psims_26MG,row_spacing=760,crop_class=plant
              29/4/2003  soybean sow plants=37.1,sowing_depth=50,cultivar=psims_26MG,row_spacing=760,crop_class=plant
              10/5/2005  soybean sow plants=39.8,sowing_depth=50,cultivar=psims_28MG,row_spacing=760,crop_class=plant
              18/5/2007  soybean sow plants=39.8,sowing_depth=50,cultivar=psims_30MG,row_spacing=760,crop_class=plant
              8/5/2009  soybean sow plants=39.8,sowing_depth=50,cultivar=psims_26MG,row_spacing=760,crop_class=plant
              19/5/2011  soybean sow plants=38.3,sowing_depth=50,cultivar=psims_24MG,row_spacing=760,crop_class=plant
              13/6/2013  soybean sow plants=35.6,sowing_depth=50,cultivar=psims_AmesHailSoy,row_spacing=760,crop_class=plant
              22/5/2015  soybean sow plants=34.6,sowing_depth=50,cultivar=psims_28MG,row_spacing=760,crop_class=plant
              10/7/2019  soybean sow plants=34.6,sowing_depth=50,cultivar=psims_28MG,row_spacing=760,crop_class=plant
            operations SC_corn_planitng
              5/5/1980  ! this is the maize of the maize-soy rotation in Ames
              5/5/2000  maize sow plants=7.4, sowing_depth=50,cultivar=psims_107RM, row_spacing=760,crop_class=maizev! Pioneer 34G81 (107 d)
              3/5/2002  maize sow plants=7.9, sowing_depth=50,cultivar=psims_105RM, row_spacing=760,crop_class=maize ! Dekalb 55-51 RR/YGCB (105 d)
              27/4/2004  maize sow plants=8.0, sowing_depth=50,cultivar=psims_107RM, row_spacing=760,crop_class=maize ! Dekalb 57-81 RR/YGCB (107 d)
              9/5/2006  maize sow plants=8.0, sowing_depth=50,cultivar=psims_106RM,row_spacing=760,crop_class=maize ! Pioneer 35Y61 (106 d)
              14/5/2008  maize sow plants=7.4, sowing_depth=50,cultivar=psims_111RM,row_spacing=760,crop_class=maize ! Dekalb DKC61-69 (111 d)
              29/4/2010  maize sow plants=8.0, sowing_depth=50,cultivar=psims_105RM, row_spacing=760,crop_class=maize ! Pioneer 35F44 (HXX/RR2/LL) (105 d)
              10/5/2012  maize sow plants=7.9, sowing_depth=50,cultivar=psims_105RM, row_spacing=760,crop_class=maize ! Pioneer P0528XR (HXX/LL/RR2) (105 d)
              7/5/2014  maize sow plants=7.9, sowing_depth=50,cultivar=psims_105RM, row_spacing=760,crop_class=maize ! Pioneer 0591AMX (105 d)
              27/4/2016  maize sow plants=8.6, sowing_depth=50,cultivar=psims_105RM,row_spacing=760,crop_class=maize ! Pioneer P0570AMXT (105 d)
              27/4/2017  maize sow plants=8.0, sowing_depth=50,cultivar=psims_105RM,row_spacing=760,crop_class=maize ! Pioneer P0570AMXT (105 d)
              27/4/2018  maize sow plants=8.0, sowing_depth=50,cultivar=psims_105RM,row_spacing=760,crop_class=maize ! Pioneer P0570AMXT (105 d)
                ! start up period
              1/5/1991  soybean sow plants=40.5,sowing_depth=50,cultivar=psims_24MG,row_spacing=760,crop_class=plant
              1/5/1992  maize sow plants=7.9, sowing_depth=50,cultivar=psims_106RM, row_spacing=760,crop_class=maize
              1/5/1993  soybean sow plants=40.5,sowing_depth=50,cultivar=psims_24MG,row_spacing=760,crop_class=plant
              1/5/1994  maize sow plants=7.9, sowing_depth=50,cultivar=psims_106RM, row_spacing=760,crop_class=maize
              1/5/1995  soybean sow plants=40.5,sowing_depth=50,cultivar=psims_24MG,row_spacing=760,crop_class=plant
              1/5/1996  maize sow plants=7.9, sowing_depth=50,cultivar=psims_106RM, row_spacing=760,crop_class=maize
              1/5/1997  soybean sow plants=40.5,sowing_depth=50,cultivar=psims_24MG,row_spacing=760,crop_class=plant
              1/5/1998  maize sow plants=7.9, sowing_depth=50,cultivar=psims_106RM, row_spacing=760,crop_class=maize
            operations SC_harvest
              5/5/1980  ! ask isaiah probably you need to put both end_crop and then harvest
              6/10/1999  soybean harvest
              6/10/1999  soybean end_crop
              26/9/2000  maize harvest
              26/9/2000  maize end_crop
              4/10/2001  soybean harvest
              4/10/2001  soybean end_crop
              8/10/2002  maize harvest
              8/10/2002  maize end_crop
              6/10/2003  soybean harvest
              6/10/2003  soybean end_crop
              12/10/2004  maize harvest
              12/10/2004  maize end_crop
              30/9/2005  soybean harvest
              30/9/2005  soybean end_crop
              19/10/2006  maize harvest
              19/10/2006  maize end_crop
              9/10/2007  soybean harvest
              9/10/2007  soybean end_crop
              3/11/2008  maize harvest
              3/11/2008  maize end_crop
              13/10/2009  soybean harvest
              13/10/2009  soybean end_crop
              7/10/2010  maize harvest
              7/10/2010  maize end_crop
              30/9/2011  soybean harvest
              30/9/2011  soybean end_crop
              4/10/2012  maize harvest
              4/10/2012  maize end_crop
              10/10/2013  soybean harvest
              10/10/2013  soybean end_crop
              17/10/2014  maize harvest
              17/10/2014  maize end_crop
              14/10/2015  soybean harvest
              14/10/2015  soybean end_crop
              11/10/2016  maize harvest
              11/10/2016  maize end_crop
              11/10/2017  maize harvest
              11/10/2017  maize end_crop
              11/10/2018  maize harvest
              11/10/2018  maize end_crop
              6/11/2019  soybean harvest
              6/11/2019  soybean end_crop
                ! start up period
              20/10/1991  soybean harvest
              20/10/1991  soybean end_crop
              20/10/1992  maize harvest
              20/10/1992  maize end_crop
              20/10/1993  soybean harvest
              20/10/1993  soybean end_crop
              20/10/1994  maize harvest
              20/10/1994  maize end_crop
              20/10/1995  soybean harvest
              20/10/1995  soybean end_crop
              20/10/1996  maize harvest
              20/10/1996  maize end_crop
              20/10/1997  soybean harvest
              20/10/1997  soybean end_crop
              20/10/1998  maize harvest
              20/10/1998  maize end_crop
          manager Calculations -> /simulations/Ames/common/Calculations
          tracker -> /simulations/Ames/common/tracker
          manager2 Stage Day of Year -> /simulations/Ames/common/Stage Day of Year
          manager Stage Day Info -> /simulations/Ames/common/Stage Day Info
          manager2 InitialiseWaterTableOnce -> /simulations/Ames/common/InitialiseWaterTableOnce
          manager2 Reporter_Annual -> /simulations/Ames/common/Reporter_Annual
          manager Temperature Day Info -> /simulations/Ames/common/Temperature Day Info
          manager WT_script -> /simulations/Ames/common/WT_script
          outputfile -> /simulations/Ames/common/outputfile: filename=SC_270_base.out; title=SC_270_base
            variables My Variables -> /simulations/Ames/common/outputfile/My Variables
            events My Variables Events -> /simulations/Ames/common/outputfile/My Variables Events
          Soil Soil_Ames1 -> /simulations/Ames/common/Soil_Ames
          surfaceom SurfaceOrganicMatter -> /simulations/Ames/common/SurfaceOrganicMatter
    folder CC_270_oat1 -> /simulations/Ames/CC_270_base
      simulation CC_270_oat1 -> /simulations/Ames/CC_270_base/CC_270_base
        area paddock
          fertiliser
          maize
            ini: filename=XML_corn7.9.xml
          soybean
            ini: filename=XML_soy7.9.xml
          folder Manager folder
            manager N Deposition: same as Ames.Ames_Weather.Ames_weather.paddock.Manager folder.N Deposition
            manager fall tillage: same as Ames.Ames_Weather.Ames_weather.paddock.Manager folder.Fall Tillage
            manager Spring Tillage: same as Ames.Ames_Weather.Ames_weather.paddock.Manager folder.Spring Tillage
            manager Spring Cultivator: same as Ames.Ames_Weather.Ames_weather.paddock.Manager folder.Spring Cultivator
            operations CC_maize_Nfert: same as Ames.CC_270_base.CC_270_base.paddock.Manager folder.CC_maize_Nfert
            operations CC_corn_planitng
              5/5/1980  ! this is the maize of the maize-soy rotation in Ames
              19/5/1999  maize sow plants=6.9, sowing_depth=50,cultivar=psims_107RM, row_spacing=760,crop_class=maize ! Pioneer 34G81 (107 d relative maturity)
              5/5/2000  maize sow plants=6.4, sowing_depth=50,cultivar=psims_AmesHail, row_spacing=760,crop_class=maizev! Pioneer 34G81 (107 d)
              9/5/2001  maize sow plants=6.5, sowing_depth=50,cultivar=psims_103RM, row_spacing=760,crop_class=maize !Pioneer P34G13 (103?)
              3/5/2002  maize sow plants=6.9, sowing_depth=50,cultivar=psims_105RM, row_spacing=760,crop_class=maize ! Dekalb 55-51 RR/YGCB (105 d)
              29/4/2003  maize sow plants=6.8, sowing_depth=50,cultivar=psims_108RM, row_spacing=760,crop_class=maize ! Dekalb 58-24 RR/YGCB (108 d)
              27/4/2004  maize sow plants=7.0, sowing_depth=50,cultivar=psims_107RM, row_spacing=760,crop_class=maize ! Dekalb 57-81 RR/YGCB (107 d)
              5/5/2005  maize sow plants=7.0, sowing_depth=50,cultivar=psims_106RM, row_spacing=760,crop_class=maize ! Pioneer 35Y62 HXX/RR2/LL (106 d)
              9/5/2006  maize sow plants=7.0, sowing_depth=50,cultivar=psims_106RM,row_spacing=760,crop_class=maize ! Pioneer 35Y61 (106 d)
              13/5/2007  maize sow plants=7.0, sowing_depth=50,cultivar=psims_109RM,row_spacing=760,crop_class=maize ! Pioneer 34A20 (HXX/RR2/LL) (109 d)
              14/5/2008  maize sow plants=6.4, sowing_depth=50,cultivar=psims_111RM,row_spacing=760,crop_class=maize ! Dekalb DKC61-69 (111 d)
              5/5/2009  maize sow plants=7.0, sowing_depth=50,cultivar=psims_105RM, row_spacing=760,crop_class=maize ! Pioneer 35K33 (HXX/RR2/LL) (105 d)
              29/4/2010  maize sow plants=7.0, sowing_depth=50,cultivar=psims_105RM, row_spacing=760,crop_class=maize ! Pioneer 35F44 (HXX/RR2/LL) (105 d)
              11/5/2011  maize sow plants=6.9, sowing_depth=50,cultivar=psims_106RM,row_spacing=760,crop_class=maize ! Fontanelle 6T510 (106 d)
              10/5/2012  maize sow plants=6.9, sowing_depth=50,cultivar=psims_105RM, row_spacing=760,crop_class=maize ! Pioneer P0528XR (HXX/LL/RR2) (105 d)
              24/5/2013  maize sow plants=6.9, sowing_depth=50,cultivar=psims_AmesHail, row_spacing=760,crop_class=maize ! Pioneer 0461XR (HXX/LL/RR2) (104 d)
              7/5/2014  maize sow plants=6.9, sowing_depth=50,cultivar=psims_105RM, row_spacing=760,crop_class=maize ! Pioneer 0591AMX (105 d)
              13/5/2015  maize sow plants=7.9, sowing_depth=50,cultivar=psims_107RM, row_spacing=760,crop_class=maize ! FS 57QX1 RIB (107)
              27/4/2016  maize sow plants=7.6, sowing_depth=50,cultivar=psims_105RM,row_spacing=760,crop_class=maize ! Pioneer P0570AMXT (105 d)
              1/5/2017  maize sow plants=7.6, sowing_depth=50,cultivar=psims_105RM,row_spacing=760,crop_class=maize ! Pioneer P0570AMXT (105 d)
              1/5/2018  maize sow plants=7.6, sowing_depth=50,cultivar=psims_105RM,row_spacing=760,crop_class=maize ! Pioneer P0570AMXT (105 d)
              5/6/2019  maize sow plants=7.6, sowing_depth=50,cultivar=psims_105RM,row_spacing=760,crop_class=maize ! Pioneer P0570AMXT (105 d)
                ! start up period
              1/5/1991  soybean sow plants=40.5,sowing_depth=50,cultivar=psims_24MG,row_spacing=760,crop_class=plant
              1/5/1992  maize sow plants=7.9, sowing_depth=50,cultivar=psims_106RM, row_spacing=760,crop_class=maize
              1/5/1993  soybean sow plants=40.5,sowing_depth=50,cultivar=psims_24MG,row_spacing=760,crop_class=plant
              1/5/1994  maize sow plants=7.9, sowing_depth=50,cultivar=psims_106RM, row_spacing=760,crop_class=maize
              1/5/1995  soybean sow plants=40.5,sowing_depth=50,cultivar=psims_24MG,row_spacing=760,crop_class=plant
              1/5/1996  maize sow plants=7.9, sowing_depth=50,cultivar=psims_106RM, row_spacing=760,crop_class=maize
              1/5/1997  soybean sow plants=40.5,sowing_depth=50,cultivar=psims_24MG,row_spacing=760,crop_class=plant
              1/5/1998  maize sow plants=7.9, sowing_depth=50,cultivar=psims_106RM, row_spacing=760,crop_class=maize
            operations CC_harvest: same as Ames.CC_270_base.CC_270_base.paddock.Manager folder.CC_harvest
          manager Calculations: same as Ames.common.Calculations
          tracker: same as Ames.common.tracker
          manager2 Stage Day of Year: same as Ames.common.Stage Day of Year
          manager Stage Day Info: same as Ames.common.Stage Day Info
          manager2 InitialiseWaterTableOnce: same as Ames.common.InitialiseWaterTableOnce
          manager2 Reporter_Annual: same as Ames.common.Reporter_Annual
          manager Temperature Day Info: same as Ames.common.Temperature Day Info
          manager WT_script
            on start_of_day:
            script: same as in Ames.common.WT_script
          outputfile: filename=CC_270_oat1.out; title=CC_270_oat1
            variables My Variables: same as Ames.common.outputfile.My Variables
            events My Variables Events: event=end_year
          Soil Soil_Ames1: same as Ames.common.Soil_Ames
          surfaceom SurfaceOrganicMatter
            PoolName = soybean  # Organic Matter pool name
            type = soybean  # Organic Matter type
            mass = 2000  # Initial surface residue (kg/ha)
            cnr = 45  # C:N ratio of initial residue
            standing_fraction = 0.0  # Fraction of residue standing
            ini: filename=SurfaceOM_7.9.xml
    folder CC_270_oat2 -> /simulations/Ames/CC_270_base
      simulation CC_270_oat2 -> /simulations/Ames/CC_270_base/CC_270_base
        area paddock
          fertiliser
          maize
            ini: filename=XML_corn7.9.xml
          soybean
            ini: filename=XML_soy7.9.xml
          folder Manager folder
            manager N Deposition: same as Ames.Ames_Weather.Ames_weather.paddock.Manager folder.N Deposition
            manager fall tillage: same as Ames.Ames_Weather.Ames_weather.paddock.Manager folder.Fall Tillage
            manager Spring Tillage: same as Ames.Ames_Weather.Ames_weather.paddock.Manager folder.Spring Tillage
            manager Spring Cultivator: same as Ames.Ames_Weather.Ames_weather.paddock.Manager folder.Spring Cultivator
            operations CC_maize_Nfert: same as Ames.CC_270_base.CC_270_base.paddock.Manager folder.CC_maize_Nfert
            operations CC_corn_planitng
              5/5/1980  ! this is the maize of the maize-soy rotation in Ames
              19/5/1999  maize sow plants=7.9, sowing_depth=100,cultivar=psims_107RM, row_spacing=760,crop_class=maize ! Pioneer 34G81 (107 d relative maturity)
              5/5/2000  maize sow plants=7.4, sowing_depth=100,cultivar=psims_AmesHail, row_spacing=760,crop_class=maizev! Pioneer 34G81 (107 d)
              9/5/2001  maize sow plants=7.5, sowing_depth=100,cultivar=psims_103RM, row_spacing=760,crop_class=maize !Pioneer P34G13 (103?)
              3/5/2002  maize sow plants=7.9, sowing_depth=100,cultivar=psims_105RM, row_spacing=760,crop_class=maize ! Dekalb 55-51 RR/YGCB (105 d)
              29/4/2003  maize sow plants=7.8, sowing_depth=100,cultivar=psims_108RM, row_spacing=760,crop_class=maize ! Dekalb 58-24 RR/YGCB (108 d)
              27/4/2004  maize sow plants=8.0, sowing_depth=100,cultivar=psims_107RM, row_spacing=760,crop_class=maize ! Dekalb 57-81 RR/YGCB (107 d)
              5/5/2005  maize sow plants=8.0, sowing_depth=100,cultivar=psims_106RM, row_spacing=760,crop_class=maize ! Pioneer 35Y62 HXX/RR2/LL (106 d)
              9/5/2006  maize sow plants=8.0, sowing_depth=100,cultivar=psims_106RM,row_spacing=760,crop_class=maize ! Pioneer 35Y61 (106 d)
              13/5/2007  maize sow plants=8.0, sowing_depth=100,cultivar=psims_109RM,row_spacing=760,crop_class=maize ! Pioneer 34A20 (HXX/RR2/LL) (109 d)
              14/5/2008  maize sow plants=7.4, sowing_depth=100,cultivar=psims_111RM,row_spacing=760,crop_class=maize ! Dekalb DKC61-69 (111 d)
              5/5/2009  maize sow plants=8.0, sowing_depth=100,cultivar=psims_105RM, row_spacing=760,crop_class=maize ! Pioneer 35K33 (HXX/RR2/LL) (105 d)
              29/4/2010  maize sow plants=8.0, sowing_depth=100,cultivar=psims_105RM, row_spacing=760,crop_class=maize ! Pioneer 35F44 (HXX/RR2/LL) (105 d)
              11/5/2011  maize sow plants=7.9, sowing_depth=100,cultivar=psims_106RM,row_spacing=760,crop_class=maize ! Fontanelle 6T510 (106 d)
              10/5/2012  maize sow plants=7.9, sowing_depth=100,cultivar=psims_105RM, row_spacing=760,crop_class=maize ! Pioneer P0528XR (HXX/LL/RR2) (105 d)
              24/5/2013  maize sow plants=7.9, sowing_depth=100,cultivar=psims_AmesHail, row_spacing=760,crop_class=maize ! Pioneer 0461XR (HXX/LL/RR2) (104 d)
              7/5/2014  maize sow plants=7.9, sowing_depth=100,cultivar=psims_105RM, row_spacing=760,crop_class=maize ! Pioneer 0591AMX (105 d)
              13/5/2015  maize sow plants=8.9, sowing_depth=100,cultivar=psims_107RM, row_spacing=760,crop_class=maize ! FS 57QX1 RIB (107)
              27/4/2016  maize sow plants=8.6, sowing_depth=100,cultivar=psims_105RM,row_spacing=760,crop_class=maize ! Pioneer P0570AMXT (105 d)
              1/5/2017  maize sow plants=8.6, sowing_depth=100,cultivar=psims_105RM,row_spacing=760,crop_class=maize ! Pioneer P0570AMXT (105 d)
              1/5/2018  maize sow plants=8.6, sowing_depth=100,cultivar=psims_105RM,row_spacing=760,crop_class=maize ! Pioneer P0570AMXT (105 d)
              5/6/2019  maize sow plants=8.6, sowing_depth=100,cultivar=psims_105RM,row_spacing=760,crop_class=maize ! Pioneer P0570AMXT (105 d)
                ! start up period
              1/5/1991  soybean sow plants=40.5,sowing_depth=50,cultivar=psims_24MG,row_spacing=760,crop_class=plant
              1/5/1992  maize sow plants=7.9, sowing_depth=50,cultivar=psims_106RM, row_spacing=760,crop_class=maize
              1/5/1993  soybean sow plants=40.5,sowing_depth=50,cultivar=psims_24MG,row_spacing=760,crop_class=plant
              1/5/1994  maize sow plants=7.9, sowing_depth=50,cultivar=psims_106RM, row_spacing=760,crop_class=maize
              1/5/1995  soybean sow plants=40.5,sowing_depth=50,cultivar=psims_24MG,row_spacing=760,crop_class=plant
              1/5/1996  maize sow plants=7.9, sowing_depth=50,cultivar=psims_106RM, row_spacing=760,crop_class=maize
              1/5/1997  soybean sow plants=40.5,sowing_depth=50,cultivar=psims_24MG,row_spacing=760,crop_class=plant
              1/5/1998  maize sow plants=7.9, sowing_depth=50,cultivar=psims_106RM, row_spacing=760,crop_class=maize
            operations CC_harvest: same as Ames.CC_270_base.CC_270_base.paddock.Manager folder.CC_harvest
          manager Calculations: same as Ames.common.Calculations
          tracker: same as Ames.common.tracker
          manager2 Stage Day of Year: same as Ames.common.Stage Day of Year
          manager Stage Day Info: same as Ames.common.Stage Day Info
          manager2 InitialiseWaterTableOnce: same as Ames.common.InitialiseWaterTableOnce
          manager2 Reporter_Annual: same as Ames.common.Reporter_Annual
          manager Temperature Day Info: same as Ames.common.Temperature Day Info
          manager WT_script
            on start_of_day:
            script: same as in Ames.common.WT_script
          outputfile: filename=CC_270_oat2.out; title=CC_270_oat2
            variables My Variables: same as Ames.common.outputfile.My Variables
            events My Variables Events: event=end_year
          Soil Soil_Ames1: same as Ames.common.Soil_Ames
          surfaceom SurfaceOrganicMatter
            PoolName = soybean  # Organic Matter pool name
            type = soybean  # Organic Matter type
            mass = 2000  # Initial surface residue (kg/ha)
            cnr = 45  # C:N ratio of initial residue
            standing_fraction = 0.0  # Fraction of residue standing
            ini: filename=SurfaceOM_7.9.xml
    folder CC_270_oat3 -> /simulations/Ames/CC_270_base
      simulation CC_270_oat3 -> /simulations/Ames/CC_270_base/CC_270_base
        area paddock
          fertiliser
          maize
            ini: filename=XML_corn7.9.xml
          soybean
            ini: filename=XML_soy7.9.xml
          folder Manager folder
            manager N Deposition: same as Ames.Ames_Weather.Ames_weather.paddock.Manager folder.N Deposition
            manager fall tillage: same as Ames.Ames_Weather.Ames_weather.paddock.Manager folder.Fall Tillage
            manager Spring Tillage: same as Ames.Ames_Weather.Ames_weather.paddock.Manager folder.Spring Tillage
            manager Spring Cultivator: same as Ames.Ames_Weather.Ames_weather.paddock.Manager folder.Spring Cultivator
            operations CC_maize_Nfert: same as Ames.CC_270_base.CC_270_base.paddock.Manager folder.CC_maize_Nfert
            operations CC_corn_planitng
              5/5/1980  ! this is the maize of the maize-soy rotation in Ames
              19/5/1999  maize sow plants=7.9, sowing_depth=50,cultivar=psims_107RMrue, row_spacing=760,crop_class=maize ! Pioneer 34G81 (107 d relative maturity)
              5/5/2000  maize sow plants=7.4, sowing_depth=50,cultivar=psims_AmesHailrue, row_spacing=760,crop_class=maizev! Pioneer 34G81 (107 d)
              9/5/2001  maize sow plants=7.5, sowing_depth=50,cultivar=psims_103RMrue, row_spacing=760,crop_class=maize !Pioneer P34G13 (103?)
              3/5/2002  maize sow plants=7.9, sowing_depth=50,cultivar=psims_105RMrue, row_spacing=760,crop_class=maize ! Dekalb 55-51 RR/YGCB (105 d)
              29/4/2003  maize sow plants=7.8, sowing_depth=50,cultivar=psims_108RMrue, row_spacing=760,crop_class=maize ! Dekalb 58-24 RR/YGCB (108 d)
              27/4/2004  maize sow plants=8.0, sowing_depth=50,cultivar=psims_107RMrue, row_spacing=760,crop_class=maize ! Dekalb 57-81 RR/YGCB (107 d)
              5/5/2005  maize sow plants=8.0, sowing_depth=50,cultivar=psims_106RMrue, row_spacing=760,crop_class=maize ! Pioneer 35Y62 HXX/RR2/LL (106 d)
              9/5/2006  maize sow plants=8.0, sowing_depth=50,cultivar=psims_106RMrue,row_spacing=760,crop_class=maize ! Pioneer 35Y61 (106 d)
              13/5/2007  maize sow plants=8.0, sowing_depth=50,cultivar=psims_109RMrue,row_spacing=760,crop_class=maize ! Pioneer 34A20 (HXX/RR2/LL) (109 d)
              14/5/2008  maize sow plants=7.4, sowing_depth=50,cultivar=psims_111RMrue,row_spacing=760,crop_class=maize ! Dekalb DKC61-69 (111 d)
              5/5/2009  maize sow plants=8.0, sowing_depth=50,cultivar=psims_105RMrue, row_spacing=760,crop_class=maize ! Pioneer 35K33 (HXX/RR2/LL) (105 d)
              29/4/2010  maize sow plants=8.0, sowing_depth=50,cultivar=psims_105RMrue, row_spacing=760,crop_class=maize ! Pioneer 35F44 (HXX/RR2/LL) (105 d)
              11/5/2011  maize sow plants=7.9, sowing_depth=50,cultivar=psims_106RMrue,row_spacing=760,crop_class=maize ! Fontanelle 6T510 (106 d)
              10/5/2012  maize sow plants=7.9, sowing_depth=50,cultivar=psims_105RMrue, row_spacing=760,crop_class=maize ! Pioneer P0528XR (HXX/LL/RR2) (105 d)
              24/5/2013  maize sow plants=7.9, sowing_depth=50,cultivar=psims_AmesHailrue, row_spacing=760,crop_class=maize ! Pioneer 0461XR (HXX/LL/RR2) (104 d)
              7/5/2014  maize sow plants=7.9, sowing_depth=50,cultivar=psims_105RMrue, row_spacing=760,crop_class=maize ! Pioneer 0591AMX (105 d)
              13/5/2015  maize sow plants=8.9, sowing_depth=50,cultivar=psims_107RMrue, row_spacing=760,crop_class=maize ! FS 57QX1 RIB (107)
              27/4/2016  maize sow plants=8.6, sowing_depth=50,cultivar=psims_105RMrue,row_spacing=760,crop_class=maize ! Pioneer P0570AMXT (105 d)
              1/5/2017  maize sow plants=8.6, sowing_depth=50,cultivar=psims_105RMrue,row_spacing=760,crop_class=maize ! Pioneer P0570AMXT (105 d)
              1/5/2018  maize sow plants=8.6, sowing_depth=50,cultivar=psims_105RMrue,row_spacing=760,crop_class=maize ! Pioneer P0570AMXT (105 d)
              5/6/2019  maize sow plants=8.6, sowing_depth=50,cultivar=psims_105RMrue,row_spacing=760,crop_class=maize ! Pioneer P0570AMXT (105 d)
                ! start up period
              1/5/1991  soybean sow plants=40.5,sowing_depth=50,cultivar=psims_24MG,row_spacing=760,crop_class=plant
              1/5/1992  maize sow plants=7.9, sowing_depth=50,cultivar=psims_106RM, row_spacing=760,crop_class=maize
              1/5/1993  soybean sow plants=40.5,sowing_depth=50,cultivar=psims_24MG,row_spacing=760,crop_class=plant
              1/5/1994  maize sow plants=7.9, sowing_depth=50,cultivar=psims_106RM, row_spacing=760,crop_class=maize
              1/5/1995  soybean sow plants=40.5,sowing_depth=50,cultivar=psims_24MG,row_spacing=760,crop_class=plant
              1/5/1996  maize sow plants=7.9, sowing_depth=50,cultivar=psims_106RM, row_spacing=760,crop_class=maize
              1/5/1997  soybean sow plants=40.5,sowing_depth=50,cultivar=psims_24MG,row_spacing=760,crop_class=plant
              1/5/1998  maize sow plants=7.9, sowing_depth=50,cultivar=psims_106RM, row_spacing=760,crop_class=maize
            operations CC_harvest: same as Ames.CC_270_base.CC_270_base.paddock.Manager folder.CC_harvest
          manager Calculations: same as Ames.common.Calculations
          tracker: same as Ames.common.tracker
          manager2 Stage Day of Year: same as Ames.common.Stage Day of Year
          manager Stage Day Info: same as Ames.common.Stage Day Info
          manager2 InitialiseWaterTableOnce: same as Ames.common.InitialiseWaterTableOnce
          manager2 Reporter_Annual: same as Ames.common.Reporter_Annual
          manager Temperature Day Info: same as Ames.common.Temperature Day Info
          manager WT_script
            on start_of_day:
            script: same as in Ames.common.WT_script
          outputfile: filename=CC_270_oat3.out; title=CC_270_oat3
            variables My Variables: same as Ames.common.outputfile.My Variables
            events My Variables Events: event=end_year
          Soil Soil_Ames1: same as Ames.common.Soil_Ames
          surfaceom SurfaceOrganicMatter
            PoolName = soybean  # Organic Matter pool name
            type = soybean  # Organic Matter type
            mass = 2000  # Initial surface residue (kg/ha)
            cnr = 45  # C:N ratio of initial residue
            standing_fraction = 0.0  # Fraction of residue standing
            ini: filename=SurfaceOM_7.9.xml
    folder CC_270_oat4 -> /simulations/Ames/CC_270_base
      simulation CC_270_oat4 -> /simulations/Ames/CC_270_base/CC_270_base
        area paddock
          fertiliser
          maize
            ini: filename=XML_corn7.9.xml
          soybean
            ini: filename=XML_soy7.9.xml
          folder Manager folder
            manager N Deposition: same as Ames.Ames_Weather.Ames_weather.paddock.Manager folder.N Deposition
            manager fall tillage: same as Ames.Ames_Weather.Ames_weather.paddock.Manager folder.Fall Tillage
            manager Spring Tillage: same as Ames.Ames_Weather.Ames_weather.paddock.Manager folder.Spring Tillage
            manager Spring Cultivator: same as Ames.Ames_Weather.Ames_weather.paddock.Manager folder.Spring Cultivator
            operations CC_maize_Nfert: same as Ames.CC_270_base.CC_270_base.paddock.Manager folder.CC_maize_Nfert
            operations CC_corn_planitng
              5/5/1980  ! this is the maize of the maize-soy rotation in Ames
              19/5/1999  maize sow plants=7.9, sowing_depth=50,cultivar=psims_107RMrue, row_spacing=760,crop_class=maize ! Pioneer 34G81 (107 d relative maturity)
              5/5/2000  maize sow plants=7.4, sowing_depth=50,cultivar=psims_AmesHailrue, row_spacing=760,crop_class=maizev! Pioneer 34G81 (107 d)
              9/5/2001  maize sow plants=7.5, sowing_depth=50,cultivar=psims_103RMrue, row_spacing=760,crop_class=maize !Pioneer P34G13 (103?)
              3/5/2002  maize sow plants=7.9, sowing_depth=50,cultivar=psims_105RMrue, row_spacing=760,crop_class=maize ! Dekalb 55-51 RR/YGCB (105 d)
              29/4/2003  maize sow plants=7.8, sowing_depth=50,cultivar=psims_108RMrue, row_spacing=760,crop_class=maize ! Dekalb 58-24 RR/YGCB (108 d)
              27/4/2004  maize sow plants=8.0, sowing_depth=50,cultivar=psims_107RMrue, row_spacing=760,crop_class=maize ! Dekalb 57-81 RR/YGCB (107 d)
              5/5/2005  maize sow plants=8.0, sowing_depth=50,cultivar=psims_106RMrue, row_spacing=760,crop_class=maize ! Pioneer 35Y62 HXX/RR2/LL (106 d)
              9/5/2006  maize sow plants=8.0, sowing_depth=50,cultivar=psims_106RMrue,row_spacing=760,crop_class=maize ! Pioneer 35Y61 (106 d)
              13/5/2007  maize sow plants=8.0, sowing_depth=50,cultivar=psims_109RMrue,row_spacing=760,crop_class=maize ! Pioneer 34A20 (HXX/RR2/LL) (109 d)
              14/5/2008  maize sow plants=7.4, sowing_depth=50,cultivar=psims_111RMrue,row_spacing=760,crop_class=maize ! Dekalb DKC61-69 (111 d)
              5/5/2009  maize sow plants=8.0, sowing_depth=50,cultivar=psims_105RMrue, row_spacing=760,crop_class=maize ! Pioneer 35K33 (HXX/RR2/LL) (105 d)
              29/4/2010  maize sow plants=8.0, sowing_depth=50,cultivar=psims_105RMrue, row_spacing=760,crop_class=maize ! Pioneer 35F44 (HXX/RR2/LL) (105 d)
              11/5/2011  maize sow plants=7.9, sowing_depth=50,cultivar=psims_106RMrue,row_spacing=760,crop_class=maize ! Fontanelle 6T510 (106 d)
              10/5/2012  maize sow plants=7.9, sowing_depth=50,cultivar=psims_105RMrue, row_spacing=760,crop_class=maize ! Pioneer P0528XR (HXX/LL/RR2) (105 d)
              24/5/2013  maize sow plants=7.9, sowing_depth=50,cultivar=psims_AmesHailrue, row_spacing=760,crop_class=maize ! Pioneer 0461XR (HXX/LL/RR2) (104 d)
              7/5/2014  maize sow plants=7.9, sowing_depth=50,cultivar=psims_105RMrue, row_spacing=760,crop_class=maize ! Pioneer 0591AMX (105 d)
              13/5/2015  maize sow plants=8.9, sowing_depth=50,cultivar=psims_107RMrue, row_spacing=760,crop_class=maize ! FS 57QX1 RIB (107)
              27/4/2016  maize sow plants=8.6, sowing_depth=50,cultivar=psims_105RMrue,row_spacing=760,crop_class=maize ! Pioneer P0570AMXT (105 d)
              1/5/2017  maize sow plants=8.6, sowing_depth=50,cultivar=psims_105RMrue,row_spacing=760,crop_class=maize ! Pioneer P0570AMXT (105 d)
              1/5/2018  maize sow plants=8.6, sowing_depth=50,cultivar=psims_105RMrue,row_spacing=760,crop_class=maize ! Pioneer P0570AMXT (105 d)
              5/6/2019  maize sow plants=8.6, sowing_depth=50,cultivar=psims_105RMrue,row_spacing=760,crop_class=maize ! Pioneer P0570AMXT (105 d)
                ! start up period
              1/5/1991  soybean sow plants=40.5,sowing_depth=50,cultivar=psims_24MG,row_spacing=760,crop_class=plant
              1/5/1992  maize sow plants=7.9, sowing_depth=50,cultivar=psims_106RM, row_spacing=760,crop_class=maize
              1/5/1993  soybean sow plants=40.5,sowing_depth=50,cultivar=psims_24MG,row_spacing=760,crop_class=plant
              1/5/1994  maize sow plants=7.9, sowing_depth=50,cultivar=psims_106RM, row_spacing=760,crop_class=maize
              1/5/1995  soybean sow plants=40.5,sowing_depth=50,cultivar=psims_24MG,row_spacing=760,crop_class=plant
              1/5/1996  maize sow plants=7.9, sowing_depth=50,cultivar=psims_106RM, row_spacing=760,crop_class=maize
              1/5/1997  soybean sow plants=40.5,sowing_depth=50,cultivar=psims_24MG,row_spacing=760,crop_class=plant
              1/5/1998  maize sow plants=7.9, sowing_depth=50,cultivar=psims_106RM, row_spacing=760,crop_class=maize
            operations CC_harvest: same as Ames.CC_270_base.CC_270_base.paddock.Manager folder.CC_harvest
          manager Calculations: same as Ames.common.Calculations
          tracker: same as Ames.common.tracker
          manager2 Stage Day of Year: same as Ames.common.Stage Day of Year
          manager Stage Day Info: same as Ames.common.Stage Day Info
          manager2 InitialiseWaterTableOnce: same as Ames.common.InitialiseWaterTableOnce
          manager2 Reporter_Annual: same as Ames.common.Reporter_Annual
          manager Temperature Day Info: same as Ames.common.Temperature Day Info
          manager WT_script
            on start_of_day:
            script: same as in Ames.common.WT_script
          outputfile: filename=CC_270_oat4.out; title=CC_270_oat4
            variables My Variables: same as Ames.common.outputfile.My Variables
            events My Variables Events: event=end_year
          Soil Soil_Ames1: same as Ames.common.Soil_Ames
          surfaceom SurfaceOrganicMatter
            PoolName = soybean  # Organic Matter pool name
            type = soybean  # Organic Matter type
            mass = 2000  # Initial surface residue (kg/ha)
            cnr = 45  # C:N ratio of initial residue
            standing_fraction = 0.0  # Fraction of residue standing
            ini: filename=SurfaceOM_7.9.xml
    folder CC_270_oat5 -> /simulations/Ames/CC_270_base
      simulation CC_270_oat5 -> /simulations/Ames/CC_270_base/CC_270_base
        area paddock -> /simulations/Ames/CC_270_base/CC_270_base/paddock
          outputfile -> /simulations/Ames/CC_270_base/CC_270_base/paddock/outputfile: filename=CC_270_oat5.out; title=CC_270_oat5
            variables My Variables -> /simulations/Ames/CC_270_base/CC_270_base/paddock/outputfile/My Variables
            events My Variables Events -> /simulations/Ames/CC_270_base/CC_270_base/paddock/outputfile/My Variables Events
          Soil Soil_Ames1: SoilType=Nicollet; NearestTown=Ames; Region=Boone; State=Iowa; Country=US; ApsoilNumber=34; Latitude=42.02204; Longitude=-93.769115; YearOfSampling=0; DataSource=mesured data and web soil survey; Comments=hydrological parameters and BD from Saxton and Rawls, 2006
            Water
              Thickness  BD    AirDry  LL15   DUL    SAT       KS
              25         1.25  0.087   0.174  0.31   0.445     146
              25         1.25  0.087   0.174  0.31   0.455     146
              50         1.25  0.087   0.174  0.3    0.42      146
              100        1.25  0.132   0.165  0.25   0.43      146
              100        1.25  0.12    0.12   0.22   0.35      146
              150        1.35  0.11    0.11   0.21   0.34      146
              150        1.35  0.102   0.102  0.22   0.33      133
              150        1.36  0.126   0.126  0.265  0.393     133
              150        1.36  0.133   0.133  0.261  0.393     133
              150        1.36  0.128   0.128  0.253  0.393     388
              150        1.6   0.128   0.128  0.2    0.393     388
              300        1.6   0.09    0.09   0.2    0.393     388
              300        1.6   0.09    0.09   0.2    0.284579  54.2361
              300        1.6   0.09    0.09   0.2    0.272798  33.1104
              300        1.6   0.09    0.09   0.2    0.262658  20.2134
              300        1.6   0.09    0.09   0.2    0.25393   12.34
              300        1.6   0.09    0.09   0.2    0.246418  7.5334
              300        1.6   0.09    0.09   0.2    0.239952  4.59904
              300        1.6   0.09    0.09   0.2    0.234387  2.80765
              300        1.6   0.09    0.09   0.2    0.229598  1.71403
              BD source: Field measured and checked for sensibility (layer 2, 3, 4)
              AirDry source: Estimated based on local knowledge (layer 1, 2, 3, 4)
              LL15 source: Estimated based on local knowledge (layer 2, 3, 4)
              DUL source: Field measured and checked for sensibility (layer 1, 2, 3, 4)
              SAT source: Calculated from measured, estimated or calculated BD (layer 1, 2, 3, 4)
              SoilCrop maize
                LL=[0.174, 0.174, 0.174, 0.165, 0.12, 0.136161, 0.143527, 0.18676725, 0.197952, 0.200536, 0.174202, 0.169252, 0.178877, 0.188, 0.188, 0.188, 0.188, 0.188, 0.188, 0.188]
                KL=[0.05, 0.05, 0.05, 0.05, 0.05, 0.05, 0.05, 0.05, 0.05, 0.05, 0.05, 0.0422964, 0.0350564, 0.0261367, 0.022015, 0.0162927, 0.0111758, 0.0067466, 0.00313554, 0.000603434]
                XF=[1, 1, 1, 1, 1, 1, 1, 1, 1, 1, 1, 1, 0.2, 0.1, 0, 0, 0, 0, 0, 0]
                LL source: Estimated based on local knowledge (layer 2, 3, 4)
              SoilCrop soybean: same as Ames.common.Soil_Ames.Water.soybean
            SoilOrganicMatter: same as Ames.common.Soil_Ames.SoilOrganicMatter
            Analysis: same as Ames.common.Soil_Ames.Analysis
            Sample Initial nitrogen: same as Ames.common.Soil_Ames.Initial nitrogen
            Swim: same as Ames.common.Soil_Ames.Swim
            SoilTemperature: BoundaryLayerConductance=20
              Thickness=[25, 25, 50, 100, 100, 150, 150, 150, 150, 150, 150, 300, 300, 300, 300, 300, 300, 300, 300, 300]
              InitialSoilTemperature=[10, 10, 10, 10, 10, 10, 10, 10, 10, 10, 9, 9, 9, 10, 10, 10, 10, 9, 9, 9]
            ini: filename=Soil_7.9.xml
    folder CC_270_oat6 -> /simulations/Ames/CC_270_base
      simulation CC_270_oat6 -> /simulations/Ames/CC_270_base/CC_270_base
        area paddock -> /simulations/Ames/CC_270_base/CC_270_base/paddock
          folder Manager folder -> /simulations/Ames/CC_270_base/CC_270_base/paddock/Manager folder
            operations CC_corn_planitng
              5/5/1980  ! this is the maize of the maize-soy rotation in Ames
              19/5/1999  maize sow plants=7.9, sowing_depth=50,cultivar=psims_107RMkn, row_spacing=760,crop_class=maize ! Pioneer 34G81 (107 d relative maturity)
              5/5/2000  maize sow plants=7.4, sowing_depth=50,cultivar=psims_AmesHailkn, row_spacing=760,crop_class=maizev! Pioneer 34G81 (107 d)
              9/5/2001  maize sow plants=7.5, sowing_depth=50,cultivar=psims_103RMkn, row_spacing=760,crop_class=maize !Pioneer P34G13 (103?)
              3/5/2002  maize sow plants=7.9, sowing_depth=50,cultivar=psims_105RMkn, row_spacing=760,crop_class=maize ! Dekalb 55-51 RR/YGCB (105 d)
              29/4/2003  maize sow plants=7.8, sowing_depth=50,cultivar=psims_108RMkn, row_spacing=760,crop_class=maize ! Dekalb 58-24 RR/YGCB (108 d)
              27/4/2004  maize sow plants=8.0, sowing_depth=50,cultivar=psims_107RMkn, row_spacing=760,crop_class=maize ! Dekalb 57-81 RR/YGCB (107 d)
              5/5/2005  maize sow plants=8.0, sowing_depth=50,cultivar=psims_106RMkn, row_spacing=760,crop_class=maize ! Pioneer 35Y62 HXX/RR2/LL (106 d)
              9/5/2006  maize sow plants=8.0, sowing_depth=50,cultivar=psims_106RMkn,row_spacing=760,crop_class=maize ! Pioneer 35Y61 (106 d)
              13/5/2007  maize sow plants=8.0, sowing_depth=50,cultivar=psims_109RMkn,row_spacing=760,crop_class=maize ! Pioneer 34A20 (HXX/RR2/LL) (109 d)
              14/5/2008  maize sow plants=7.4, sowing_depth=50,cultivar=psims_111RMkn,row_spacing=760,crop_class=maize ! Dekalb DKC61-69 (111 d)
              5/5/2009  maize sow plants=8.0, sowing_depth=50,cultivar=psims_105RMkn, row_spacing=760,crop_class=maize ! Pioneer 35K33 (HXX/RR2/LL) (105 d)
              29/4/2010  maize sow plants=8.0, sowing_depth=50,cultivar=psims_105RMkn, row_spacing=760,crop_class=maize ! Pioneer 35F44 (HXX/RR2/LL) (105 d)
              11/5/2011  maize sow plants=7.9, sowing_depth=50,cultivar=psims_106RMkn,row_spacing=760,crop_class=maize ! Fontanelle 6T510 (106 d)
              10/5/2012  maize sow plants=7.9, sowing_depth=50,cultivar=psims_105RMkn, row_spacing=760,crop_class=maize ! Pioneer P0528XR (HXX/LL/RR2) (105 d)
              24/5/2013  maize sow plants=7.9, sowing_depth=50,cultivar=psims_AmesHailkn, row_spacing=760,crop_class=maize ! Pioneer 0461XR (HXX/LL/RR2) (104 d)
              7/5/2014  maize sow plants=7.9, sowing_depth=50,cultivar=psims_105RMkn, row_spacing=760,crop_class=maize ! Pioneer 0591AMX (105 d)
              13/5/2015  maize sow plants=8.9, sowing_depth=50,cultivar=psims_107RMkn, row_spacing=760,crop_class=maize ! FS 57QX1 RIB (107)
              27/4/2016  maize sow plants=8.6, sowing_depth=50,cultivar=psims_105RMkn,row_spacing=760,crop_class=maize ! Pioneer P0570AMXT (105 d)
              1/5/2017  maize sow plants=8.6, sowing_depth=50,cultivar=psims_105RMkn,row_spacing=760,crop_class=maize ! Pioneer P0570AMXT (105 d)
              1/5/2018  maize sow plants=8.6, sowing_depth=50,cultivar=psims_105RMkn,row_spacing=760,crop_class=maize ! Pioneer P0570AMXT (105 d)
              5/6/2019  maize sow plants=8.6, sowing_depth=50,cultivar=psims_105RMkn,row_spacing=760,crop_class=maize ! Pioneer P0570AMXT (105 d)
                ! start up period
              1/5/1991  soybean sow plants=40.5,sowing_depth=50,cultivar=psims_24MG,row_spacing=760,crop_class=plant
              1/5/1992  maize sow plants=7.9, sowing_depth=50,cultivar=psims_106RM, row_spacing=760,crop_class=maize
              1/5/1993  soybean sow plants=40.5,sowing_depth=50,cultivar=psims_24MG,row_spacing=760,crop_class=plant
              1/5/1994  maize sow plants=7.9, sowing_depth=50,cultivar=psims_106RM, row_spacing=760,crop_class=maize
              1/5/1995  soybean sow plants=40.5,sowing_depth=50,cultivar=psims_24MG,row_spacing=760,crop_class=plant
              1/5/1996  maize sow plants=7.9, sowing_depth=50,cultivar=psims_106RM, row_spacing=760,crop_class=maize
              1/5/1997  soybean sow plants=40.5,sowing_depth=50,cultivar=psims_24MG,row_spacing=760,crop_class=plant
              1/5/1998  maize sow plants=7.9, sowing_depth=50,cultivar=psims_106RM, row_spacing=760,crop_class=maize
          outputfile -> /simulations/Ames/CC_270_base/CC_270_base/paddock/outputfile: filename=CC_270_oat6.out; title=CC_270_oat6
            variables My Variables -> /simulations/Ames/CC_270_base/CC_270_base/paddock/outputfile/My Variables
            events My Variables Events -> /simulations/Ames/CC_270_base/CC_270_base/paddock/outputfile/My Variables Events
    folder CC_270_oat7 -> /simulations/Ames/CC_270_base
      simulation CC_270_oat7 -> /simulations/Ames/CC_270_base/CC_270_base
        area paddock -> /simulations/Ames/CC_270_base/CC_270_base/paddock
          folder Manager folder -> /simulations/Ames/CC_270_base/CC_270_base/paddock/Manager folder
            operations CC_corn_planitng
              5/5/1980  ! this is the maize of the maize-soy rotation in Ames
              19/5/1999  maize sow plants=6.9, sowing_depth=50,cultivar=psims_107RMoat7, row_spacing=760,crop_class=maize ! Pioneer 34G81 (107 d relative maturity)
              5/5/2000  maize sow plants=6.4, sowing_depth=50,cultivar=psims_AmesHailoat7, row_spacing=760,crop_class=maizev! Pioneer 34G81 (107 d)
              9/5/2001  maize sow plants=6.5, sowing_depth=50,cultivar=psims_103RMoat7, row_spacing=760,crop_class=maize !Pioneer P34G13 (103?)
              3/5/2002  maize sow plants=6.9, sowing_depth=50,cultivar=psims_105RMoat7, row_spacing=760,crop_class=maize ! Dekalb 55-51 RR/YGCB (105 d)
              29/4/2003  maize sow plants=6.8, sowing_depth=50,cultivar=psims_108RMoat7, row_spacing=760,crop_class=maize ! Dekalb 58-24 RR/YGCB (108 d)
              27/4/2004  maize sow plants=7.0, sowing_depth=50,cultivar=psims_107RMoat7, row_spacing=760,crop_class=maize ! Dekalb 57-81 RR/YGCB (107 d)
              5/5/2005  maize sow plants=7.0, sowing_depth=50,cultivar=psims_106RMoat7, row_spacing=760,crop_class=maize ! Pioneer 35Y62 HXX/RR2/LL (106 d)
              9/5/2006  maize sow plants=7.0, sowing_depth=50,cultivar=psims_106RMoat7,row_spacing=760,crop_class=maize ! Pioneer 35Y61 (106 d)
              13/5/2007  maize sow plants=7.0, sowing_depth=50,cultivar=psims_109RMoat7,row_spacing=760,crop_class=maize ! Pioneer 34A20 (HXX/RR2/LL) (109 d)
              14/5/2008  maize sow plants=6.4, sowing_depth=50,cultivar=psims_111RMoat7,row_spacing=760,crop_class=maize ! Dekalb DKC61-69 (111 d)
              5/5/2009  maize sow plants=7.0, sowing_depth=50,cultivar=psims_105RMoat7, row_spacing=760,crop_class=maize ! Pioneer 35K33 (HXX/RR2/LL) (105 d)
              29/4/2010  maize sow plants=7.0, sowing_depth=50,cultivar=psims_105RMoat7, row_spacing=760,crop_class=maize ! Pioneer 35F44 (HXX/RR2/LL) (105 d)
              11/5/2011  maize sow plants=6.9, sowing_depth=50,cultivar=psims_106RMoat7,row_spacing=760,crop_class=maize ! Fontanelle 6T510 (106 d)
              10/5/2012  maize sow plants=6.9, sowing_depth=50,cultivar=psims_105RMoat7, row_spacing=760,crop_class=maize ! Pioneer P0528XR (HXX/LL/RR2) (105 d)
              24/5/2013  maize sow plants=6.9, sowing_depth=50,cultivar=psims_AmesHailoat7, row_spacing=760,crop_class=maize ! Pioneer 0461XR (HXX/LL/RR2) (104 d)
              7/5/2014  maize sow plants=6.9, sowing_depth=50,cultivar=psims_105RMoat7, row_spacing=760,crop_class=maize ! Pioneer 0591AMX (105 d)
              13/5/2015  maize sow plants=7.9, sowing_depth=50,cultivar=psims_107RMoat7, row_spacing=760,crop_class=maize ! FS 57QX1 RIB (107)
              27/4/2016  maize sow plants=7.6, sowing_depth=50,cultivar=psims_105RMoat7,row_spacing=760,crop_class=maize ! Pioneer P0570AMXT (105 d)
              1/5/2017  maize sow plants=7.6, sowing_depth=50,cultivar=psims_105RMoat7,row_spacing=760,crop_class=maize ! Pioneer P0570AMXT (105 d)
              1/5/2018  maize sow plants=7.6, sowing_depth=50,cultivar=psims_105RMoat7,row_spacing=760,crop_class=maize ! Pioneer P0570AMXT (105 d)
              5/6/2019  maize sow plants=7.6, sowing_depth=50,cultivar=psims_105RMoat7,row_spacing=760,crop_class=maize ! Pioneer P0570AMXT (105 d)
                ! start up period
              1/5/1991  soybean sow plants=40.5,sowing_depth=50,cultivar=psims_24MG,row_spacing=760,crop_class=plant
              1/5/1992  maize sow plants=7.9, sowing_depth=50,cultivar=psims_106RM, row_spacing=760,crop_class=maize
              1/5/1993  soybean sow plants=40.5,sowing_depth=50,cultivar=psims_24MG,row_spacing=760,crop_class=plant
              1/5/1994  maize sow plants=7.9, sowing_depth=50,cultivar=psims_106RM, row_spacing=760,crop_class=maize
              1/5/1995  soybean sow plants=40.5,sowing_depth=50,cultivar=psims_24MG,row_spacing=760,crop_class=plant
              1/5/1996  maize sow plants=7.9, sowing_depth=50,cultivar=psims_106RM, row_spacing=760,crop_class=maize
              1/5/1997  soybean sow plants=40.5,sowing_depth=50,cultivar=psims_24MG,row_spacing=760,crop_class=plant
              1/5/1998  maize sow plants=7.9, sowing_depth=50,cultivar=psims_106RM, row_spacing=760,crop_class=maize
          outputfile -> /simulations/Ames/CC_270_base/CC_270_base/paddock/outputfile: filename=CC_270_oat7.out; title=CC_270_oat7
            variables My Variables -> /simulations/Ames/CC_270_base/CC_270_base/paddock/outputfile/My Variables
            events My Variables Events -> /simulations/Ames/CC_270_base/CC_270_base/paddock/outputfile/My Variables Events
    folder CC_270_oat8 -> /simulations/Ames/CC_270_base
      simulation CC_270_oat8 -> /simulations/Ames/CC_270_base/CC_270_base
        area paddock -> /simulations/Ames/CC_270_base/CC_270_base/paddock
          folder Manager folder -> /simulations/Ames/CC_270_base/CC_270_base/paddock/Manager folder
            operations CC_corn_planitng
              5/5/1980  ! this is the maize of the maize-soy rotation in Ames
              19/5/1999  maize sow plants=6.9, sowing_depth=50,cultivar=psims_107RMrue, row_spacing=760,crop_class=maize ! Pioneer 34G81 (107 d relative maturity)
              5/5/2000  maize sow plants=6.4, sowing_depth=50,cultivar=psims_AmesHailrue, row_spacing=760,crop_class=maizev! Pioneer 34G81 (107 d)
              9/5/2001  maize sow plants=6.5, sowing_depth=50,cultivar=psims_103RMrue, row_spacing=760,crop_class=maize !Pioneer P34G13 (103?)
              3/5/2002  maize sow plants=6.9, sowing_depth=50,cultivar=psims_105RMrue, row_spacing=760,crop_class=maize ! Dekalb 55-51 RR/YGCB (105 d)
              29/4/2003  maize sow plants=6.8, sowing_depth=50,cultivar=psims_108RMrue, row_spacing=760,crop_class=maize ! Dekalb 58-24 RR/YGCB (108 d)
              27/4/2004  maize sow plants=7.0, sowing_depth=50,cultivar=psims_107RMrue, row_spacing=760,crop_class=maize ! Dekalb 57-81 RR/YGCB (107 d)
              5/5/2005  maize sow plants=7.0, sowing_depth=50,cultivar=psims_106RMrue, row_spacing=760,crop_class=maize ! Pioneer 35Y62 HXX/RR2/LL (106 d)
              9/5/2006  maize sow plants=7.0, sowing_depth=50,cultivar=psims_106RMrue,row_spacing=760,crop_class=maize ! Pioneer 35Y61 (106 d)
              13/5/2007  maize sow plants=7.0, sowing_depth=50,cultivar=psims_109RMrue,row_spacing=760,crop_class=maize ! Pioneer 34A20 (HXX/RR2/LL) (109 d)
              14/5/2008  maize sow plants=6.4, sowing_depth=50,cultivar=psims_111RMrue,row_spacing=760,crop_class=maize ! Dekalb DKC61-69 (111 d)
              5/5/2009  maize sow plants=7.0, sowing_depth=50,cultivar=psims_105RMrue, row_spacing=760,crop_class=maize ! Pioneer 35K33 (HXX/RR2/LL) (105 d)
              29/4/2010  maize sow plants=7.0, sowing_depth=50,cultivar=psims_105RMrue, row_spacing=760,crop_class=maize ! Pioneer 35F44 (HXX/RR2/LL) (105 d)
              11/5/2011  maize sow plants=6.9, sowing_depth=50,cultivar=psims_106RMrue,row_spacing=760,crop_class=maize ! Fontanelle 6T510 (106 d)
              10/5/2012  maize sow plants=6.9, sowing_depth=50,cultivar=psims_105RMrue, row_spacing=760,crop_class=maize ! Pioneer P0528XR (HXX/LL/RR2) (105 d)
              24/5/2013  maize sow plants=6.9, sowing_depth=50,cultivar=psims_AmesHailrue, row_spacing=760,crop_class=maize ! Pioneer 0461XR (HXX/LL/RR2) (104 d)
              7/5/2014  maize sow plants=6.9, sowing_depth=50,cultivar=psims_105RMrue, row_spacing=760,crop_class=maize ! Pioneer 0591AMX (105 d)
              13/5/2015  maize sow plants=7.9, sowing_depth=50,cultivar=psims_107RMrue, row_spacing=760,crop_class=maize ! FS 57QX1 RIB (107)
              27/4/2016  maize sow plants=7.6, sowing_depth=50,cultivar=psims_105RMrue,row_spacing=760,crop_class=maize ! Pioneer P0570AMXT (105 d)
              1/5/2017  maize sow plants=7.6, sowing_depth=50,cultivar=psims_105RMrue,row_spacing=760,crop_class=maize ! Pioneer P0570AMXT (105 d)
              1/5/2018  maize sow plants=7.6, sowing_depth=50,cultivar=psims_105RMrue,row_spacing=760,crop_class=maize ! Pioneer P0570AMXT (105 d)
              5/6/2019  maize sow plants=7.6, sowing_depth=50,cultivar=psims_105RMrue,row_spacing=760,crop_class=maize ! Pioneer P0570AMXT (105 d)
                ! start up period
              1/5/1991  soybean sow plants=40.5,sowing_depth=50,cultivar=psims_24MG,row_spacing=760,crop_class=plant
              1/5/1992  maize sow plants=7.9, sowing_depth=50,cultivar=psims_106RM, row_spacing=760,crop_class=maize
              1/5/1993  soybean sow plants=40.5,sowing_depth=50,cultivar=psims_24MG,row_spacing=760,crop_class=plant
              1/5/1994  maize sow plants=7.9, sowing_depth=50,cultivar=psims_106RM, row_spacing=760,crop_class=maize
              1/5/1995  soybean sow plants=40.5,sowing_depth=50,cultivar=psims_24MG,row_spacing=760,crop_class=plant
              1/5/1996  maize sow plants=7.9, sowing_depth=50,cultivar=psims_106RM, row_spacing=760,crop_class=maize
              1/5/1997  soybean sow plants=40.5,sowing_depth=50,cultivar=psims_24MG,row_spacing=760,crop_class=plant
              1/5/1998  maize sow plants=7.9, sowing_depth=50,cultivar=psims_106RM, row_spacing=760,crop_class=maize
          outputfile -> /simulations/Ames/CC_270_base/CC_270_base/paddock/outputfile: filename=CC_270_oat8.out; title=CC_270_oat8
            variables My Variables -> /simulations/Ames/CC_270_base/CC_270_base/paddock/outputfile/My Variables
            events My Variables Events -> /simulations/Ames/CC_270_base/CC_270_base/paddock/outputfile/My Variables Events
          Soil Soil_Ames1 -> /simulations/Ames/CC_270_base/CC_270_base/paddock/Soil_Ames1
            Water: same as Ames.CC_270_oat5.CC_270_oat5.paddock.Soil_Ames1.Water
    folder CC_270_oat9 -> /simulations/Ames/CC_270_base
      simulation CC_270_oat9 -> /simulations/Ames/CC_270_base/CC_270_base
        area paddock -> /simulations/Ames/CC_270_base/CC_270_base/paddock
          folder Manager folder -> /simulations/Ames/CC_270_base/CC_270_base/paddock/Manager folder
            operations CC_corn_planitng
              5/5/1980  ! this is the maize of the maize-soy rotation in Ames
              19/5/1999  maize sow plants=6.9, sowing_depth=50,cultivar=psims_107RMoat9, row_spacing=760,crop_class=maize ! Pioneer 34G81 (107 d relative maturity)
              5/5/2000  maize sow plants=6.4, sowing_depth=50,cultivar=psims_AmesHailoat9, row_spacing=760,crop_class=maizev! Pioneer 34G81 (107 d)
              9/5/2001  maize sow plants=6.5, sowing_depth=50,cultivar=psims_103RMoat9, row_spacing=760,crop_class=maize !Pioneer P34G13 (103?)
              3/5/2002  maize sow plants=6.9, sowing_depth=50,cultivar=psims_105RMoat9, row_spacing=760,crop_class=maize ! Dekalb 55-51 RR/YGCB (105 d)
              29/4/2003  maize sow plants=6.8, sowing_depth=50,cultivar=psims_108RMoat9, row_spacing=760,crop_class=maize ! Dekalb 58-24 RR/YGCB (108 d)
              27/4/2004  maize sow plants=7.0, sowing_depth=50,cultivar=psims_107RMoat9, row_spacing=760,crop_class=maize ! Dekalb 57-81 RR/YGCB (107 d)
              5/5/2005  maize sow plants=7.0, sowing_depth=50,cultivar=psims_106RMoat9, row_spacing=760,crop_class=maize ! Pioneer 35Y62 HXX/RR2/LL (106 d)
              9/5/2006  maize sow plants=7.0, sowing_depth=50,cultivar=psims_106RMoat9,row_spacing=760,crop_class=maize ! Pioneer 35Y61 (106 d)
              13/5/2007  maize sow plants=7.0, sowing_depth=50,cultivar=psims_109RMoat9,row_spacing=760,crop_class=maize ! Pioneer 34A20 (HXX/RR2/LL) (109 d)
              14/5/2008  maize sow plants=6.4, sowing_depth=50,cultivar=psims_111RMoat9,row_spacing=760,crop_class=maize ! Dekalb DKC61-69 (111 d)
              5/5/2009  maize sow plants=7.0, sowing_depth=50,cultivar=psims_105RMoat9, row_spacing=760,crop_class=maize ! Pioneer 35K33 (HXX/RR2/LL) (105 d)
              29/4/2010  maize sow plants=7.0, sowing_depth=50,cultivar=psims_105RMoat9, row_spacing=760,crop_class=maize ! Pioneer 35F44 (HXX/RR2/LL) (105 d)
              11/5/2011  maize sow plants=6.9, sowing_depth=50,cultivar=psims_106RMoat9,row_spacing=760,crop_class=maize ! Fontanelle 6T510 (106 d)
              10/5/2012  maize sow plants=6.9, sowing_depth=50,cultivar=psims_105RMoat9, row_spacing=760,crop_class=maize ! Pioneer P0528XR (HXX/LL/RR2) (105 d)
              24/5/2013  maize sow plants=6.9, sowing_depth=50,cultivar=psims_AmesHailoat9, row_spacing=760,crop_class=maize ! Pioneer 0461XR (HXX/LL/RR2) (104 d)
              7/5/2014  maize sow plants=6.9, sowing_depth=50,cultivar=psims_105RMoat9, row_spacing=760,crop_class=maize ! Pioneer 0591AMX (105 d)
              13/5/2015  maize sow plants=7.9, sowing_depth=50,cultivar=psims_107RMoat9, row_spacing=760,crop_class=maize ! FS 57QX1 RIB (107)
              27/4/2016  maize sow plants=7.6, sowing_depth=50,cultivar=psims_105RMoat9,row_spacing=760,crop_class=maize ! Pioneer P0570AMXT (105 d)
              1/5/2017  maize sow plants=7.6, sowing_depth=50,cultivar=psims_105RMoat9,row_spacing=760,crop_class=maize ! Pioneer P0570AMXT (105 d)
              1/5/2018  maize sow plants=7.6, sowing_depth=50,cultivar=psims_105RMoat9,row_spacing=760,crop_class=maize ! Pioneer P0570AMXT (105 d)
              5/6/2019  maize sow plants=7.6, sowing_depth=50,cultivar=psims_105RMoat9,row_spacing=760,crop_class=maize ! Pioneer P0570AMXT (105 d)
                ! start up period
              1/5/1991  soybean sow plants=40.5,sowing_depth=50,cultivar=psims_24MG,row_spacing=760,crop_class=plant
              1/5/1992  maize sow plants=7.9, sowing_depth=50,cultivar=psims_106RM, row_spacing=760,crop_class=maize
              1/5/1993  soybean sow plants=40.5,sowing_depth=50,cultivar=psims_24MG,row_spacing=760,crop_class=plant
              1/5/1994  maize sow plants=7.9, sowing_depth=50,cultivar=psims_106RM, row_spacing=760,crop_class=maize
              1/5/1995  soybean sow plants=40.5,sowing_depth=50,cultivar=psims_24MG,row_spacing=760,crop_class=plant
              1/5/1996  maize sow plants=7.9, sowing_depth=50,cultivar=psims_106RM, row_spacing=760,crop_class=maize
              1/5/1997  soybean sow plants=40.5,sowing_depth=50,cultivar=psims_24MG,row_spacing=760,crop_class=plant
              1/5/1998  maize sow plants=7.9, sowing_depth=50,cultivar=psims_106RM, row_spacing=760,crop_class=maize
          outputfile -> /simulations/Ames/CC_270_base/CC_270_base/paddock/outputfile: filename=CC_270_oat9.out; title=CC_270_oat9
            variables My Variables -> /simulations/Ames/CC_270_base/CC_270_base/paddock/outputfile/My Variables
            events My Variables Events -> /simulations/Ames/CC_270_base/CC_270_base/paddock/outputfile/My Variables Events
    folder CC_270_oat10 -> /simulations/Ames/CC_270_base
      simulation CC_270_oat10 -> /simulations/Ames/CC_270_base/CC_270_base
        area paddock -> /simulations/Ames/CC_270_base/CC_270_base/paddock
          folder Manager folder -> /simulations/Ames/CC_270_base/CC_270_base/paddock/Manager folder
            operations CC_corn_planitng
              5/5/1980  ! this is the maize of the maize-soy rotation in Ames
              19/5/1999  maize sow plants=6.9, sowing_depth=50,cultivar=psims_107RMrfv, row_spacing=760,crop_class=maize ! Pioneer 34G81 (107 d relative maturity)
              5/5/2000  maize sow plants=6.4, sowing_depth=50,cultivar=psims_AmesHailrfv, row_spacing=760,crop_class=maizev! Pioneer 34G81 (107 d)
              9/5/2001  maize sow plants=6.5, sowing_depth=50,cultivar=psims_103RMrfv, row_spacing=760,crop_class=maize !Pioneer P34G13 (103?)
              3/5/2002  maize sow plants=6.9, sowing_depth=50,cultivar=psims_105RMrfv, row_spacing=760,crop_class=maize ! Dekalb 55-51 RR/YGCB (105 d)
              29/4/2003  maize sow plants=6.8, sowing_depth=50,cultivar=psims_108RMrfv, row_spacing=760,crop_class=maize ! Dekalb 58-24 RR/YGCB (108 d)
              27/4/2004  maize sow plants=7.0, sowing_depth=50,cultivar=psims_107RMrfv, row_spacing=760,crop_class=maize ! Dekalb 57-81 RR/YGCB (107 d)
              5/5/2005  maize sow plants=7.0, sowing_depth=50,cultivar=psims_106RMrfv, row_spacing=760,crop_class=maize ! Pioneer 35Y62 HXX/RR2/LL (106 d)
              9/5/2006  maize sow plants=7.0, sowing_depth=50,cultivar=psims_106RMrfv,row_spacing=760,crop_class=maize ! Pioneer 35Y61 (106 d)
              13/5/2007  maize sow plants=7.0, sowing_depth=50,cultivar=psims_109RMrfv,row_spacing=760,crop_class=maize ! Pioneer 34A20 (HXX/RR2/LL) (109 d)
              14/5/2008  maize sow plants=6.4, sowing_depth=50,cultivar=psims_111RMrfv,row_spacing=760,crop_class=maize ! Dekalb DKC61-69 (111 d)
              5/5/2009  maize sow plants=7.0, sowing_depth=50,cultivar=psims_105RMrfv, row_spacing=760,crop_class=maize ! Pioneer 35K33 (HXX/RR2/LL) (105 d)
              29/4/2010  maize sow plants=7.0, sowing_depth=50,cultivar=psims_105RMrfv, row_spacing=760,crop_class=maize ! Pioneer 35F44 (HXX/RR2/LL) (105 d)
              11/5/2011  maize sow plants=6.9, sowing_depth=50,cultivar=psims_106RMrfv,row_spacing=760,crop_class=maize ! Fontanelle 6T510 (106 d)
              10/5/2012  maize sow plants=6.9, sowing_depth=50,cultivar=psims_105RMrfv, row_spacing=760,crop_class=maize ! Pioneer P0528XR (HXX/LL/RR2) (105 d)
              24/5/2013  maize sow plants=6.9, sowing_depth=50,cultivar=psims_AmesHailrfv, row_spacing=760,crop_class=maize ! Pioneer 0461XR (HXX/LL/RR2) (104 d)
              7/5/2014  maize sow plants=6.9, sowing_depth=50,cultivar=psims_105RMrfv, row_spacing=760,crop_class=maize ! Pioneer 0591AMX (105 d)
              13/5/2015  maize sow plants=7.9, sowing_depth=50,cultivar=psims_107RMrfv, row_spacing=760,crop_class=maize ! FS 57QX1 RIB (107)
              27/4/2016  maize sow plants=7.6, sowing_depth=50,cultivar=psims_105RMrfv,row_spacing=760,crop_class=maize ! Pioneer P0570AMXT (105 d)
              1/5/2017  maize sow plants=7.6, sowing_depth=50,cultivar=psims_105RMrfv,row_spacing=760,crop_class=maize ! Pioneer P0570AMXT (105 d)
              1/5/2018  maize sow plants=7.6, sowing_depth=50,cultivar=psims_105RMrfv,row_spacing=760,crop_class=maize ! Pioneer P0570AMXT (105 d)
              5/6/2019  maize sow plants=7.6, sowing_depth=50,cultivar=psims_105RMrfv,row_spacing=760,crop_class=maize ! Pioneer P0570AMXT (105 d)
                ! start up period
              1/5/1991  soybean sow plants=40.5,sowing_depth=50,cultivar=psims_24MG,row_spacing=760,crop_class=plant
              1/5/1992  maize sow plants=7.9, sowing_depth=50,cultivar=psims_106RM, row_spacing=760,crop_class=maize
              1/5/1993  soybean sow plants=40.5,sowing_depth=50,cultivar=psims_24MG,row_spacing=760,crop_class=plant
              1/5/1994  maize sow plants=7.9, sowing_depth=50,cultivar=psims_106RM, row_spacing=760,crop_class=maize
              1/5/1995  soybean sow plants=40.5,sowing_depth=50,cultivar=psims_24MG,row_spacing=760,crop_class=plant
              1/5/1996  maize sow plants=7.9, sowing_depth=50,cultivar=psims_106RM, row_spacing=760,crop_class=maize
              1/5/1997  soybean sow plants=40.5,sowing_depth=50,cultivar=psims_24MG,row_spacing=760,crop_class=plant
              1/5/1998  maize sow plants=7.9, sowing_depth=50,cultivar=psims_106RM, row_spacing=760,crop_class=maize
          outputfile -> /simulations/Ames/CC_270_base/CC_270_base/paddock/outputfile: filename=CC_270_oat10.out; title=CC_270_oat10
            variables My Variables -> /simulations/Ames/CC_270_base/CC_270_base/paddock/outputfile/My Variables
            events My Variables Events -> /simulations/Ames/CC_270_base/CC_270_base/paddock/outputfile/My Variables Events
          Soil Soil_Ames1 -> /simulations/Ames/CC_270_base/CC_270_base/paddock/Soil_Ames1
            Water: same as Ames.CC_270_oat5.CC_270_oat5.paddock.Soil_Ames1.Water
    folder CC_270_oat11 -> /simulations/Ames/CC_270_base
      simulation CC_270_oat11 -> /simulations/Ames/CC_270_base/CC_270_base
        area paddock -> /simulations/Ames/CC_270_base/CC_270_base/paddock
          folder Manager folder -> /simulations/Ames/CC_270_base/CC_270_base/paddock/Manager folder
            operations CC_corn_planitng
              5/5/1980  ! this is the maize of the maize-soy rotation in Ames
              19/5/1999  maize sow plants=6.9, sowing_depth=50,cultivar=psims_107RMoat11, row_spacing=760,crop_class=maize ! Pioneer 34G81 (107 d relative maturity)
              5/5/2000  maize sow plants=6.4, sowing_depth=50,cultivar=psims_AmesHailoat11, row_spacing=760,crop_class=maizev! Pioneer 34G81 (107 d)
              9/5/2001  maize sow plants=6.5, sowing_depth=50,cultivar=psims_103RMoat11, row_spacing=760,crop_class=maize !Pioneer P34G13 (103?)
              3/5/2002  maize sow plants=6.9, sowing_depth=50,cultivar=psims_105RMoat11, row_spacing=760,crop_class=maize ! Dekalb 55-51 RR/YGCB (105 d)
              29/4/2003  maize sow plants=6.8, sowing_depth=50,cultivar=psims_108RMoat11, row_spacing=760,crop_class=maize ! Dekalb 58-24 RR/YGCB (108 d)
              27/4/2004  maize sow plants=7.0, sowing_depth=50,cultivar=psims_107RMoat11, row_spacing=760,crop_class=maize ! Dekalb 57-81 RR/YGCB (107 d)
              5/5/2005  maize sow plants=7.0, sowing_depth=50,cultivar=psims_106RMoat11, row_spacing=760,crop_class=maize ! Pioneer 35Y62 HXX/RR2/LL (106 d)
              9/5/2006  maize sow plants=7.0, sowing_depth=50,cultivar=psims_106RMoat11,row_spacing=760,crop_class=maize ! Pioneer 35Y61 (106 d)
              13/5/2007  maize sow plants=7.0, sowing_depth=50,cultivar=psims_109RMoat11,row_spacing=760,crop_class=maize ! Pioneer 34A20 (HXX/RR2/LL) (109 d)
              14/5/2008  maize sow plants=6.4, sowing_depth=50,cultivar=psims_111RMoat11,row_spacing=760,crop_class=maize ! Dekalb DKC61-69 (111 d)
              5/5/2009  maize sow plants=7.0, sowing_depth=50,cultivar=psims_105RMoat11, row_spacing=760,crop_class=maize ! Pioneer 35K33 (HXX/RR2/LL) (105 d)
              29/4/2010  maize sow plants=7.0, sowing_depth=50,cultivar=psims_105RMoat11, row_spacing=760,crop_class=maize ! Pioneer 35F44 (HXX/RR2/LL) (105 d)
              11/5/2011  maize sow plants=6.9, sowing_depth=50,cultivar=psims_106RMoat11,row_spacing=760,crop_class=maize ! Fontanelle 6T510 (106 d)
              10/5/2012  maize sow plants=6.9, sowing_depth=50,cultivar=psims_105RMoat11, row_spacing=760,crop_class=maize ! Pioneer P0528XR (HXX/LL/RR2) (105 d)
              24/5/2013  maize sow plants=6.9, sowing_depth=50,cultivar=psims_AmesHailoat11, row_spacing=760,crop_class=maize ! Pioneer 0461XR (HXX/LL/RR2) (104 d)
              7/5/2014  maize sow plants=6.9, sowing_depth=50,cultivar=psims_105RMoat11, row_spacing=760,crop_class=maize ! Pioneer 0591AMX (105 d)
              13/5/2015  maize sow plants=7.9, sowing_depth=50,cultivar=psims_107RMoat11, row_spacing=760,crop_class=maize ! FS 57QX1 RIB (107)
              27/4/2016  maize sow plants=7.6, sowing_depth=50,cultivar=psims_105RMoat11,row_spacing=760,crop_class=maize ! Pioneer P0570AMXT (105 d)
              1/5/2017  maize sow plants=7.6, sowing_depth=50,cultivar=psims_105RMoat11,row_spacing=760,crop_class=maize ! Pioneer P0570AMXT (105 d)
              1/5/2018  maize sow plants=7.6, sowing_depth=50,cultivar=psims_105RMoat11,row_spacing=760,crop_class=maize ! Pioneer P0570AMXT (105 d)
              5/6/2019  maize sow plants=7.6, sowing_depth=50,cultivar=psims_105RMoat11,row_spacing=760,crop_class=maize ! Pioneer P0570AMXT (105 d)
                ! start up period
              1/5/1991  soybean sow plants=40.5,sowing_depth=50,cultivar=psims_24MG,row_spacing=760,crop_class=plant
              1/5/1992  maize sow plants=7.9, sowing_depth=50,cultivar=psims_106RM, row_spacing=760,crop_class=maize
              1/5/1993  soybean sow plants=40.5,sowing_depth=50,cultivar=psims_24MG,row_spacing=760,crop_class=plant
              1/5/1994  maize sow plants=7.9, sowing_depth=50,cultivar=psims_106RM, row_spacing=760,crop_class=maize
              1/5/1995  soybean sow plants=40.5,sowing_depth=50,cultivar=psims_24MG,row_spacing=760,crop_class=plant
              1/5/1996  maize sow plants=7.9, sowing_depth=50,cultivar=psims_106RM, row_spacing=760,crop_class=maize
              1/5/1997  soybean sow plants=40.5,sowing_depth=50,cultivar=psims_24MG,row_spacing=760,crop_class=plant
              1/5/1998  maize sow plants=7.9, sowing_depth=50,cultivar=psims_106RM, row_spacing=760,crop_class=maize
          outputfile -> /simulations/Ames/CC_270_base/CC_270_base/paddock/outputfile: filename=CC_270_oat11.out; title=CC_270_oat11
            variables My Variables -> /simulations/Ames/CC_270_base/CC_270_base/paddock/outputfile/My Variables
            events My Variables Events -> /simulations/Ames/CC_270_base/CC_270_base/paddock/outputfile/My Variables Events
    folder CC_270_oat12 -> /simulations/Ames/CC_270_base
      simulation CC_270_oat12 -> /simulations/Ames/CC_270_base/CC_270_base
        area paddock -> /simulations/Ames/CC_270_base/CC_270_base/paddock
          folder Manager folder -> /simulations/Ames/CC_270_base/CC_270_base/paddock/Manager folder
            operations CC_corn_planitng
              5/5/1980  ! this is the maize of the maize-soy rotation in Ames
              19/5/1999  maize sow plants=6.9, sowing_depth=50,cultivar=psims_107RMkn, row_spacing=760,crop_class=maize ! Pioneer 34G81 (107 d relative maturity)
              5/5/2000  maize sow plants=6.4, sowing_depth=50,cultivar=psims_AmesHailkn, row_spacing=760,crop_class=maizev! Pioneer 34G81 (107 d)
              9/5/2001  maize sow plants=6.5, sowing_depth=50,cultivar=psims_103RMkn, row_spacing=760,crop_class=maize !Pioneer P34G13 (103?)
              3/5/2002  maize sow plants=6.9, sowing_depth=50,cultivar=psims_105RMkn, row_spacing=760,crop_class=maize ! Dekalb 55-51 RR/YGCB (105 d)
              29/4/2003  maize sow plants=6.8, sowing_depth=50,cultivar=psims_108RMkn, row_spacing=760,crop_class=maize ! Dekalb 58-24 RR/YGCB (108 d)
              27/4/2004  maize sow plants=7.0, sowing_depth=50,cultivar=psims_107RMkn, row_spacing=760,crop_class=maize ! Dekalb 57-81 RR/YGCB (107 d)
              5/5/2005  maize sow plants=7.0, sowing_depth=50,cultivar=psims_106RMkn, row_spacing=760,crop_class=maize ! Pioneer 35Y62 HXX/RR2/LL (106 d)
              9/5/2006  maize sow plants=7.0, sowing_depth=50,cultivar=psims_106RMkn,row_spacing=760,crop_class=maize ! Pioneer 35Y61 (106 d)
              13/5/2007  maize sow plants=7.0, sowing_depth=50,cultivar=psims_109RMkn,row_spacing=760,crop_class=maize ! Pioneer 34A20 (HXX/RR2/LL) (109 d)
              14/5/2008  maize sow plants=6.4, sowing_depth=50,cultivar=psims_111RMkn,row_spacing=760,crop_class=maize ! Dekalb DKC61-69 (111 d)
              5/5/2009  maize sow plants=7.0, sowing_depth=50,cultivar=psims_105RMkn, row_spacing=760,crop_class=maize ! Pioneer 35K33 (HXX/RR2/LL) (105 d)
              29/4/2010  maize sow plants=7.0, sowing_depth=50,cultivar=psims_105RMkn, row_spacing=760,crop_class=maize ! Pioneer 35F44 (HXX/RR2/LL) (105 d)
              11/5/2011  maize sow plants=6.9, sowing_depth=50,cultivar=psims_106RMkn,row_spacing=760,crop_class=maize ! Fontanelle 6T510 (106 d)
              10/5/2012  maize sow plants=6.9, sowing_depth=50,cultivar=psims_105RMkn, row_spacing=760,crop_class=maize ! Pioneer P0528XR (HXX/LL/RR2) (105 d)
              24/5/2013  maize sow plants=6.9, sowing_depth=50,cultivar=psims_AmesHailkn, row_spacing=760,crop_class=maize ! Pioneer 0461XR (HXX/LL/RR2) (104 d)
              7/5/2014  maize sow plants=6.9, sowing_depth=50,cultivar=psims_105RMkn, row_spacing=760,crop_class=maize ! Pioneer 0591AMX (105 d)
              13/5/2015  maize sow plants=7.9, sowing_depth=50,cultivar=psims_107RMkn, row_spacing=760,crop_class=maize ! FS 57QX1 RIB (107)
              27/4/2016  maize sow plants=7.6, sowing_depth=50,cultivar=psims_105RMkn,row_spacing=760,crop_class=maize ! Pioneer P0570AMXT (105 d)
              1/5/2017  maize sow plants=7.6, sowing_depth=50,cultivar=psims_105RMkn,row_spacing=760,crop_class=maize ! Pioneer P0570AMXT (105 d)
              1/5/2018  maize sow plants=7.6, sowing_depth=50,cultivar=psims_105RMkn,row_spacing=760,crop_class=maize ! Pioneer P0570AMXT (105 d)
              5/6/2019  maize sow plants=7.6, sowing_depth=50,cultivar=psims_105RMkn,row_spacing=760,crop_class=maize ! Pioneer P0570AMXT (105 d)
                ! start up period
              1/5/1991  soybean sow plants=40.5,sowing_depth=50,cultivar=psims_24MG,row_spacing=760,crop_class=plant
              1/5/1992  maize sow plants=7.9, sowing_depth=50,cultivar=psims_106RM, row_spacing=760,crop_class=maize
              1/5/1993  soybean sow plants=40.5,sowing_depth=50,cultivar=psims_24MG,row_spacing=760,crop_class=plant
              1/5/1994  maize sow plants=7.9, sowing_depth=50,cultivar=psims_106RM, row_spacing=760,crop_class=maize
              1/5/1995  soybean sow plants=40.5,sowing_depth=50,cultivar=psims_24MG,row_spacing=760,crop_class=plant
              1/5/1996  maize sow plants=7.9, sowing_depth=50,cultivar=psims_106RM, row_spacing=760,crop_class=maize
              1/5/1997  soybean sow plants=40.5,sowing_depth=50,cultivar=psims_24MG,row_spacing=760,crop_class=plant
              1/5/1998  maize sow plants=7.9, sowing_depth=50,cultivar=psims_106RM, row_spacing=760,crop_class=maize
          outputfile -> /simulations/Ames/CC_270_base/CC_270_base/paddock/outputfile: filename=CC_270_oat12.out; title=CC_270_oat12
            variables My Variables -> /simulations/Ames/CC_270_base/CC_270_base/paddock/outputfile/My Variables
            events My Variables Events -> /simulations/Ames/CC_270_base/CC_270_base/paddock/outputfile/My Variables Events
          Soil Soil_Ames1 -> /simulations/Ames/CC_270_base/CC_270_base/paddock/Soil_Ames1
            Water: same as Ames.CC_270_oat5.CC_270_oat5.paddock.Soil_Ames1.Water
    folder CC_270_oat13 -> /simulations/Ames/CC_270_base
      simulation CC_270_oat13 -> /simulations/Ames/CC_270_base/CC_270_base
        area paddock -> /simulations/Ames/CC_270_base/CC_270_base/paddock
          folder Manager folder -> /simulations/Ames/CC_270_base/CC_270_base/paddock/Manager folder
            operations CC_corn_planitng
              5/5/1980  ! this is the maize of the maize-soy rotation in Ames
              19/5/1999  maize sow plants=6.9, sowing_depth=50,cultivar=psims_107RMoat9, row_spacing=760,crop_class=maize ! Pioneer 34G81 (107 d relative maturity)
              5/5/2000  maize sow plants=6.4, sowing_depth=50,cultivar=psims_AmesHailoat9, row_spacing=760,crop_class=maizev! Pioneer 34G81 (107 d)
              9/5/2001  maize sow plants=6.5, sowing_depth=50,cultivar=psims_103RMoat9, row_spacing=760,crop_class=maize !Pioneer P34G13 (103?)
              3/5/2002  maize sow plants=6.9, sowing_depth=50,cultivar=psims_105RMoat9, row_spacing=760,crop_class=maize ! Dekalb 55-51 RR/YGCB (105 d)
              29/4/2003  maize sow plants=6.8, sowing_depth=50,cultivar=psims_108RMoat9, row_spacing=760,crop_class=maize ! Dekalb 58-24 RR/YGCB (108 d)
              27/4/2004  maize sow plants=7.0, sowing_depth=50,cultivar=psims_107RMoat9, row_spacing=760,crop_class=maize ! Dekalb 57-81 RR/YGCB (107 d)
              5/5/2005  maize sow plants=7.0, sowing_depth=50,cultivar=psims_106RMoat9, row_spacing=760,crop_class=maize ! Pioneer 35Y62 HXX/RR2/LL (106 d)
              9/5/2006  maize sow plants=7.0, sowing_depth=50,cultivar=psims_106RMoat9,row_spacing=760,crop_class=maize ! Pioneer 35Y61 (106 d)
              13/5/2007  maize sow plants=7.0, sowing_depth=50,cultivar=psims_109RMoat9,row_spacing=760,crop_class=maize ! Pioneer 34A20 (HXX/RR2/LL) (109 d)
              14/5/2008  maize sow plants=6.4, sowing_depth=50,cultivar=psims_111RMoat9,row_spacing=760,crop_class=maize ! Dekalb DKC61-69 (111 d)
              5/5/2009  maize sow plants=7.0, sowing_depth=50,cultivar=psims_105RMoat9, row_spacing=760,crop_class=maize ! Pioneer 35K33 (HXX/RR2/LL) (105 d)
              29/4/2010  maize sow plants=7.0, sowing_depth=50,cultivar=psims_105RMoat9, row_spacing=760,crop_class=maize ! Pioneer 35F44 (HXX/RR2/LL) (105 d)
              11/5/2011  maize sow plants=6.9, sowing_depth=50,cultivar=psims_106RMoat9,row_spacing=760,crop_class=maize ! Fontanelle 6T510 (106 d)
              10/5/2012  maize sow plants=6.9, sowing_depth=50,cultivar=psims_105RMoat9, row_spacing=760,crop_class=maize ! Pioneer P0528XR (HXX/LL/RR2) (105 d)
              24/5/2013  maize sow plants=6.9, sowing_depth=50,cultivar=psims_AmesHailoat9, row_spacing=760,crop_class=maize ! Pioneer 0461XR (HXX/LL/RR2) (104 d)
              7/5/2014  maize sow plants=6.9, sowing_depth=50,cultivar=psims_105RMoat9, row_spacing=760,crop_class=maize ! Pioneer 0591AMX (105 d)
              13/5/2015  maize sow plants=7.9, sowing_depth=50,cultivar=psims_107RMoat9, row_spacing=760,crop_class=maize ! FS 57QX1 RIB (107)
              27/4/2016  maize sow plants=7.6, sowing_depth=50,cultivar=psims_105RMoat9,row_spacing=760,crop_class=maize ! Pioneer P0570AMXT (105 d)
              1/5/2017  maize sow plants=7.6, sowing_depth=50,cultivar=psims_105RMoat9,row_spacing=760,crop_class=maize ! Pioneer P0570AMXT (105 d)
              1/5/2018  maize sow plants=7.6, sowing_depth=50,cultivar=psims_105RMoat9,row_spacing=760,crop_class=maize ! Pioneer P0570AMXT (105 d)
              5/6/2019  maize sow plants=7.6, sowing_depth=50,cultivar=psims_105RMoat9,row_spacing=760,crop_class=maize ! Pioneer P0570AMXT (105 d)
                ! start up period
              1/5/1991  soybean sow plants=40.5,sowing_depth=50,cultivar=psims_24MG,row_spacing=760,crop_class=plant
              1/5/1992  maize sow plants=7.9, sowing_depth=50,cultivar=psims_106RM, row_spacing=760,crop_class=maize
              1/5/1993  soybean sow plants=40.5,sowing_depth=50,cultivar=psims_24MG,row_spacing=760,crop_class=plant
              1/5/1994  maize sow plants=7.9, sowing_depth=50,cultivar=psims_106RM, row_spacing=760,crop_class=maize
              1/5/1995  soybean sow plants=40.5,sowing_depth=50,cultivar=psims_24MG,row_spacing=760,crop_class=plant
              1/5/1996  maize sow plants=7.9, sowing_depth=50,cultivar=psims_106RM, row_spacing=760,crop_class=maize
              1/5/1997  soybean sow plants=40.5,sowing_depth=50,cultivar=psims_24MG,row_spacing=760,crop_class=plant
              1/5/1998  maize sow plants=7.9, sowing_depth=50,cultivar=psims_106RM, row_spacing=760,crop_class=maize
          outputfile -> /simulations/Ames/CC_270_base/CC_270_base/paddock/outputfile: filename=CC_270_oat13.out; title=CC_270_oat13
            variables My Variables -> /simulations/Ames/CC_270_base/CC_270_base/paddock/outputfile/My Variables
            events My Variables Events -> /simulations/Ames/CC_270_base/CC_270_base/paddock/outputfile/My Variables Events
          Soil Soil_Ames1 -> /simulations/Ames/CC_270_base/CC_270_base/paddock/Soil_Ames1
            Water: same as Ames.CC_270_oat5.CC_270_oat5.paddock.Soil_Ames1.Water
    folder CC_270_oat14 -> /simulations/Ames/CC_270_base
      simulation CC_270_oat14 -> /simulations/Ames/CC_270_base/CC_270_base
        area paddock -> /simulations/Ames/CC_270_base/CC_270_base/paddock
          folder Manager folder -> /simulations/Ames/CC_270_base/CC_270_base/paddock/Manager folder
            operations CC_corn_planitng
              5/5/1980  ! this is the maize of the maize-soy rotation in Ames
              19/5/1999  maize sow plants=6.9, sowing_depth=50,cultivar=psims_107RMoat11, row_spacing=760,crop_class=maize ! Pioneer 34G81 (107 d relative maturity)
              5/5/2000  maize sow plants=6.4, sowing_depth=50,cultivar=psims_AmesHailoat11, row_spacing=760,crop_class=maizev! Pioneer 34G81 (107 d)
              9/5/2001  maize sow plants=6.5, sowing_depth=50,cultivar=psims_103RMoat11, row_spacing=760,crop_class=maize !Pioneer P34G13 (103?)
              3/5/2002  maize sow plants=6.9, sowing_depth=50,cultivar=psims_105RMoat11, row_spacing=760,crop_class=maize ! Dekalb 55-51 RR/YGCB (105 d)
              29/4/2003  maize sow plants=6.8, sowing_depth=50,cultivar=psims_108RMoat11, row_spacing=760,crop_class=maize ! Dekalb 58-24 RR/YGCB (108 d)
              27/4/2004  maize sow plants=7.0, sowing_depth=50,cultivar=psims_107RMoat11, row_spacing=760,crop_class=maize ! Dekalb 57-81 RR/YGCB (107 d)
              5/5/2005  maize sow plants=7.0, sowing_depth=50,cultivar=psims_106RMoat11, row_spacing=760,crop_class=maize ! Pioneer 35Y62 HXX/RR2/LL (106 d)
              9/5/2006  maize sow plants=7.0, sowing_depth=50,cultivar=psims_106RMoat11,row_spacing=760,crop_class=maize ! Pioneer 35Y61 (106 d)
              13/5/2007  maize sow plants=7.0, sowing_depth=50,cultivar=psims_109RMoat11,row_spacing=760,crop_class=maize ! Pioneer 34A20 (HXX/RR2/LL) (109 d)
              14/5/2008  maize sow plants=6.4, sowing_depth=50,cultivar=psims_111RMoat11,row_spacing=760,crop_class=maize ! Dekalb DKC61-69 (111 d)
              5/5/2009  maize sow plants=7.0, sowing_depth=50,cultivar=psims_105RMoat11, row_spacing=760,crop_class=maize ! Pioneer 35K33 (HXX/RR2/LL) (105 d)
              29/4/2010  maize sow plants=7.0, sowing_depth=50,cultivar=psims_105RMoat11, row_spacing=760,crop_class=maize ! Pioneer 35F44 (HXX/RR2/LL) (105 d)
              11/5/2011  maize sow plants=6.9, sowing_depth=50,cultivar=psims_106RMoat11,row_spacing=760,crop_class=maize ! Fontanelle 6T510 (106 d)
              10/5/2012  maize sow plants=6.9, sowing_depth=50,cultivar=psims_105RMoat11, row_spacing=760,crop_class=maize ! Pioneer P0528XR (HXX/LL/RR2) (105 d)
              24/5/2013  maize sow plants=6.9, sowing_depth=50,cultivar=psims_AmesHailoat11, row_spacing=760,crop_class=maize ! Pioneer 0461XR (HXX/LL/RR2) (104 d)
              7/5/2014  maize sow plants=6.9, sowing_depth=50,cultivar=psims_105RMoat11, row_spacing=760,crop_class=maize ! Pioneer 0591AMX (105 d)
              13/5/2015  maize sow plants=7.9, sowing_depth=50,cultivar=psims_107RMoat11, row_spacing=760,crop_class=maize ! FS 57QX1 RIB (107)
              27/4/2016  maize sow plants=7.6, sowing_depth=50,cultivar=psims_105RMoat11,row_spacing=760,crop_class=maize ! Pioneer P0570AMXT (105 d)
              1/5/2017  maize sow plants=7.6, sowing_depth=50,cultivar=psims_105RMoat11,row_spacing=760,crop_class=maize ! Pioneer P0570AMXT (105 d)
              1/5/2018  maize sow plants=7.6, sowing_depth=50,cultivar=psims_105RMoat11,row_spacing=760,crop_class=maize ! Pioneer P0570AMXT (105 d)
              5/6/2019  maize sow plants=7.6, sowing_depth=50,cultivar=psims_105RMoat11,row_spacing=760,crop_class=maize ! Pioneer P0570AMXT (105 d)
                ! start up period
              1/5/1991  soybean sow plants=40.5,sowing_depth=50,cultivar=psims_24MG,row_spacing=760,crop_class=plant
              1/5/1992  maize sow plants=7.9, sowing_depth=50,cultivar=psims_106RM, row_spacing=760,crop_class=maize
              1/5/1993  soybean sow plants=40.5,sowing_depth=50,cultivar=psims_24MG,row_spacing=760,crop_class=plant
              1/5/1994  maize sow plants=7.9, sowing_depth=50,cultivar=psims_106RM, row_spacing=760,crop_class=maize
              1/5/1995  soybean sow plants=40.5,sowing_depth=50,cultivar=psims_24MG,row_spacing=760,crop_class=plant
              1/5/1996  maize sow plants=7.9, sowing_depth=50,cultivar=psims_106RM, row_spacing=760,crop_class=maize
              1/5/1997  soybean sow plants=40.5,sowing_depth=50,cultivar=psims_24MG,row_spacing=760,crop_class=plant
              1/5/1998  maize sow plants=7.9, sowing_depth=50,cultivar=psims_106RM, row_spacing=760,crop_class=maize
          outputfile -> /simulations/Ames/CC_270_base/CC_270_base/paddock/outputfile: filename=CC_270_oat14.out; title=CC_270_oat14
            variables My Variables -> /simulations/Ames/CC_270_base/CC_270_base/paddock/outputfile/My Variables
            events My Variables Events -> /simulations/Ames/CC_270_base/CC_270_base/paddock/outputfile/My Variables Events
          Soil Soil_Ames1 -> /simulations/Ames/CC_270_base/CC_270_base/paddock/Soil_Ames1
            Water: same as Ames.CC_270_oat5.CC_270_oat5.paddock.Soil_Ames1.Water
    folder CC_270_oat15 -> /simulations/Ames/CC_270_base
      simulation CC_270_oat15 -> /simulations/Ames/CC_270_base/CC_270_base
        area paddock -> /simulations/Ames/CC_270_base/CC_270_base/paddock
          folder Manager folder -> /simulations/Ames/CC_270_base/CC_270_base/paddock/Manager folder
            operations CC_corn_planitng
              5/5/1980  ! this is the maize of the maize-soy rotation in Ames
              19/5/1999  maize sow plants=6.9, sowing_depth=50,cultivar=psims_107RMoat7, row_spacing=760,crop_class=maize ! Pioneer 34G81 (107 d relative maturity)
              5/5/2000  maize sow plants=6.4, sowing_depth=50,cultivar=psims_AmesHailoat7, row_spacing=760,crop_class=maizev! Pioneer 34G81 (107 d)
              9/5/2001  maize sow plants=6.5, sowing_depth=50,cultivar=psims_103RMoat7, row_spacing=760,crop_class=maize !Pioneer P34G13 (103?)
              3/5/2002  maize sow plants=6.9, sowing_depth=50,cultivar=psims_105RMoat7, row_spacing=760,crop_class=maize ! Dekalb 55-51 RR/YGCB (105 d)
              29/4/2003  maize sow plants=6.8, sowing_depth=50,cultivar=psims_108RMoat7, row_spacing=760,crop_class=maize ! Dekalb 58-24 RR/YGCB (108 d)
              27/4/2004  maize sow plants=7.0, sowing_depth=50,cultivar=psims_107RMoat7, row_spacing=760,crop_class=maize ! Dekalb 57-81 RR/YGCB (107 d)
              5/5/2005  maize sow plants=7.0, sowing_depth=50,cultivar=psims_106RMoat7, row_spacing=760,crop_class=maize ! Pioneer 35Y62 HXX/RR2/LL (106 d)
              9/5/2006  maize sow plants=7.0, sowing_depth=50,cultivar=psims_106RMoat7,row_spacing=760,crop_class=maize ! Pioneer 35Y61 (106 d)
              13/5/2007  maize sow plants=7.0, sowing_depth=50,cultivar=psims_109RMoat7,row_spacing=760,crop_class=maize ! Pioneer 34A20 (HXX/RR2/LL) (109 d)
              14/5/2008  maize sow plants=6.4, sowing_depth=50,cultivar=psims_111RMoat7,row_spacing=760,crop_class=maize ! Dekalb DKC61-69 (111 d)
              5/5/2009  maize sow plants=7.0, sowing_depth=50,cultivar=psims_105RMoat7, row_spacing=760,crop_class=maize ! Pioneer 35K33 (HXX/RR2/LL) (105 d)
              29/4/2010  maize sow plants=7.0, sowing_depth=50,cultivar=psims_105RMoat7, row_spacing=760,crop_class=maize ! Pioneer 35F44 (HXX/RR2/LL) (105 d)
              11/5/2011  maize sow plants=6.9, sowing_depth=50,cultivar=psims_106RMoat7,row_spacing=760,crop_class=maize ! Fontanelle 6T510 (106 d)
              10/5/2012  maize sow plants=6.9, sowing_depth=50,cultivar=psims_105RMoat7, row_spacing=760,crop_class=maize ! Pioneer P0528XR (HXX/LL/RR2) (105 d)
              24/5/2013  maize sow plants=6.9, sowing_depth=50,cultivar=psims_AmesHailoat7, row_spacing=760,crop_class=maize ! Pioneer 0461XR (HXX/LL/RR2) (104 d)
              7/5/2014  maize sow plants=6.9, sowing_depth=50,cultivar=psims_105RMoat7, row_spacing=760,crop_class=maize ! Pioneer 0591AMX (105 d)
              13/5/2015  maize sow plants=7.9, sowing_depth=50,cultivar=psims_107RMoat7, row_spacing=760,crop_class=maize ! FS 57QX1 RIB (107)
              27/4/2016  maize sow plants=7.6, sowing_depth=50,cultivar=psims_105RMoat7,row_spacing=760,crop_class=maize ! Pioneer P0570AMXT (105 d)
              1/5/2017  maize sow plants=7.6, sowing_depth=50,cultivar=psims_105RMoat7,row_spacing=760,crop_class=maize ! Pioneer P0570AMXT (105 d)
              1/5/2018  maize sow plants=7.6, sowing_depth=50,cultivar=psims_105RMoat7,row_spacing=760,crop_class=maize ! Pioneer P0570AMXT (105 d)
              5/6/2019  maize sow plants=7.6, sowing_depth=50,cultivar=psims_105RMoat7,row_spacing=760,crop_class=maize ! Pioneer P0570AMXT (105 d)
                ! start up period
              1/5/1991  soybean sow plants=40.5,sowing_depth=50,cultivar=psims_24MG,row_spacing=760,crop_class=plant
              1/5/1992  maize sow plants=7.9, sowing_depth=50,cultivar=psims_106RM, row_spacing=760,crop_class=maize
              1/5/1993  soybean sow plants=40.5,sowing_depth=50,cultivar=psims_24MG,row_spacing=760,crop_class=plant
              1/5/1994  maize sow plants=7.9, sowing_depth=50,cultivar=psims_106RM, row_spacing=760,crop_class=maize
              1/5/1995  soybean sow plants=40.5,sowing_depth=50,cultivar=psims_24MG,row_spacing=760,crop_class=plant
              1/5/1996  maize sow plants=7.9, sowing_depth=50,cultivar=psims_106RM, row_spacing=760,crop_class=maize
              1/5/1997  soybean sow plants=40.5,sowing_depth=50,cultivar=psims_24MG,row_spacing=760,crop_class=plant
              1/5/1998  maize sow plants=7.9, sowing_depth=50,cultivar=psims_106RM, row_spacing=760,crop_class=maize
          outputfile -> /simulations/Ames/CC_270_base/CC_270_base/paddock/outputfile: filename=CC_270_oat15.out; title=CC_270_oat15
            variables My Variables -> /simulations/Ames/CC_270_base/CC_270_base/paddock/outputfile/My Variables
            events My Variables Events -> /simulations/Ames/CC_270_base/CC_270_base/paddock/outputfile/My Variables Events
          Soil Soil_Ames1 -> /simulations/Ames/CC_270_base/CC_270_base/paddock/Soil_Ames1
            Water: same as Ames.CC_270_oat5.CC_270_oat5.paddock.Soil_Ames1.Water
    folder CC_270_oat16 -> /simulations/Ames/CC_270_base
      simulation CC_270_oat16 -> /simulations/Ames/CC_270_base/CC_270_base
        area paddock -> /simulations/Ames/CC_270_base/CC_270_base/paddock
          folder Manager folder -> /simulations/Ames/CC_270_base/CC_270_base/paddock/Manager folder
            operations CC_corn_planitng
              5/5/1980  ! this is the maize of the maize-soy rotation in Ames
              19/5/1999  maize sow plants=6.9, sowing_depth=50,cultivar=psims_107RMoat16, row_spacing=760,crop_class=maize ! Pioneer 34G81 (107 d relative maturity)
              5/5/2000  maize sow plants=6.4, sowing_depth=50,cultivar=psims_AmesHailoat16, row_spacing=760,crop_class=maizev! Pioneer 34G81 (107 d)
              9/5/2001  maize sow plants=6.5, sowing_depth=50,cultivar=psims_103RMoat16, row_spacing=760,crop_class=maize !Pioneer P34G13 (103?)
              3/5/2002  maize sow plants=6.9, sowing_depth=50,cultivar=psims_105RMoat16, row_spacing=760,crop_class=maize ! Dekalb 55-51 RR/YGCB (105 d)
              29/4/2003  maize sow plants=6.8, sowing_depth=50,cultivar=psims_108RMoat16, row_spacing=760,crop_class=maize ! Dekalb 58-24 RR/YGCB (108 d)
              27/4/2004  maize sow plants=7.0, sowing_depth=50,cultivar=psims_107RMoat16, row_spacing=760,crop_class=maize ! Dekalb 57-81 RR/YGCB (107 d)
              5/5/2005  maize sow plants=7.0, sowing_depth=50,cultivar=psims_106RMoat16, row_spacing=760,crop_class=maize ! Pioneer 35Y62 HXX/RR2/LL (106 d)
              9/5/2006  maize sow plants=7.0, sowing_depth=50,cultivar=psims_106RMoat16,row_spacing=760,crop_class=maize ! Pioneer 35Y61 (106 d)
              13/5/2007  maize sow plants=7.0, sowing_depth=50,cultivar=psims_109RMoat16,row_spacing=760,crop_class=maize ! Pioneer 34A20 (HXX/RR2/LL) (109 d)
              14/5/2008  maize sow plants=6.4, sowing_depth=50,cultivar=psims_111RMoat16,row_spacing=760,crop_class=maize ! Dekalb DKC61-69 (111 d)
              5/5/2009  maize sow plants=7.0, sowing_depth=50,cultivar=psims_105RMoat16, row_spacing=760,crop_class=maize ! Pioneer 35K33 (HXX/RR2/LL) (105 d)
              29/4/2010  maize sow plants=7.0, sowing_depth=50,cultivar=psims_105RMoat16, row_spacing=760,crop_class=maize ! Pioneer 35F44 (HXX/RR2/LL) (105 d)
              11/5/2011  maize sow plants=6.9, sowing_depth=50,cultivar=psims_106RMoat16,row_spacing=760,crop_class=maize ! Fontanelle 6T510 (106 d)
              10/5/2012  maize sow plants=6.9, sowing_depth=50,cultivar=psims_105RMoat16, row_spacing=760,crop_class=maize ! Pioneer P0528XR (HXX/LL/RR2) (105 d)
              24/5/2013  maize sow plants=6.9, sowing_depth=50,cultivar=psims_AmesHailoat16, row_spacing=760,crop_class=maize ! Pioneer 0461XR (HXX/LL/RR2) (104 d)
              7/5/2014  maize sow plants=6.9, sowing_depth=50,cultivar=psims_105RMoat16, row_spacing=760,crop_class=maize ! Pioneer 0591AMX (105 d)
              13/5/2015  maize sow plants=7.9, sowing_depth=50,cultivar=psims_107RMoat16, row_spacing=760,crop_class=maize ! FS 57QX1 RIB (107)
              27/4/2016  maize sow plants=7.6, sowing_depth=50,cultivar=psims_105RMoat16,row_spacing=760,crop_class=maize ! Pioneer P0570AMXT (105 d)
              1/5/2017  maize sow plants=7.6, sowing_depth=50,cultivar=psims_105RMoat16,row_spacing=760,crop_class=maize ! Pioneer P0570AMXT (105 d)
              1/5/2018  maize sow plants=7.6, sowing_depth=50,cultivar=psims_105RMoat16,row_spacing=760,crop_class=maize ! Pioneer P0570AMXT (105 d)
              5/6/2019  maize sow plants=7.6, sowing_depth=50,cultivar=psims_105RMoat16,row_spacing=760,crop_class=maize ! Pioneer P0570AMXT (105 d)
                ! start up period
              1/5/1991  soybean sow plants=40.5,sowing_depth=50,cultivar=psims_24MG,row_spacing=760,crop_class=plant
              1/5/1992  maize sow plants=7.9, sowing_depth=50,cultivar=psims_106RM, row_spacing=760,crop_class=maize
              1/5/1993  soybean sow plants=40.5,sowing_depth=50,cultivar=psims_24MG,row_spacing=760,crop_class=plant
              1/5/1994  maize sow plants=7.9, sowing_depth=50,cultivar=psims_106RM, row_spacing=760,crop_class=maize
              1/5/1995  soybean sow plants=40.5,sowing_depth=50,cultivar=psims_24MG,row_spacing=760,crop_class=plant
              1/5/1996  maize sow plants=7.9, sowing_depth=50,cultivar=psims_106RM, row_spacing=760,crop_class=maize
              1/5/1997  soybean sow plants=40.5,sowing_depth=50,cultivar=psims_24MG,row_spacing=760,crop_class=plant
              1/5/1998  maize sow plants=7.9, sowing_depth=50,cultivar=psims_106RM, row_spacing=760,crop_class=maize
          outputfile -> /simulations/Ames/CC_270_base/CC_270_base/paddock/outputfile: filename=CC_270_oat16.out; title=CC_270_oat16
            variables My Variables -> /simulations/Ames/CC_270_base/CC_270_base/paddock/outputfile/My Variables
            events My Variables Events -> /simulations/Ames/CC_270_base/CC_270_base/paddock/outputfile/My Variables Events
          Soil Soil_Ames1 -> /simulations/Ames/CC_270_base/CC_270_base/paddock/Soil_Ames1
            Water: same as Ames.CC_270_oat5.CC_270_oat5.paddock.Soil_Ames1.Water
    folder CC_270_oat17 -> /simulations/Ames/CC_270_base
      simulation CC_270_oat17 -> /simulations/Ames/CC_270_base/CC_270_base
        area paddock -> /simulations/Ames/CC_270_base/CC_270_base/paddock
          folder Manager folder -> /simulations/Ames/CC_270_base/CC_270_base/paddock/Manager folder
            operations CC_corn_planitng
              5/5/1980  ! this is the maize of the maize-soy rotation in Ames
              19/5/1999  maize sow plants=7.9, sowing_depth=50,cultivar=psims_107RMoat7, row_spacing=760,crop_class=maize ! Pioneer 34G81 (107 d relative maturity)
              5/5/2000  maize sow plants=7.4, sowing_depth=50,cultivar=psims_AmesHailoat7, row_spacing=760,crop_class=maizev! Pioneer 34G81 (107 d)
              9/5/2001  maize sow plants=7.5, sowing_depth=50,cultivar=psims_103RMoat7, row_spacing=760,crop_class=maize !Pioneer P34G13 (103?)
              3/5/2002  maize sow plants=7.9, sowing_depth=50,cultivar=psims_105RMoat7, row_spacing=760,crop_class=maize ! Dekalb 55-51 RR/YGCB (105 d)
              29/4/2003  maize sow plants=7.8, sowing_depth=50,cultivar=psims_108RMoat7, row_spacing=760,crop_class=maize ! Dekalb 58-24 RR/YGCB (108 d)
              27/4/2004  maize sow plants=8.0, sowing_depth=50,cultivar=psims_107RMoat7, row_spacing=760,crop_class=maize ! Dekalb 57-81 RR/YGCB (107 d)
              5/5/2005  maize sow plants=8.0, sowing_depth=50,cultivar=psims_106RMoat7, row_spacing=760,crop_class=maize ! Pioneer 35Y62 HXX/RR2/LL (106 d)
              9/5/2006  maize sow plants=8.0, sowing_depth=50,cultivar=psims_106RMoat7,row_spacing=760,crop_class=maize ! Pioneer 35Y61 (106 d)
              13/5/2007  maize sow plants=8.0, sowing_depth=50,cultivar=psims_109RMoat7,row_spacing=760,crop_class=maize ! Pioneer 34A20 (HXX/RR2/LL) (109 d)
              14/5/2008  maize sow plants=7.4, sowing_depth=50,cultivar=psims_111RMoat7,row_spacing=760,crop_class=maize ! Dekalb DKC61-69 (111 d)
              5/5/2009  maize sow plants=8.0, sowing_depth=50,cultivar=psims_105RMoat7, row_spacing=760,crop_class=maize ! Pioneer 35K33 (HXX/RR2/LL) (105 d)
              29/4/2010  maize sow plants=8.0, sowing_depth=50,cultivar=psims_105RMoat7, row_spacing=760,crop_class=maize ! Pioneer 35F44 (HXX/RR2/LL) (105 d)
              11/5/2011  maize sow plants=7.9, sowing_depth=50,cultivar=psims_106RMoat7,row_spacing=760,crop_class=maize ! Fontanelle 6T510 (106 d)
              10/5/2012  maize sow plants=7.9, sowing_depth=50,cultivar=psims_105RMoat7, row_spacing=760,crop_class=maize ! Pioneer P0528XR (HXX/LL/RR2) (105 d)
              24/5/2013  maize sow plants=7.9, sowing_depth=50,cultivar=psims_AmesHailoat7, row_spacing=760,crop_class=maize ! Pioneer 0461XR (HXX/LL/RR2) (104 d)
              7/5/2014  maize sow plants=7.9, sowing_depth=50,cultivar=psims_105RMoat7, row_spacing=760,crop_class=maize ! Pioneer 0591AMX (105 d)
              13/5/2015  maize sow plants=8.9, sowing_depth=50,cultivar=psims_107RMoat7, row_spacing=760,crop_class=maize ! FS 57QX1 RIB (107)
              27/4/2016  maize sow plants=8.6, sowing_depth=50,cultivar=psims_105RMoat7,row_spacing=760,crop_class=maize ! Pioneer P0570AMXT (105 d)
              1/5/2017  maize sow plants=8.6, sowing_depth=50,cultivar=psims_105RMoat7,row_spacing=760,crop_class=maize ! Pioneer P0570AMXT (105 d)
              1/5/2018  maize sow plants=8.6, sowing_depth=50,cultivar=psims_105RMoat7,row_spacing=760,crop_class=maize ! Pioneer P0570AMXT (105 d)
              5/6/2019  maize sow plants=8.6, sowing_depth=50,cultivar=psims_105RMoat7,row_spacing=760,crop_class=maize ! Pioneer P0570AMXT (105 d)
                ! start up period
              1/5/1991  soybean sow plants=40.5,sowing_depth=50,cultivar=psims_24MG,row_spacing=760,crop_class=plant
              1/5/1992  maize sow plants=7.9, sowing_depth=50,cultivar=psims_106RM, row_spacing=760,crop_class=maize
              1/5/1993  soybean sow plants=40.5,sowing_depth=50,cultivar=psims_24MG,row_spacing=760,crop_class=plant
              1/5/1994  maize sow plants=7.9, sowing_depth=50,cultivar=psims_106RM, row_spacing=760,crop_class=maize
              1/5/1995  soybean sow plants=40.5,sowing_depth=50,cultivar=psims_24MG,row_spacing=760,crop_class=plant
              1/5/1996  maize sow plants=7.9, sowing_depth=50,cultivar=psims_106RM, row_spacing=760,crop_class=maize
              1/5/1997  soybean sow plants=40.5,sowing_depth=50,cultivar=psims_24MG,row_spacing=760,crop_class=plant
              1/5/1998  maize sow plants=7.9, sowing_depth=50,cultivar=psims_106RM, row_spacing=760,crop_class=maize
          outputfile -> /simulations/Ames/CC_270_base/CC_270_base/paddock/outputfile: filename=CC_270_oat17.out; title=CC_270_oat17
            variables My Variables -> /simulations/Ames/CC_270_base/CC_270_base/paddock/outputfile/My Variables
            events My Variables Events -> /simulations/Ames/CC_270_base/CC_270_base/paddock/outputfile/My Variables Events
          Soil Soil_Ames1 -> /simulations/Ames/CC_270_base/CC_270_base/paddock/Soil_Ames1
            Water: same as Ames.CC_270_oat5.CC_270_oat5.paddock.Soil_Ames1.Water
    folder CC_270_oat18 -> /simulations/Ames/CC_270_base
      simulation CC_270_oat18 -> /simulations/Ames/CC_270_base/CC_270_base
        area paddock -> /simulations/Ames/CC_270_base/CC_270_base/paddock
          folder Manager folder -> /simulations/Ames/CC_270_base/CC_270_base/paddock/Manager folder
            operations CC_corn_planitng
              5/5/1980  ! this is the maize of the maize-soy rotation in Ames
              19/5/1999  maize sow plants=7.9, sowing_depth=50,cultivar=psims_107RMoat16, row_spacing=760,crop_class=maize ! Pioneer 34G81 (107 d relative maturity)
              5/5/2000  maize sow plants=7.4, sowing_depth=50,cultivar=psims_AmesHailoat16, row_spacing=760,crop_class=maizev! Pioneer 34G81 (107 d)
              9/5/2001  maize sow plants=7.5, sowing_depth=50,cultivar=psims_103RMoat16, row_spacing=760,crop_class=maize !Pioneer P34G13 (103?)
              3/5/2002  maize sow plants=7.9, sowing_depth=50,cultivar=psims_105RMoat16, row_spacing=760,crop_class=maize ! Dekalb 55-51 RR/YGCB (105 d)
              29/4/2003  maize sow plants=7.8, sowing_depth=50,cultivar=psims_108RMoat16, row_spacing=760,crop_class=maize ! Dekalb 58-24 RR/YGCB (108 d)
              27/4/2004  maize sow plants=8.0, sowing_depth=50,cultivar=psims_107RMoat16, row_spacing=760,crop_class=maize ! Dekalb 57-81 RR/YGCB (107 d)
              5/5/2005  maize sow plants=8.0, sowing_depth=50,cultivar=psims_106RMoat16, row_spacing=760,crop_class=maize ! Pioneer 35Y62 HXX/RR2/LL (106 d)
              9/5/2006  maize sow plants=8.0, sowing_depth=50,cultivar=psims_106RMoat16,row_spacing=760,crop_class=maize ! Pioneer 35Y61 (106 d)
              13/5/2007  maize sow plants=8.0, sowing_depth=50,cultivar=psims_109RMoat16,row_spacing=760,crop_class=maize ! Pioneer 34A20 (HXX/RR2/LL) (109 d)
              14/5/2008  maize sow plants=7.4, sowing_depth=50,cultivar=psims_111RMoat16,row_spacing=760,crop_class=maize ! Dekalb DKC61-69 (111 d)
              5/5/2009  maize sow plants=8.0, sowing_depth=50,cultivar=psims_105RMoat16, row_spacing=760,crop_class=maize ! Pioneer 35K33 (HXX/RR2/LL) (105 d)
              29/4/2010  maize sow plants=8.0, sowing_depth=50,cultivar=psims_105RMoat16, row_spacing=760,crop_class=maize ! Pioneer 35F44 (HXX/RR2/LL) (105 d)
              11/5/2011  maize sow plants=7.9, sowing_depth=50,cultivar=psims_106RMoat16,row_spacing=760,crop_class=maize ! Fontanelle 6T510 (106 d)
              10/5/2012  maize sow plants=7.9, sowing_depth=50,cultivar=psims_105RMoat16, row_spacing=760,crop_class=maize ! Pioneer P0528XR (HXX/LL/RR2) (105 d)
              24/5/2013  maize sow plants=7.9, sowing_depth=50,cultivar=psims_AmesHailoat16, row_spacing=760,crop_class=maize ! Pioneer 0461XR (HXX/LL/RR2) (104 d)
              7/5/2014  maize sow plants=7.9, sowing_depth=50,cultivar=psims_105RMoat16, row_spacing=760,crop_class=maize ! Pioneer 0591AMX (105 d)
              13/5/2015  maize sow plants=8.9, sowing_depth=50,cultivar=psims_107RMoat16, row_spacing=760,crop_class=maize ! FS 57QX1 RIB (107)
              27/4/2016  maize sow plants=8.6, sowing_depth=50,cultivar=psims_105RMoat16,row_spacing=760,crop_class=maize ! Pioneer P0570AMXT (105 d)
              1/5/2017  maize sow plants=8.6, sowing_depth=50,cultivar=psims_105RMoat16,row_spacing=760,crop_class=maize ! Pioneer P0570AMXT (105 d)
              1/5/2018  maize sow plants=8.6, sowing_depth=50,cultivar=psims_105RMoat16,row_spacing=760,crop_class=maize ! Pioneer P0570AMXT (105 d)
              5/6/2019  maize sow plants=8.6, sowing_depth=50,cultivar=psims_105RMoat16,row_spacing=760,crop_class=maize ! Pioneer P0570AMXT (105 d)
                ! start up period
              1/5/1991  soybean sow plants=40.5,sowing_depth=50,cultivar=psims_24MG,row_spacing=760,crop_class=plant
              1/5/1992  maize sow plants=7.9, sowing_depth=50,cultivar=psims_106RM, row_spacing=760,crop_class=maize
              1/5/1993  soybean sow plants=40.5,sowing_depth=50,cultivar=psims_24MG,row_spacing=760,crop_class=plant
              1/5/1994  maize sow plants=7.9, sowing_depth=50,cultivar=psims_106RM, row_spacing=760,crop_class=maize
              1/5/1995  soybean sow plants=40.5,sowing_depth=50,cultivar=psims_24MG,row_spacing=760,crop_class=plant
              1/5/1996  maize sow plants=7.9, sowing_depth=50,cultivar=psims_106RM, row_spacing=760,crop_class=maize
              1/5/1997  soybean sow plants=40.5,sowing_depth=50,cultivar=psims_24MG,row_spacing=760,crop_class=plant
              1/5/1998  maize sow plants=7.9, sowing_depth=50,cultivar=psims_106RM, row_spacing=760,crop_class=maize
          outputfile -> /simulations/Ames/CC_270_base/CC_270_base/paddock/outputfile: filename=CC_270_oat18.out; title=CC_270_oat18
            variables My Variables -> /simulations/Ames/CC_270_base/CC_270_base/paddock/outputfile/My Variables
            events My Variables Events -> /simulations/Ames/CC_270_base/CC_270_base/paddock/outputfile/My Variables Events
    folder CC_270_oat19 -> /simulations/Ames/CC_270_base
      simulation CC_270_oat19 -> /simulations/Ames/CC_270_base/CC_270_base
        area paddock -> /simulations/Ames/CC_270_base/CC_270_base/paddock
          folder Manager folder -> /simulations/Ames/CC_270_base/CC_270_base/paddock/Manager folder
            operations CC_corn_planitng
              5/5/1980  ! this is the maize of the maize-soy rotation in Ames
              19/5/1999  maize sow plants=7.9, sowing_depth=50,cultivar=psims_107RMoat9, row_spacing=760,crop_class=maize ! Pioneer 34G81 (107 d relative maturity)
              5/5/2000  maize sow plants=7.4, sowing_depth=50,cultivar=psims_AmesHailoat9, row_spacing=760,crop_class=maizev! Pioneer 34G81 (107 d)
              9/5/2001  maize sow plants=7.5, sowing_depth=50,cultivar=psims_103RMoat9, row_spacing=760,crop_class=maize !Pioneer P34G13 (103?)
              3/5/2002  maize sow plants=7.9, sowing_depth=50,cultivar=psims_105RMoat9, row_spacing=760,crop_class=maize ! Dekalb 55-51 RR/YGCB (105 d)
              29/4/2003  maize sow plants=7.8, sowing_depth=50,cultivar=psims_108RMoat9, row_spacing=760,crop_class=maize ! Dekalb 58-24 RR/YGCB (108 d)
              27/4/2004  maize sow plants=8.0, sowing_depth=50,cultivar=psims_107RMoat9, row_spacing=760,crop_class=maize ! Dekalb 57-81 RR/YGCB (107 d)
              5/5/2005  maize sow plants=8.0, sowing_depth=50,cultivar=psims_106RMoat9, row_spacing=760,crop_class=maize ! Pioneer 35Y62 HXX/RR2/LL (106 d)
              9/5/2006  maize sow plants=8.0, sowing_depth=50,cultivar=psims_106RMoat9,row_spacing=760,crop_class=maize ! Pioneer 35Y61 (106 d)
              13/5/2007  maize sow plants=8.0, sowing_depth=50,cultivar=psims_109RMoat9,row_spacing=760,crop_class=maize ! Pioneer 34A20 (HXX/RR2/LL) (109 d)
              14/5/2008  maize sow plants=7.4, sowing_depth=50,cultivar=psims_111RMoat9,row_spacing=760,crop_class=maize ! Dekalb DKC61-69 (111 d)
              5/5/2009  maize sow plants=8.0, sowing_depth=50,cultivar=psims_105RMoat9, row_spacing=760,crop_class=maize ! Pioneer 35K33 (HXX/RR2/LL) (105 d)
              29/4/2010  maize sow plants=8.0, sowing_depth=50,cultivar=psims_105RMoat9, row_spacing=760,crop_class=maize ! Pioneer 35F44 (HXX/RR2/LL) (105 d)
              11/5/2011  maize sow plants=7.9, sowing_depth=50,cultivar=psims_106RMoat9,row_spacing=760,crop_class=maize ! Fontanelle 6T510 (106 d)
              10/5/2012  maize sow plants=7.9, sowing_depth=50,cultivar=psims_105RMoat9, row_spacing=760,crop_class=maize ! Pioneer P0528XR (HXX/LL/RR2) (105 d)
              24/5/2013  maize sow plants=7.9, sowing_depth=50,cultivar=psims_AmesHailoat9, row_spacing=760,crop_class=maize ! Pioneer 0461XR (HXX/LL/RR2) (104 d)
              7/5/2014  maize sow plants=7.9, sowing_depth=50,cultivar=psims_105RMoat9, row_spacing=760,crop_class=maize ! Pioneer 0591AMX (105 d)
              13/5/2015  maize sow plants=8.9, sowing_depth=50,cultivar=psims_107RMoat9, row_spacing=760,crop_class=maize ! FS 57QX1 RIB (107)
              27/4/2016  maize sow plants=8.6, sowing_depth=50,cultivar=psims_105RMoat9,row_spacing=760,crop_class=maize ! Pioneer P0570AMXT (105 d)
              1/5/2017  maize sow plants=8.6, sowing_depth=50,cultivar=psims_105RMoat9,row_spacing=760,crop_class=maize ! Pioneer P0570AMXT (105 d)
              1/5/2018  maize sow plants=8.6, sowing_depth=50,cultivar=psims_105RMoat9,row_spacing=760,crop_class=maize ! Pioneer P0570AMXT (105 d)
              5/6/2019  maize sow plants=8.6, sowing_depth=50,cultivar=psims_105RMoat9,row_spacing=760,crop_class=maize ! Pioneer P0570AMXT (105 d)
                ! start up period
              1/5/1991  soybean sow plants=40.5,sowing_depth=50,cultivar=psims_24MG,row_spacing=760,crop_class=plant
              1/5/1992  maize sow plants=7.9, sowing_depth=50,cultivar=psims_106RM, row_spacing=760,crop_class=maize
              1/5/1993  soybean sow plants=40.5,sowing_depth=50,cultivar=psims_24MG,row_spacing=760,crop_class=plant
              1/5/1994  maize sow plants=7.9, sowing_depth=50,cultivar=psims_106RM, row_spacing=760,crop_class=maize
              1/5/1995  soybean sow plants=40.5,sowing_depth=50,cultivar=psims_24MG,row_spacing=760,crop_class=plant
              1/5/1996  maize sow plants=7.9, sowing_depth=50,cultivar=psims_106RM, row_spacing=760,crop_class=maize
              1/5/1997  soybean sow plants=40.5,sowing_depth=50,cultivar=psims_24MG,row_spacing=760,crop_class=plant
              1/5/1998  maize sow plants=7.9, sowing_depth=50,cultivar=psims_106RM, row_spacing=760,crop_class=maize
          outputfile -> /simulations/Ames/CC_270_base/CC_270_base/paddock/outputfile: filename=CC_270_oat19.out; title=CC_270_oat19
            variables My Variables -> /simulations/Ames/CC_270_base/CC_270_base/paddock/outputfile/My Variables
            events My Variables Events -> /simulations/Ames/CC_270_base/CC_270_base/paddock/outputfile/My Variables Events
          Soil Soil_Ames1 -> /simulations/Ames/CC_270_base/CC_270_base/paddock/Soil_Ames1
            Water: same as Ames.CC_270_oat5.CC_270_oat5.paddock.Soil_Ames1.Water
    folder CC_270_oat20 -> /simulations/Ames/CC_270_base
      simulation CC_270_oat20 -> /simulations/Ames/CC_270_base/CC_270_base
        area paddock -> /simulations/Ames/CC_270_base/CC_270_base/paddock
          folder Manager folder -> /simulations/Ames/CC_270_base/CC_270_base/paddock/Manager folder
            operations CC_corn_planitng
              5/5/1980  ! this is the maize of the maize-soy rotation in Ames
              19/5/1999  maize sow plants=7.9, sowing_depth=50,cultivar=psims_107RMoat11, row_spacing=760,crop_class=maize ! Pioneer 34G81 (107 d relative maturity)
              5/5/2000  maize sow plants=7.4, sowing_depth=50,cultivar=psims_AmesHailoat11, row_spacing=760,crop_class=maizev! Pioneer 34G81 (107 d)
              9/5/2001  maize sow plants=7.5, sowing_depth=50,cultivar=psims_103RMoat11, row_spacing=760,crop_class=maize !Pioneer P34G13 (103?)
              3/5/2002  maize sow plants=7.9, sowing_depth=50,cultivar=psims_105RMoat11, row_spacing=760,crop_class=maize ! Dekalb 55-51 RR/YGCB (105 d)
              29/4/2003  maize sow plants=7.8, sowing_depth=50,cultivar=psims_108RMoat11, row_spacing=760,crop_class=maize ! Dekalb 58-24 RR/YGCB (108 d)
              27/4/2004  maize sow plants=8.0, sowing_depth=50,cultivar=psims_107RMoat11, row_spacing=760,crop_class=maize ! Dekalb 57-81 RR/YGCB (107 d)
              5/5/2005  maize sow plants=8.0, sowing_depth=50,cultivar=psims_106RMoat11, row_spacing=760,crop_class=maize ! Pioneer 35Y62 HXX/RR2/LL (106 d)
              9/5/2006  maize sow plants=8.0, sowing_depth=50,cultivar=psims_106RMoat11,row_spacing=760,crop_class=maize ! Pioneer 35Y61 (106 d)
              13/5/2007  maize sow plants=8.0, sowing_depth=50,cultivar=psims_109RMoat11,row_spacing=760,crop_class=maize ! Pioneer 34A20 (HXX/RR2/LL) (109 d)
              14/5/2008  maize sow plants=7.4, sowing_depth=50,cultivar=psims_111RMoat11,row_spacing=760,crop_class=maize ! Dekalb DKC61-69 (111 d)
              5/5/2009  maize sow plants=8.0, sowing_depth=50,cultivar=psims_105RMoat11, row_spacing=760,crop_class=maize ! Pioneer 35K33 (HXX/RR2/LL) (105 d)
              29/4/2010  maize sow plants=8.0, sowing_depth=50,cultivar=psims_105RMoat11, row_spacing=760,crop_class=maize ! Pioneer 35F44 (HXX/RR2/LL) (105 d)
              11/5/2011  maize sow plants=7.9, sowing_depth=50,cultivar=psims_106RMoat11,row_spacing=760,crop_class=maize ! Fontanelle 6T510 (106 d)
              10/5/2012  maize sow plants=7.9, sowing_depth=50,cultivar=psims_105RMoat11, row_spacing=760,crop_class=maize ! Pioneer P0528XR (HXX/LL/RR2) (105 d)
              24/5/2013  maize sow plants=7.9, sowing_depth=50,cultivar=psims_AmesHailoat11, row_spacing=760,crop_class=maize ! Pioneer 0461XR (HXX/LL/RR2) (104 d)
              7/5/2014  maize sow plants=7.9, sowing_depth=50,cultivar=psims_105RMoat11, row_spacing=760,crop_class=maize ! Pioneer 0591AMX (105 d)
              13/5/2015  maize sow plants=8.9, sowing_depth=50,cultivar=psims_107RMoat11, row_spacing=760,crop_class=maize ! FS 57QX1 RIB (107)
              27/4/2016  maize sow plants=8.6, sowing_depth=50,cultivar=psims_105RMoat11,row_spacing=760,crop_class=maize ! Pioneer P0570AMXT (105 d)
              1/5/2017  maize sow plants=8.6, sowing_depth=50,cultivar=psims_105RMoat11,row_spacing=760,crop_class=maize ! Pioneer P0570AMXT (105 d)
              1/5/2018  maize sow plants=8.6, sowing_depth=50,cultivar=psims_105RMoat11,row_spacing=760,crop_class=maize ! Pioneer P0570AMXT (105 d)
              5/6/2019  maize sow plants=8.6, sowing_depth=50,cultivar=psims_105RMoat11,row_spacing=760,crop_class=maize ! Pioneer P0570AMXT (105 d)
                ! start up period
              1/5/1991  soybean sow plants=40.5,sowing_depth=50,cultivar=psims_24MG,row_spacing=760,crop_class=plant
              1/5/1992  maize sow plants=7.9, sowing_depth=50,cultivar=psims_106RM, row_spacing=760,crop_class=maize
              1/5/1993  soybean sow plants=40.5,sowing_depth=50,cultivar=psims_24MG,row_spacing=760,crop_class=plant
              1/5/1994  maize sow plants=7.9, sowing_depth=50,cultivar=psims_106RM, row_spacing=760,crop_class=maize
              1/5/1995  soybean sow plants=40.5,sowing_depth=50,cultivar=psims_24MG,row_spacing=760,crop_class=plant
              1/5/1996  maize sow plants=7.9, sowing_depth=50,cultivar=psims_106RM, row_spacing=760,crop_class=maize
              1/5/1997  soybean sow plants=40.5,sowing_depth=50,cultivar=psims_24MG,row_spacing=760,crop_class=plant
              1/5/1998  maize sow plants=7.9, sowing_depth=50,cultivar=psims_106RM, row_spacing=760,crop_class=maize
          outputfile -> /simulations/Ames/CC_270_base/CC_270_base/paddock/outputfile: filename=CC_270_oat20.out; title=CC_270_oat20
            variables My Variables -> /simulations/Ames/CC_270_base/CC_270_base/paddock/outputfile/My Variables
            events My Variables Events -> /simulations/Ames/CC_270_base/CC_270_base/paddock/outputfile/My Variables Events
          Soil Soil_Ames1 -> /simulations/Ames/CC_270_base/CC_270_base/paddock/Soil_Ames1
            Water: same as Ames.CC_270_oat5.CC_270_oat5.paddock.Soil_Ames1.Water
    folder CC_270_oat21 -> /simulations/Ames/CC_270_base
      simulation CC_270_oat21 -> /simulations/Ames/CC_270_base/CC_270_base
        area paddock -> /simulations/Ames/CC_270_base/CC_270_base/paddock
          folder Manager folder -> /simulations/Ames/CC_270_base/CC_270_base/paddock/Manager folder
            operations CC_corn_planitng: same as Ames.CC_270_oat18.CC_270_oat18.paddock.Manager folder.CC_corn_planitng
          outputfile -> /simulations/Ames/CC_270_base/CC_270_base/paddock/outputfile: filename=CC_270_oat21.out; title=CC_270_oat21
            variables My Variables -> /simulations/Ames/CC_270_base/CC_270_base/paddock/outputfile/My Variables
            events My Variables Events -> /simulations/Ames/CC_270_base/CC_270_base/paddock/outputfile/My Variables Events
          Soil Soil_Ames1 -> /simulations/Ames/CC_270_base/CC_270_base/paddock/Soil_Ames1
            Water: same as Ames.CC_270_oat5.CC_270_oat5.paddock.Soil_Ames1.Water
    folder CC_270_oat22 -> /simulations/Ames/CC_270_oat4
      simulation CC_270_oat22 -> /simulations/Ames/CC_270_oat4/CC_270_oat4
        area paddock
          fertiliser
          maize
            ini: filename=XML_corn7.9.xml
          soybean
            ini: filename=XML_soy7.9.xml
          folder Manager folder
            manager N Deposition: same as Ames.Ames_Weather.Ames_weather.paddock.Manager folder.N Deposition
            manager fall tillage: same as Ames.Ames_Weather.Ames_weather.paddock.Manager folder.Fall Tillage
            manager Spring Tillage: same as Ames.Ames_Weather.Ames_weather.paddock.Manager folder.Spring Tillage
            manager Spring Cultivator: same as Ames.Ames_Weather.Ames_weather.paddock.Manager folder.Spring Cultivator
            operations CC_maize_Nfert: same as Ames.CC_270_base.CC_270_base.paddock.Manager folder.CC_maize_Nfert
            operations CC_corn_planitng
              5/5/1980  ! this is the maize of the maize-soy rotation in Ames
              19/5/1999  maize sow plants=7.9, sowing_depth=50,cultivar=psims_107RMrfv2, row_spacing=760,crop_class=maize ! Pioneer 34G81 (107 d relative maturity)
              5/5/2000  maize sow plants=7.4, sowing_depth=50,cultivar=psims_AmesHailrfv, row_spacing=760,crop_class=maizev! Pioneer 34G81 (107 d)
              9/5/2001  maize sow plants=7.5, sowing_depth=50,cultivar=psims_103RMrfv2, row_spacing=760,crop_class=maize !Pioneer P34G13 (103?)
              3/5/2002  maize sow plants=7.9, sowing_depth=50,cultivar=psims_105RMrfv2, row_spacing=760,crop_class=maize ! Dekalb 55-51 RR/YGCB (105 d)
              29/4/2003  maize sow plants=7.8, sowing_depth=50,cultivar=psims_108RMrfv2, row_spacing=760,crop_class=maize ! Dekalb 58-24 RR/YGCB (108 d)
              27/4/2004  maize sow plants=8.0, sowing_depth=50,cultivar=psims_107RMrfv2, row_spacing=760,crop_class=maize ! Dekalb 57-81 RR/YGCB (107 d)
              5/5/2005  maize sow plants=8.0, sowing_depth=50,cultivar=psims_106RMrfv2, row_spacing=760,crop_class=maize ! Pioneer 35Y62 HXX/RR2/LL (106 d)
              9/5/2006  maize sow plants=8.0, sowing_depth=50,cultivar=psims_106RMrfv2,row_spacing=760,crop_class=maize ! Pioneer 35Y61 (106 d)
              13/5/2007  maize sow plants=8.0, sowing_depth=50,cultivar=psims_109RMrfv2,row_spacing=760,crop_class=maize ! Pioneer 34A20 (HXX/RR2/LL) (109 d)
              14/5/2008  maize sow plants=7.4, sowing_depth=50,cultivar=psims_111RMrfv2,row_spacing=760,crop_class=maize ! Dekalb DKC61-69 (111 d)
              5/5/2009  maize sow plants=8.0, sowing_depth=50,cultivar=psims_105RMrfv2, row_spacing=760,crop_class=maize ! Pioneer 35K33 (HXX/RR2/LL) (105 d)
              29/4/2010  maize sow plants=8.0, sowing_depth=50,cultivar=psims_105RMrfv2, row_spacing=760,crop_class=maize ! Pioneer 35F44 (HXX/RR2/LL) (105 d)
              11/5/2011  maize sow plants=7.9, sowing_depth=50,cultivar=psims_106RMrfv2,row_spacing=760,crop_class=maize ! Fontanelle 6T510 (106 d)
              10/5/2012  maize sow plants=7.9, sowing_depth=50,cultivar=psims_105RMrfv2, row_spacing=760,crop_class=maize ! Pioneer P0528XR (HXX/LL/RR2) (105 d)
              24/5/2013  maize sow plants=7.9, sowing_depth=50,cultivar=psims_AmesHailrfv, row_spacing=760,crop_class=maize ! Pioneer 0461XR (HXX/LL/RR2) (104 d)
              7/5/2014  maize sow plants=7.9, sowing_depth=50,cultivar=psims_105RMrfv2, row_spacing=760,crop_class=maize ! Pioneer 0591AMX (105 d)
              13/5/2015  maize sow plants=8.9, sowing_depth=50,cultivar=psims_107RMrfv2, row_spacing=760,crop_class=maize ! FS 57QX1 RIB (107)
              27/4/2016  maize sow plants=8.6, sowing_depth=50,cultivar=psims_105RMrfv2,row_spacing=760,crop_class=maize ! Pioneer P0570AMXT (105 d)
              1/5/2017  maize sow plants=8.6, sowing_depth=50,cultivar=psims_105RMrfv2,row_spacing=760,crop_class=maize ! Pioneer P0570AMXT (105 d)
              1/5/2018  maize sow plants=8.6, sowing_depth=50,cultivar=psims_105RMrfv2,row_spacing=760,crop_class=maize ! Pioneer P0570AMXT (105 d)
              5/6/2019  maize sow plants=8.6, sowing_depth=50,cultivar=psims_105RMrfv2,row_spacing=760,crop_class=maize ! Pioneer P0570AMXT (105 d)
                ! start up period
              1/5/1991  soybean sow plants=40.5,sowing_depth=50,cultivar=psims_24MG,row_spacing=760,crop_class=plant
              1/5/1992  maize sow plants=7.9, sowing_depth=50,cultivar=psims_106RM, row_spacing=760,crop_class=maize
              1/5/1993  soybean sow plants=40.5,sowing_depth=50,cultivar=psims_24MG,row_spacing=760,crop_class=plant
              1/5/1994  maize sow plants=7.9, sowing_depth=50,cultivar=psims_106RM, row_spacing=760,crop_class=maize
              1/5/1995  soybean sow plants=40.5,sowing_depth=50,cultivar=psims_24MG,row_spacing=760,crop_class=plant
              1/5/1996  maize sow plants=7.9, sowing_depth=50,cultivar=psims_106RM, row_spacing=760,crop_class=maize
              1/5/1997  soybean sow plants=40.5,sowing_depth=50,cultivar=psims_24MG,row_spacing=760,crop_class=plant
              1/5/1998  maize sow plants=7.9, sowing_depth=50,cultivar=psims_106RM, row_spacing=760,crop_class=maize
            operations CC_harvest: same as Ames.CC_270_base.CC_270_base.paddock.Manager folder.CC_harvest
          manager Calculations: same as Ames.common.Calculations
          tracker: same as Ames.common.tracker
          manager2 Stage Day of Year: same as Ames.common.Stage Day of Year
          manager Stage Day Info: same as Ames.common.Stage Day Info
          manager2 InitialiseWaterTableOnce: same as Ames.common.InitialiseWaterTableOnce
          manager2 Reporter_Annual: same as Ames.common.Reporter_Annual
          manager Temperature Day Info: same as Ames.common.Temperature Day Info
          manager WT_script
            on start_of_day:
            script: same as in Ames.common.WT_script
          outputfile: filename=CC_270_oat22.out; title=CC_270_oat22
            variables My Variables: same as Ames.common.outputfile.My Variables
            events My Variables Events: event=end_year
          Soil Soil_Ames1: same as Ames.common.Soil_Ames
          surfaceom SurfaceOrganicMatter
            PoolName = soybean  # Organic Matter pool name
            type = soybean  # Organic Matter type
            mass = 2000  # Initial surface residue (kg/ha)
            cnr = 45  # C:N ratio of initial residue
            standing_fraction = 0.0  # Fraction of residue standing
            ini: filename=SurfaceOM_7.9.xml
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