folder simulations: version=37; creator=Apsim 7.9-r4044
  folder Locations
    simulation CornSoy_plot1
      metfile met: filename=AmesMay13.2019.met
      clock
        start_date = 01/01/2013  # Enter the start date of the simulation
        end_date = 31/12/2018  # Enter the end date of the simulation
      summaryfile
      area paddock
        surfaceom SurfaceOrganicMatter
          PoolName = soybean  # Organic Matter pool name
          type = soybean  # Organic Matter type
          mass = 2000  # Initial surface residue (kg/ha)
          cnr = 45  # C:N ratio of initial residue
          standing_fraction = 0.0  # Fraction of residue standing
        fertiliser
        maize
          ini: filename=XML_corn7.9.xml
        soybean
          ini: filename=XML_soy7.9.xml
        manager WT_script
          on start_of_day:
```
bbc_potential = 390 - 130 ! profile depth minus WR


if AnnualRain > 0 then 
EORRatio = AnnualEO / AnnualRain  ! EO is potential ET theoretical not affected by Rain
endif

RainSurplus = AnnualRain - AnnualEO
```
        folder Manager folder
          manager N Deposition
            #
            ppm = 0.0078  # What to multiply rain by?
            # Model side stuff
            varname = N_deposition  # Name of the NO3_N deposition variable as seen by the model
            fertmodule = fertiliser  # Name of module that applies nitrogen
            on start_of_day:
```
         
            [varname] = rain * [ppm]
            N_deposition_tot = N_deposition_tot + [varname]
            if (rain > 0) then
               [fertmodule] apply amount = [varname](kg/ha), depth = 0 (mm), type = NO3_N ()
            endif
```
          manager Tillage21
            # When should tillage be done
            tillage_date = 24-apr  # Enter tillage date (dd-mmm)
            # Tillage application details
            surfaceommodule = SurfaceOrganicMatter  # Module used to apply the tillage
            tillage_type = user_defined
            tillage_depth = 50  # User_defined depth of seedbed preparation (mm)
            tillage_f_incorp = 0.25  # User_defined fraction of surface residues to incorporate (0-1)
            on start_of_day:
```
         if (today = date('[tillage_date]') then
            if ('[tillage_type]' = 'user_defined') then
                '[surfaceommodule]' tillage type = [tillage_type], f_incorp = [tillage_f_incorp] (), tillage_depth = [tillage_depth]
            else
                '[surfaceommodule]' tillage type = [tillage_type]
            endif
            ready_to_till_pre_sow = 0
            till_day_pre_sow = 0
         endif
```
          operations CornSoy
            10/4/1980  ! my notes
            4/5/2013  maize sow plants = 7.8 (plants/m^2), sowing_depth = 50. , cultivar = B_110, row_spacing = 750
            7/5/2013  fertiliser apply  amount = 120 (kg/ha), depth = 50 (mm), type = urea_n
            6/6/2013  fertiliser apply  amount = 40 (kg/ha), depth = 50 (mm), type = uan_n
            10/10/2013  maize end_crop
            10/10/2013  maize harvest
            11/11/2013  'surfaceorganicmatter' tillage type = user_defined, f_incorp = 0.75 (), tillage_depth = 50
            7/7/2013  ! placeholder for harvest time to put the specific and also after that for any tillage operations
            5/5/2014  soybean sow plants = 35 (plants/m^2), sowing_depth = 50. , cultivar = MG_2, row_spacing = 750
            5/5/2015  maize sow plants = 7.8 (plants/m^2), sowing_depth = 50. , cultivar = B_110, row_spacing = 750
            5/5/2015  ! this year we had a hail storm
            7/5/2015  fertiliser apply  amount = 280 (kg/ha), depth = 50 (mm), type = urea_n
            5/5/2016  soybean sow plants = 35 (plants/m^2), sowing_depth = 50. , cultivar = MG_3, row_spacing = 750
            5/5/2017  maize sow plants = 3.8 (plants/m^2), sowing_depth = 50. , cultivar = B_110, row_spacing = 750
            5/5/2015  ! this year we had a hail storm
            7/5/2017  fertiliser apply  amount = 80 (kg/ha), depth = 50 (mm), type = urea_n
            5/5/2018  soybean sow plants = 35 (plants/m^2), sowing_depth = 50. , cultivar = MG_3, row_spacing = 750
          manager Harvest soybean
            # Harvesting criteria
            crop = soybean  # Enter name of crop to harvest when ripe
            on end_of_day:
```
           if ('[crop]' = 'cotton') then
              if ([crop].ozcot_status > 0) then
                  [crop] harvest
              endif
           elseif ([crop].StageName = 'harvest_ripe' or [crop].plant_status = 'dead') then
              [crop]  harvest
              [crop]  end_crop
           endif
```
          manager Harvest maize
            # Harvesting criteria
            crop = maize  # Enter name of crop to harvest when ripe
            on end_of_day:
            script: same as in Locations.CornSoy_plot1.paddock.Manager folder.Harvest soybean
        outputfile: filename=CornSoy_plot1.out; title=CornSoy_plot1
          variables My Variables
            variables: dd/mm/yyyy as Date, year, yield, biomass, watertable, no3(), surfaceom_wt, lai
          events My Variables Events: event=daily
        Soil Soil_Ames: SoilType=Nicollet; NearestTown=Ames; Region=Boone; State=Iowa; Country=US; ApsoilNumber=34; Latitude=42.02204; Longitude=-93.769115; YearOfSampling=0; DataSource=mesured data and web soil survey; Comments=hydrological parameters and BD from Saxton and Rawls, 2006
          Water
            Thickness  BD    AirDry  LL15   DUL    SAT       KS
            25         1.25  0.087   0.174  0.31   0.445     146
            25         1.25  0.087   0.174  0.31   0.455     146
            50         1.25  0.087   0.174  0.3    0.42      146
            100        1.25  0.132   0.165  0.25   0.43      146
            100        1.25  0.12    0.12   0.22   0.35      146
            150        1.35  0.11    0.11   0.21   0.34      146
            150        1.35  0.102   0.102  0.22   0.33      133
            150        1.36  0.126   0.126  0.265  0.393     133
            150        1.36  0.133   0.133  0.261  0.393     133
            150        1.36  0.128   0.128  0.253  0.393     388
            150        1.6   0.128   0.128  0.2    0.393     388
            300        1.6   0.09    0.09   0.2    0.393     388
            300        1.6   0.09    0.09   0.2    0.284579  54.2361
            300        1.6   0.09    0.09   0.2    0.272798  33.1104
            300        1.6   0.09    0.09   0.2    0.262658  20.2134
            300        1.6   0.09    0.09   0.2    0.25393   12.34
            300        1.6   0.09    0.09   0.2    0.246418  7.5334
            300        1.6   0.09    0.09   0.2    0.239952  4.59904
            300        1.6   0.09    0.09   0.2    0.234387  2.80765
            300        1.6   0.09    0.09   0.2    0.229598  1.71403
            BD source: Field measured and checked for sensibility (layer 2, 3, 4)
            AirDry source: Estimated based on local knowledge (layer 1, 2, 3, 4)
            LL15 source: Estimated based on local knowledge (layer 2, 3, 4)
            DUL source: Field measured and checked for sensibility (layer 1, 2, 3, 4)
            SAT source: Calculated from measured, estimated or calculated BD (layer 1, 2, 3, 4)
            SoilCrop maize
              LL=[0.174, 0.174, 0.174, 0.165, 0.12, 0.136161, 0.143527, 0.18676725, 0.197952, 0.200536, 0.174202, 0.169252, 0.178877, 0.188, 0.188, 0.188, 0.188, 0.188, 0.188, 0.188]
              KL=[0.08, 0.08, 0.08, 0.08, 0.08, 0.08, 0.08, 0.08, 0.08, 0.08, 0.08, 0.0422964, 0.0350564, 0.0261367, 0.022015, 0.0162927, 0.0111758, 0.0067466, 0.00313554, 0.000603434]
              XF=[1, 1, 1, 1, 1, 1, 1, 1, 1, 1, 1, 1, 1, 0.4, 0.4, 0, 0, 0, 0, 0]
              LL source: Estimated based on local knowledge (layer 2, 3, 4)
            SoilCrop soybean
              LL=[0.174, 0.174, 0.174, 0.165, 0.12, 0.136161, 0.143527, 0.18676725, 0.197952, 0.200536, 0.174202, 0.169252, 0.178877, 0.188, 0.188, 0.188, 0.188, 0.188, 0.188, 0.188]
              KL=[0.08, 0.08, 0.08, 0.08, 0.08, 0.08, 0.08, 0.08, 0.08, 0.08, 0.08, 0.0422964, 0.0350564, 0.0261367, 0.022015, 0.0162927, 0.0111758, 0.0067466, 0.00313554, 0.000603434]
              XF=[1, 1, 1, 1, 1, 1, 1, 1, 1, 1, 1, 1, 1, 0.4, 0.4, 0, 0, 0, 0, 0]
              LL source: Estimated based on local knowledge (layer 1, 2, 3, 4)
          SoilOrganicMatter: RootCN=29.8; RootWt=1586.8; SoilCN=12.5; EnrACoeff=7.4; EnrBCoeff=0.2; OCUnits=Total
            Thickness  OC    FBiom       FInert
            25         2.47  0.165       0.41975
            25         2.41  0.165       0.41975
            50         2.41  0.110863    0.41975
            100        2.38  0.0699684   0.4827125
            100        1.97  0.0498419   0.5246875
            150        1.95  0.0384185   0.802815
            150        0.97  0.0306479   0.82524
            150        0.97  0.0256472   0.84916
            150        0.49  0.0226493   0.87009
            150        0.49  0.0201211   0.999
            150        0.49  0.0183055   0.999
            300        0.49  0.0162662   0.999
            300        0.49  0.014237    0.999
            300        0.49  0.01274218  0.999
            300        0.49  0.0115872   0.999
            300        0.1   0.0106631   0.999
            300        0.1   0.00990398  0.999
            300        0.1   0.0092672   0.999
            300        0.1   0.00872398  0.999
            300        0.1   0.0082541   0.999
            OC source: Estimated based on local knowledge (layer 1, 2, 3, 4)
          Analysis: PHUnits=Water; BoronUnits=HotWater
            Thickness  PH    CEC    ParticleSizeSand  ParticleSizeSilt  ParticleSizeClay
            25         7.48  25.8   41.3              29.78             28.92
            25         7.48  25.8   41.3              29.78             28.92
            50         7.48  25.8   41.3              29.78             28.92
            100        7.38  25.85  40.16             32.59             27.26
            100        7.43  26.57  37.77             33.01             29.22
            150        7.43  26.57  37.77             33.01             29.22
            150        7.73  23.41  44.39             28.07             27.54
            150        7.73  23.41  44.39             28.07             27.54
            150        8.08  33.6   49.07             28.9              22.03
            150        8.08  33.6   49.07             28.9              22.03
            150        8.08  33.6   49.07             28.9              22.03
            300        8.08  33.6   49.07             28.9              22.03
            300        8.08  33.6   49.07             28.9              22.03
            300        8.08  33.6   49.07             28.9              22.03
            300        8.08  33.6   49.07             28.9              22.03
            300        8.08  33.6   49.07             28.9              22.03
            300        8.08  33.6   49.07             28.9              22.03
            300        8.08  33.6   49.07             28.9              22.03
            300        8.08  33.6   49.07             28.9              22.03
            300        8.08  33.6   49.07             28.9              22.03
            PH source: Estimated based on local knowledge (layer 1, 2, 3, 4)
            ParticleSizeSand, ParticleSizeSilt source: Measured (layer 1)
            ParticleSizeClay source: Measured (layer 1, 2)
          Sample Initial nitrogen: NO3Units=kgha; NH4Units=kgha; SWUnits=Volumetric; OCUnits=Total; PHUnits=Water
            Thickness  NO3  NH4  SW
            25         2.2  4    0.31
            25         2.3  4    0.31
            50         3    4    0.3
            100        3    4    0.25
            100        2    4    0.22
            150        2    4    0.21
            150        2    4    0.22
            150        1.1  1    0.265
            150        1.1  1    0.261
            150        1    1    0.253
            150        0.7  1    0.2
            300        0.5  0.3  0.393
            300        0.9  0.4  0.285
            300        0.8  0    0.273
            300        0    0    0.263
            300        0.9  0.4  0.254
            300        0.9  0.4  0.246
            300        0.9  0.4  0.24
            300        0.8  0    0.234
            300        0    0    0.23
          Swim: Salb=0.13; CN2Bare=65; CNRed=20; CNCov=0.8; KDul=0.3; PSIDul=-300; VC=true; DTmin=0; DTmax=1440; MaxWaterIncrement=10; SpaceWeightingFactor=0; SoluteSpaceWeightingFactor=0; Diagnostics=false
            SwimSoluteParameters: Dis=15; Disp=1; A=1; DTHP=1
              zero: DTHC, WaterTableCl, WaterTableNO3, WaterTableNH4, WaterTableUrea, WaterTableTracer, WaterTableMineralisationInhibitor, WaterTableUreaseInhibitor, WaterTableNitrificationInhibitor, WaterTableDenitrificationInhibitor
              Thickness  NO3Exco  NO3FIP  NH4Exco  NH4FIP  UreaExco  UreaFIP  ClExco  ClFIP
              1000       0        1       100      1       0         1        0       1
              1000       0        1       100      1       0         1        0       1
              1000       0        1       100      1       0         1        0       1
            SwimSubsurfaceDrain: DrainDepth=1100; DrainSpacing=99000; DrainRadius=50; Klat=1; ImpermDepth=3000
          SoilTemperature: BoundaryLayerConductance=20
            Thickness=[25, 25, 50, 100, 100, 150, 150, 150, 150, 150, 150, 300, 300, 300, 300, 300, 300, 300, 300, 300]
            InitialSoilTemperature=[10, 10, 10, 10, 10, 10, 10, 10, 10, 10, 9, 9, 9, 10, 10, 10, 10, 9, 9, 9]
  folder Management
    folder example managers
      manager N Deposition: same as Locations.CornSoy_plot1.paddock.Manager folder.N Deposition
      manager Tillage21: same as Locations.CornSoy_plot1.paddock.Manager folder.Tillage21
      operations CS_maize_Nfert
        10/4/1980  ! my notes
        4/5/2000  fertiliser apply  amount = 120 (kg/ha), depth = 50 (mm), type = urea_n
        7/5/2002  fertiliser apply  amount = 121 (kg/ha), depth = 50 (mm), type = urea_n
        14/5/2004  fertiliser apply  amount = 122 (kg/ha), depth = 50 (mm), type = urea_n
      operations CS_soy_planitng
        5/5/1980  ! this is the maize of the maize-soy rotation in Ames
        4/5/2001  soybean sow plants = 35 (plants/m^2), sowing_depth = 50. , cultivar = MG_2, row_spacing = 750
        7/5/2003  soybean sow plants = 35 (plants/m^2), sowing_depth = 50. , cultivar = MG_2, row_spacing = 750
        14/5/2005  soybean sow plants = 35 (plants/m^2), sowing_depth = 50. , cultivar = MG_2, row_spacing = 750
      operations CS_corn_planitng
        5/5/1980  ! this is the maize of the maize-soy rotation in Ames
        4/5/2000  maize sow plants = 7.8 (plants/m^2), sowing_depth = 50. , cultivar = B_110, row_spacing = 750
        7/5/2002  maize sow plants = 7.8 (plants/m^2), sowing_depth = 50. , cultivar = B_110, row_spacing = 750
        14/5/2004  maize sow plants = 7.8 (plants/m^2), sowing_depth = 50. , cultivar = B_110, row_spacing = 750
      operations CS_harvest
        5/5/1980  ! ask isaiah probably you need to put both end_crop and then harvest
      manager Harvest soybean: same as Locations.CornSoy_plot1.paddock.Manager folder.Harvest soybean
      manager Harvest maize: same as Locations.CornSoy_plot1.paddock.Manager folder.Harvest maize
  folder ames
    simulation ames-2000
      metfile met
        filename=C:\Users\vnichols\Box Sync\Gina_APSIM_modeling\yield-gap-gina\wea-data\ames_2000-2016.met
      clock
        start_date = 01/01/2000  # Enter the start date of the simulation
        end_date = 31/12/2000  # Enter the end date of the simulation
      summaryfile
      area paddock
        surfaceom SurfaceOrganicMatter
          PoolName = soybean  # Organic Matter pool name
          type = soybean  # Organic Matter type
          mass = 0  # Initial surface residue (kg/ha)
          cnr = 45  # C:N ratio of initial residue
          standing_fraction = 0.0  # Fraction of residue standing
        fertiliser
        maize
          ini: filename=XML_corn7.9.xml
        manager WT_script
          on start_of_day:
          script: same as in Locations.CornSoy_plot1.paddock.WT_script
        folder Manager folder
          manager N Deposition: same as Locations.CornSoy_plot1.paddock.Manager folder.N Deposition
          manager Tillage21: same as Locations.CornSoy_plot1.paddock.Manager folder.Tillage21
          manager Harvest maize: same as Locations.CornSoy_plot1.paddock.Manager folder.Harvest maize
          manager Sow on a fixed date
            # Sowing criteria
            date = 15-apr  # Enter sowing date (dd-mmm)
            # Sowing parameters
            crop = maize  # Enter name of crop to sow
            density = 0  # Enter sowing density (plants/m2)
            depth = 50  # Enter sowing depth (mm)
            cultivar = B_110  # Enter cultivar
            class = plant  # Enter crop growth class
            row_spacing = 500  # Enter row spacing (mm)
            on start_of_day:
```
        if (today = date('[date]') then
              [crop] sow plants =[density], sowing_depth = [depth], cultivar = [cultivar], row_spacing = [row_spacing], crop_class = [class]
         endif
```
        outputfile: filename=ames-2000.out; title=ames-2000
          variables My Variables
            variables: dd/mm/yyyy as Date, year, yield, biomass, watertable, no3(), surfaceom_wt, lai, dlt_n_min(), Rain
          events My Variables Events: event=daily
        Soil Soil_Ames: same as Locations.CornSoy_plot1.paddock.Soil_Ames
        manager2 InitialiseWaterTable
          InitDOY = 1  # Day of year to initialise the water table
          WTDepth = 700  # Depth to water table (mm)
```vb
Imports System
Imports ModelFramework
Imports CSGeneral
Imports System.Collections.Generic

Public Class Script
   
   <Link()> Dim MySimulation As Simulation
   <Link()> Dim Clock As Clock
   <Param()> Dim InitDOY As Integer
   <Param()> Dim WTDepth As Single
   <Input> Private dlayer As Double()           'Array of soil layer thicknesses - for calculation of mineral N in the soil
   <Input> Dim Today As DateTime                ' Equates to the value of the current simulation date - from CLOCK
   
   <Output> Dim ProfileDepth As Double
   <Output> Dim BBCPotential As Double
   <Output> Dim InitPsi() As Double
      
   <EventHandler()> Public Sub OnInit()
      ProfileDepth = 0
      BBCPotential = 0
      
   End Sub
   
   <EventHandler()> Public Sub OnPrepare()

      If (today.DayOfYear = InitDOY) Then
         ProfileDepth = MathUtility.Sum(dlayer)
         BBCPotential = (ProfileDepth - WTDepth) / 10
         ReDim InitPsi(dlayer.length - 1) 
         
         InitPsi(dlayer.length - 1) = BBCPotential 
         InitPsi(0) = -WTDepth / 10.0
         InitPsi(1) = InitPsi(0) + (dlayer(0) + dlayer(1) / 2) / 10
         Dim i As Integer
         
         For i = 2 To dlayer.length - 2
            InitPsi(i) = InitPsi(i - 1) + (dlayer(i - 1) + dlayer(i)) / 2 / 10   
         Next
         
         'Dim SWIM As Component = MySimulation.LinkByName("SWIM")
         MySimulation.Set("psi", InitPsi)
         MySimulation.Set("bbc_potential", BBCPotential)
         
      End If      
      
      
   End Sub


End Class
```
    simulation ames-2001 -> /simulations/ames/ames-2000
      clock
        start_date = 01/01/2001  # Enter the start date of the simulation
        end_date = 31/12/2001  # Enter the end date of the simulation
      area paddock -> /simulations/ames/ames-2000/paddock
        folder Manager folder -> /simulations/ames/ames-2000/paddock/Manager folder
          manager Sow on a fixed date: same as ames.ames-2000.paddock.Manager folder.Sow on a fixed date
        outputfile -> /simulations/ames/ames-2000/paddock/outputfile: filename=ames-2001.out; title=ames-2001
          variables My Variables -> /simulations/ames/ames-2000/paddock/outputfile/My Variables
          events My Variables Events -> /simulations/ames/ames-2000/paddock/outputfile/My Variables Events
        manager2 InitialiseWaterTable: same as ames.ames-2000.paddock.InitialiseWaterTable
    simulation ames-2002 -> /simulations/ames/ames-2000
      clock
        start_date = 01/01/2002  # Enter the start date of the simulation
        end_date = 31/12/2002  # Enter the end date of the simulation
      area paddock -> /simulations/ames/ames-2000/paddock
        outputfile -> /simulations/ames/ames-2000/paddock/outputfile: filename=ames-2002.out; title=ames-2002
          variables My Variables -> /simulations/ames/ames-2000/paddock/outputfile/My Variables
          events My Variables Events -> /simulations/ames/ames-2000/paddock/outputfile/My Variables Events
        manager2 InitialiseWaterTable: same as ames.ames-2000.paddock.InitialiseWaterTable
        manager2 InitialiseWaterTable1: same as ames.ames-2000.paddock.InitialiseWaterTable
    simulation ames-2003 -> /simulations/ames/ames-2000
      clock
        start_date = 01/01/2003  # Enter the start date of the simulation
        end_date = 31/12/2003  # Enter the end date of the simulation
      area paddock -> /simulations/ames/ames-2000/paddock
        outputfile -> /simulations/ames/ames-2000/paddock/outputfile: filename=ames-2003.out; title=ames-2003
          variables My Variables -> /simulations/ames/ames-2000/paddock/outputfile/My Variables
          events My Variables Events -> /simulations/ames/ames-2000/paddock/outputfile/My Variables Events
        manager2 InitialiseWaterTable: same as ames.ames-2000.paddock.InitialiseWaterTable
        manager2 InitialiseWaterTable1: same as ames.ames-2000.paddock.InitialiseWaterTable
    simulation ames-2004 -> /simulations/ames/ames-2000
      clock
        start_date = 01/01/2004  # Enter the start date of the simulation
        end_date = 31/12/2004  # Enter the end date of the simulation
      area paddock -> /simulations/ames/ames-2000/paddock
        outputfile -> /simulations/ames/ames-2000/paddock/outputfile: filename=ames-2004.out; title=ames-2004
          variables My Variables -> /simulations/ames/ames-2000/paddock/outputfile/My Variables
          events My Variables Events -> /simulations/ames/ames-2000/paddock/outputfile/My Variables Events
        manager2 InitialiseWaterTable: same as ames.ames-2000.paddock.InitialiseWaterTable
        manager2 InitialiseWaterTable1: same as ames.ames-2000.paddock.InitialiseWaterTable
    simulation ames-2005 -> /simulations/ames/ames-2000
      clock
        start_date = 01/01/2005  # Enter the start date of the simulation
        end_date = 31/12/2005  # Enter the end date of the simulation
      area paddock -> /simulations/ames/ames-2000/paddock
        outputfile -> /simulations/ames/ames-2000/paddock/outputfile: filename=ames-2005.out; title=ames-2005
          variables My Variables -> /simulations/ames/ames-2000/paddock/outputfile/My Variables
          events My Variables Events -> /simulations/ames/ames-2000/paddock/outputfile/My Variables Events
        manager2 InitialiseWaterTable: same as ames.ames-2000.paddock.InitialiseWaterTable
    simulation ames-2006 -> /simulations/ames/ames-2000
      clock
        start_date = 01/01/2006  # Enter the start date of the simulation
        end_date = 31/12/2006  # Enter the end date of the simulation
      area paddock -> /simulations/ames/ames-2000/paddock
        outputfile -> /simulations/ames/ames-2000/paddock/outputfile: filename=ames-2006.out; title=ames-2006
          variables My Variables -> /simulations/ames/ames-2000/paddock/outputfile/My Variables
          events My Variables Events -> /simulations/ames/ames-2000/paddock/outputfile/My Variables Events
        manager2 InitialiseWaterTable: same as ames.ames-2000.paddock.InitialiseWaterTable
    simulation ames-2007 -> /simulations/ames/ames-2000
      clock
        start_date = 01/01/2007  # Enter the start date of the simulation
        end_date = 31/12/2007  # Enter the end date of the simulation
      area paddock -> /simulations/ames/ames-2000/paddock
        outputfile -> /simulations/ames/ames-2000/paddock/outputfile: filename=ames-2007.out; title=ames-2007
          variables My Variables -> /simulations/ames/ames-2000/paddock/outputfile/My Variables
          events My Variables Events -> /simulations/ames/ames-2000/paddock/outputfile/My Variables Events
        manager2 InitialiseWaterTable: same as ames.ames-2000.paddock.InitialiseWaterTable
    simulation ames-2008 -> /simulations/ames/ames-2000
      clock
        start_date = 01/01/2008  # Enter the start date of the simulation
        end_date = 31/12/2008  # Enter the end date of the simulation
      area paddock -> /simulations/ames/ames-2000/paddock
        outputfile -> /simulations/ames/ames-2000/paddock/outputfile: filename=ames-2008.out; title=ames-2008
          variables My Variables -> /simulations/ames/ames-2000/paddock/outputfile/My Variables
          events My Variables Events -> /simulations/ames/ames-2000/paddock/outputfile/My Variables Events
        manager2 InitialiseWaterTable: same as ames.ames-2000.paddock.InitialiseWaterTable
    simulation ames-2009 -> /simulations/ames/ames-2000
      clock
        start_date = 01/01/2009  # Enter the start date of the simulation
        end_date = 31/12/2009  # Enter the end date of the simulation
      area paddock -> /simulations/ames/ames-2000/paddock
        outputfile -> /simulations/ames/ames-2000/paddock/outputfile: filename=ames-2009.out; title=ames-2009
          variables My Variables -> /simulations/ames/ames-2000/paddock/outputfile/My Variables
          events My Variables Events -> /simulations/ames/ames-2000/paddock/outputfile/My Variables Events
        manager2 InitialiseWaterTable: same as ames.ames-2000.paddock.InitialiseWaterTable
    simulation ames-2010 -> /simulations/ames/ames-2000
      clock
        start_date = 01/01/2010  # Enter the start date of the simulation
        end_date = 31/12/2010  # Enter the end date of the simulation
      area paddock -> /simulations/ames/ames-2000/paddock
        outputfile -> /simulations/ames/ames-2000/paddock/outputfile: filename=ames-2010.out; title=ames-2010
          variables My Variables -> /simulations/ames/ames-2000/paddock/outputfile/My Variables
          events My Variables Events -> /simulations/ames/ames-2000/paddock/outputfile/My Variables Events
        manager2 InitialiseWaterTable: same as ames.ames-2000.paddock.InitialiseWaterTable
    simulation ames-2011 -> /simulations/ames/ames-2000
      clock
        start_date = 01/01/2011  # Enter the start date of the simulation
        end_date = 31/12/2011  # Enter the end date of the simulation
      area paddock -> /simulations/ames/ames-2000/paddock
        outputfile -> /simulations/ames/ames-2000/paddock/outputfile: filename=ames-2011.out; title=ames-2011
          variables My Variables -> /simulations/ames/ames-2000/paddock/outputfile/My Variables
          events My Variables Events -> /simulations/ames/ames-2000/paddock/outputfile/My Variables Events
        manager2 InitialiseWaterTable: same as ames.ames-2000.paddock.InitialiseWaterTable
    simulation ames-2012 -> /simulations/ames/ames-2000
      clock
        start_date = 01/01/2012  # Enter the start date of the simulation
        end_date = 31/12/2012  # Enter the end date of the simulation
      area paddock -> /simulations/ames/ames-2000/paddock
        outputfile -> /simulations/ames/ames-2000/paddock/outputfile: filename=ames-2012.out; title=ames-2012
          variables My Variables -> /simulations/ames/ames-2000/paddock/outputfile/My Variables
          events My Variables Events -> /simulations/ames/ames-2000/paddock/outputfile/My Variables Events
        manager2 InitialiseWaterTable: same as ames.ames-2000.paddock.InitialiseWaterTable
    simulation ames-2013 -> /simulations/ames/ames-2000
      clock
        start_date = 01/01/2013  # Enter the start date of the simulation
        end_date = 31/12/2013  # Enter the end date of the simulation
      area paddock -> /simulations/ames/ames-2000/paddock
        outputfile -> /simulations/ames/ames-2000/paddock/outputfile: filename=ames-2013.out; title=ames-2013
          variables My Variables -> /simulations/ames/ames-2000/paddock/outputfile/My Variables
          events My Variables Events -> /simulations/ames/ames-2000/paddock/outputfile/My Variables Events
        manager2 InitialiseWaterTable: same as ames.ames-2000.paddock.InitialiseWaterTable
    simulation ames-2014 -> /simulations/ames/ames-2000
      clock
        start_date = 01/01/2014  # Enter the start date of the simulation
        end_date = 31/12/2014  # Enter the end date of the simulation
      area paddock -> /simulations/ames/ames-2000/paddock
        outputfile -> /simulations/ames/ames-2000/paddock/outputfile: filename=ames-2014.out; title=ames-2014
          variables My Variables -> /simulations/ames/ames-2000/paddock/outputfile/My Variables
          events My Variables Events -> /simulations/ames/ames-2000/paddock/outputfile/My Variables Events
        manager2 InitialiseWaterTable: same as ames.ames-2000.paddock.InitialiseWaterTable
    simulation ames-2015 -> /simulations/ames/ames-2000
      clock
        start_date = 01/01/2015  # Enter the start date of the simulation
        end_date = 31/12/2015  # Enter the end date of the simulation
      area paddock -> /simulations/ames/ames-2000/paddock
        outputfile -> /simulations/ames/ames-2000/paddock/outputfile: filename=ames-2015.out; title=ames-2015
          variables My Variables -> /simulations/ames/ames-2000/paddock/outputfile/My Variables
          events My Variables Events -> /simulations/ames/ames-2000/paddock/outputfile/My Variables Events
        manager2 InitialiseWaterTable: same as ames.ames-2000.paddock.InitialiseWaterTable
    simulation ames-2016 -> /simulations/ames/ames-2015
      clock
        start_date = 01/01/2016  # Enter the start date of the simulation
        end_date = 31/12/2016  # Enter the end date of the simulation
      area paddock -> /simulations/ames/ames-2015/paddock
        outputfile -> /simulations/ames/ames-2015/paddock/outputfile: filename=ames-2016.out; title=ames-2016
          variables My Variables -> /simulations/ames/ames-2015/paddock/outputfile/My Variables
          events My Variables Events -> /simulations/ames/ames-2015/paddock/outputfile/My Variables Events
        manager2 InitialiseWaterTable: same as ames.ames-2000.paddock.InitialiseWaterTable
  folder crawfordsville
    simulation craw-2000
      metfile met
        filename=C:\Users\vnichols\Box Sync\Gina_APSIM_modeling\yield-gap-gina\wea-data\craw_2000-2016.met
      clock
        start_date = 01/01/2000  # Enter the start date of the simulation
        end_date = 31/12/2000  # Enter the end date of the simulation
      summaryfile
      area paddock
        surfaceom SurfaceOrganicMatter
          PoolName = soybean  # Organic Matter pool name
          type = soybean  # Organic Matter type
          mass = 0  # Initial surface residue (kg/ha)
          cnr = 45  # C:N ratio of initial residue
          standing_fraction = 0.0  # Fraction of residue standing
        fertiliser
        maize
          ini: filename=XML_corn7.9.xml
        manager WT_script
          on start_of_day:
          script: same as in Locations.CornSoy_plot1.paddock.WT_script
        folder Manager folder: same as ames.ames-2000.paddock.Manager folder
        outputfile: filename=craw-2000.out; title=craw-2000
          variables My Variables
            variables: dd/mm/yyyy as Date, year, yield, biomass, watertable, no3(), surfaceom_wt, lai, Rain, dlt_n_min()
          events My Variables Events: event=daily
        Soil CrawfordSoil: SoilType=Taintor Kalona Silty Clay Loams; Site=ISU Southeast Research and Demonstration Farm; NearestTown=Crowfordsville; Region=Louisa, Co.; State=Iowa; Country=USA; Latitude=41.19; Longitude=-91.48; YearOfSampling=0; DataSource=mesured data and web soil survey; Comments=SVA and RFM, Feb 2016
          Water
            Thickness  BD     AirDry  LL15   DUL    SAT    KS
            25         1.22   0.06    0.12   0.35   0.52   109
            25         1.22   0.06    0.12   0.35   0.52   109
            50         1.22   0.06    0.12   0.35   0.52   109
            100        1.318  0.096   0.12   0.35   0.517  109
            100        1.308  0.13    0.13   0.36   0.499  109
            110        1.308  0.13    0.13   0.32   0.499  47
            100        1.357  0.18    0.18   0.33   0.479  47
            100        1.357  0.216   0.216  0.389  0.479  47
            100        1.41   0.21    0.21   0.372  0.479  47
            200        1.43   0.219   0.219  0.386  0.479  47
            260        1.44   0.211   0.211  0.382  0.479  47
            350        1.46   0.197   0.197  0.374  0.46   47
            300        1.46   0.197   0.197  0.374  0.423  9.177
            280        1.46   0.197   0.197  0.374  0.419  6.677
            300        1.465  0.197   0.197  0.374  0.415  4.858
            300        1.6    0.197   0.197  0.374  0.411  3.496
            300        1.6    0.197   0.197  0.374  0.407  2.516
            300        1.6    0.197   0.197  0.374  0.404  1.811
            300        1.6    0.197   0.197  0.374  0.401  1.303
            300        1.6    0.197   0.197  0.374  0.399  0.938
            BD source: Field measured and checked for sensibility (layer 2, 3, 4)
            AirDry source: Estimated based on local knowledge (layer 1, 2, 3, 4)
            LL15 source: Estimated based on local knowledge (layer 2, 3, 4)
            DUL source: Field measured and checked for sensibility (layer 1, 2, 3, 4)
            SAT source: Calculated from measured, estimated or calculated BD (layer 1, 2, 3, 4)
            SoilCrop maize
              LL=[0.12, 0.12, 0.12, 0.12, 0.13, 0.177, 0.227, 0.28, 0.279, 0.303, 0.315, 0.324, 0.341, 0.352, 0.361, 0.362, 0.362, 0.362, 0.362, 0.362]
              KL=[0.08, 0.08, 0.08, 0.08, 0.08, 0.08, 0.08, 0.08, 0.08, 0.08, 0.08, 0.04, 0.03, 0.03, 0.02, 0.02, 0.01, 0.01, 0, 0]
              XF=[1, 1, 1, 1, 1, 1, 0.9, 0.9, 0.9, 0.9, 0.9, 0.9, 0.4, 0.4, 0.4, 0, 0, 0, 0, 0]
              LL source: Estimated based on local knowledge (layer 2, 3, 4)
            SoilCrop soybean
              LL=[0.12, 0.12, 0.12, 0.12, 0.13, 0.177, 0.227, 0.28, 0.279, 0.303, 0.315, 0.324, 0.341, 0.352, 0.361, 0.362, 0.362, 0.362, 0.362, 0.362]
              KL=[0.08, 0.08, 0.08, 0.08, 0.08, 0.08, 0.08, 0.08, 0.08, 0.08, 0.08, 0.04, 0.03, 0.03, 0.02, 0.02, 0.01, 0.01, 0, 0]
              XF=[1, 1, 1, 1, 1, 1, 0.9, 0.9, 0.9, 0.9, 0.9, 0.9, 0.4, 0.4, 0.4, 0, 0, 0, 0, 0]
              LL source: Estimated based on local knowledge (layer 1, 2, 3, 4)
          SoilOrganicMatter: RootCN=33.2; RootWt=2432; SoilCN=13.5; EnrACoeff=7.4; EnrBCoeff=0.2; OCUnits=Total
            Thickness  OC     FBiom  FInert
            25         2.97   0.14   0.365
            25         2.97   0.14   0.365
            50         2.97   0.111  0.365
            100        2.61   0.07   0.437
            100        2      0.05   0.475
            110        2      0.039  0.514
            100        1.22   0.033  0.576
            100        1.22   0.029  0.802
            100        0.233  0.026  0.817
            200        0.233  0.023  0.816
            260        0.233  0.019  0.848
            350        0.233  0.016  0.999
            300        0.233  0.014  0.999
            280        0.233  0.013  0.999
            300        0.233  0.012  0.999
            300        0.233  0.011  0.999
            300        0.233  0.01   0.999
            300        0.233  0.009  0.999
            300        0.233  0.009  0.999
            300        0.233  0.008  0.999
            OC source: Estimated based on local knowledge (layer 1, 2, 3, 4)
          Analysis: PHUnits=Water; BoronUnits=HotWater
            Thickness  PH    CEC    ParticleSizeSand  ParticleSizeSilt  ParticleSizeClay
            25         6.13  30.99  13                48.38             30
            25         6.13  30.99  13                48.38             30
            50         6.13  30.99  13                48.38             30
            100        6.22  30.83  13.13             48.56             34
            100        6.39  33.4   13.63             46                34
            110        6.39  33.4   13.63             46                34
            100        6.49  34.59  13                48                38
            100        6.49  34.59  13                48                41
            100        6.49  34.59  13                48                41
            200        6.49  34.59  13                48                38
            260        6.49  34.59  13                48                38
            350        6.49  34.59  13                48                38
            300        6.49  34.59  13                48                33
            280        6.49  34.59  13                48                28
            300        6.49  34.59  13                48                28
            300        6.49  34.59  13                48                28
            300        6.49  34.59  13                48                28
            300        6.49  34.59  13                48                28
            300        6.49  34.59  13                48                28
            300        -     -      13                48                28
            PH source: Estimated based on local knowledge (layer 1, 2, 3, 4)
          Swim: Salb=0.13; CN2Bare=65; CNRed=20; CNCov=0.8; KDul=0.3; PSIDul=-300; VC=true; DTmin=0; DTmax=1440; MaxWaterIncrement=10; SpaceWeightingFactor=0; SoluteSpaceWeightingFactor=0; Diagnostics=false
            SwimSoluteParameters: Dis=30; Disp=1; A=1; DTHP=1
              zero: DTHC, WaterTableCl, WaterTableNO3, WaterTableNH4, WaterTableUrea, WaterTableTracer, WaterTableMineralisationInhibitor, WaterTableUreaseInhibitor, WaterTableNitrificationInhibitor, WaterTableDenitrificationInhibitor
              Thickness  NO3Exco  NO3FIP  NH4Exco  NH4FIP  UreaExco  UreaFIP  ClExco  ClFIP
              1000       0        1       100      1       0         1        0       1
              1000       0        1       100      1       0         1        0       1
              1000       0        1       100      1       0         1        0       1
          SoilTemperature: BoundaryLayerConductance=20
            Thickness=[25, 25, 50, 100, 100, 110, 100, 100, 100, 200, 260, 350, 300, 280, 300, 300, 300, 300, 300, 300]
            InitialSoilTemperature=[10, 10, 10, 10, 10, 10, 10, 10, 10, 10, 9, 9, 9, 9, 9, 10, 9, 9, 9, 9]
          Sample Initial nitrogen: NO3Units=kgha; NH4Units=kgha; SWUnits=Volumetric; OCUnits=Total; PHUnits=Water
            Thickness  NO3  NH4  SW
            25         1.6  1.5  0.35
            25         1.6  1.5  0.35
            50         1.2  2.5  0.35
            100        2.7  3.5  0.35
            100        3    4.5  0.36
            110        3.3  6.5  0.32
            100        3.1  2    0.33
            100        3.4  0.1  0.389
            100        3.2  0.1  0.372
            200        6.3  0.1  0.386
            260        5.3  0.1  0.382
            350        4.3  0.2  0.374
            300        0.6  0.3  0.423
            280        0.3  0.1  0.419
            300        0.2  0.1  0.415
            300        0.1  0.1  0.411
            300        0.1  0.2  0.407
            300        0    0.3  0.404
            300        0    0.1  0.401
            300        0    0    0.399
        manager2 InitialiseWaterTable: same as ames.ames-2000.paddock.InitialiseWaterTable
    simulation craw-2001 -> /simulations/crawfordsville/craw-2000
      clock
        start_date = 01/01/2001  # Enter the start date of the simulation
        end_date = 31/12/2001  # Enter the end date of the simulation
      area paddock -> /simulations/crawfordsville/craw-2000/paddock
        outputfile -> /simulations/crawfordsville/craw-2000/paddock/outputfile: filename=craw-2001.out; title=craw-2001
          variables My Variables -> /simulations/crawfordsville/craw-2000/paddock/outputfile/My Variables
          events My Variables Events -> /simulations/crawfordsville/craw-2000/paddock/outputfile/My Variables Events
    simulation craw-2002 -> /simulations/crawfordsville/craw-2000
      clock
        start_date = 01/01/2002  # Enter the start date of the simulation
        end_date = 31/12/2002  # Enter the end date of the simulation
      area paddock -> /simulations/crawfordsville/craw-2000/paddock
        outputfile -> /simulations/crawfordsville/craw-2000/paddock/outputfile: filename=craw-2002.out; title=craw-2002
          variables My Variables -> /simulations/crawfordsville/craw-2000/paddock/outputfile/My Variables
          events My Variables Events -> /simulations/crawfordsville/craw-2000/paddock/outputfile/My Variables Events
    simulation craw-2003 -> /simulations/crawfordsville/craw-2000
      clock
        start_date = 01/01/2003  # Enter the start date of the simulation
        end_date = 31/12/2003  # Enter the end date of the simulation
      area paddock -> /simulations/crawfordsville/craw-2000/paddock
        outputfile -> /simulations/crawfordsville/craw-2000/paddock/outputfile: filename=craw-2003.out; title=craw-2003
          variables My Variables -> /simulations/crawfordsville/craw-2000/paddock/outputfile/My Variables
          events My Variables Events -> /simulations/crawfordsville/craw-2000/paddock/outputfile/My Variables Events
    simulation craw-2004 -> /simulations/crawfordsville/craw-2000
      clock
        start_date = 01/01/2004  # Enter the start date of the simulation
        end_date = 31/12/2004  # Enter the end date of the simulation
      area paddock -> /simulations/crawfordsville/craw-2000/paddock
        outputfile -> /simulations/crawfordsville/craw-2000/paddock/outputfile: filename=craw-2004.out; title=craw-2004
          variables My Variables -> /simulations/crawfordsville/craw-2000/paddock/outputfile/My Variables
          events My Variables Events -> /simulations/crawfordsville/craw-2000/paddock/outputfile/My Variables Events
    simulation craw-2005 -> /simulations/crawfordsville/craw-2000
      clock
        start_date = 01/01/2005  # Enter the start date of the simulation
        end_date = 31/12/2005  # Enter the end date of the simulation
      area paddock -> /simulations/crawfordsville/craw-2000/paddock
        outputfile -> /simulations/crawfordsville/craw-2000/paddock/outputfile: filename=craw-2005.out; title=craw-2005
          variables My Variables -> /simulations/crawfordsville/craw-2000/paddock/outputfile/My Variables
          events My Variables Events -> /simulations/crawfordsville/craw-2000/paddock/outputfile/My Variables Events
    simulation craw-2006 -> /simulations/crawfordsville/craw-2000
      clock
        start_date = 01/01/2006  # Enter the start date of the simulation
        end_date = 31/12/2006  # Enter the end date of the simulation
      area paddock -> /simulations/crawfordsville/craw-2000/paddock
        outputfile -> /simulations/crawfordsville/craw-2000/paddock/outputfile: filename=craw-2006.out; title=craw-2006
          variables My Variables -> /simulations/crawfordsville/craw-2000/paddock/outputfile/My Variables
          events My Variables Events -> /simulations/crawfordsville/craw-2000/paddock/outputfile/My Variables Events
    simulation craw-2007 -> /simulations/crawfordsville/craw-2000
      clock
        start_date = 01/01/2007  # Enter the start date of the simulation
        end_date = 31/12/2007  # Enter the end date of the simulation
      area paddock -> /simulations/crawfordsville/craw-2000/paddock
        outputfile -> /simulations/crawfordsville/craw-2000/paddock/outputfile: filename=craw-2007.out; title=craw-2007
          variables My Variables -> /simulations/crawfordsville/craw-2000/paddock/outputfile/My Variables
          events My Variables Events -> /simulations/crawfordsville/craw-2000/paddock/outputfile/My Variables Events
    simulation craw-2008 -> /simulations/crawfordsville/craw-2000
      clock
        start_date = 01/01/2008  # Enter the start date of the simulation
        end_date = 31/12/2008  # Enter the end date of the simulation
      area paddock -> /simulations/crawfordsville/craw-2000/paddock
        outputfile -> /simulations/crawfordsville/craw-2000/paddock/outputfile: filename=craw-2008.out; title=craw-2008
          variables My Variables -> /simulations/crawfordsville/craw-2000/paddock/outputfile/My Variables
          events My Variables Events -> /simulations/crawfordsville/craw-2000/paddock/outputfile/My Variables Events
    simulation craw-2009 -> /simulations/crawfordsville/craw-2000
      clock
        start_date = 01/01/2009  # Enter the start date of the simulation
        end_date = 31/12/2009  # Enter the end date of the simulation
      area paddock -> /simulations/crawfordsville/craw-2000/paddock
        outputfile -> /simulations/crawfordsville/craw-2000/paddock/outputfile: filename=craw-2009.out; title=craw-2009
          variables My Variables -> /simulations/crawfordsville/craw-2000/paddock/outputfile/My Variables
          events My Variables Events -> /simulations/crawfordsville/craw-2000/paddock/outputfile/My Variables Events
    simulation craw-2010 -> /simulations/crawfordsville/craw-2000
      clock
        start_date = 01/01/2010  # Enter the start date of the simulation
        end_date = 31/12/2010  # Enter the end date of the simulation
      area paddock -> /simulations/crawfordsville/craw-2000/paddock
        outputfile -> /simulations/crawfordsville/craw-2000/paddock/outputfile: filename=craw-2010.out; title=craw-2010
          variables My Variables -> /simulations/crawfordsville/craw-2000/paddock/outputfile/My Variables
          events My Variables Events -> /simulations/crawfordsville/craw-2000/paddock/outputfile/My Variables Events
    simulation craw-2011 -> /simulations/crawfordsville/craw-2000
      clock
        start_date = 01/01/2011  # Enter the start date of the simulation
        end_date = 31/12/2011  # Enter the end date of the simulation
      area paddock -> /simulations/crawfordsville/craw-2000/paddock
        outputfile -> /simulations/crawfordsville/craw-2000/paddock/outputfile: filename=craw-2011.out; title=craw-2011
          variables My Variables -> /simulations/crawfordsville/craw-2000/paddock/outputfile/My Variables
          events My Variables Events -> /simulations/crawfordsville/craw-2000/paddock/outputfile/My Variables Events
    simulation craw-2012 -> /simulations/crawfordsville/craw-2000
      clock
        start_date = 01/01/2012  # Enter the start date of the simulation
        end_date = 31/12/2012  # Enter the end date of the simulation
      area paddock -> /simulations/crawfordsville/craw-2000/paddock
        outputfile -> /simulations/crawfordsville/craw-2000/paddock/outputfile: filename=craw-2012.out; title=craw-2012
          variables My Variables -> /simulations/crawfordsville/craw-2000/paddock/outputfile/My Variables
          events My Variables Events -> /simulations/crawfordsville/craw-2000/paddock/outputfile/My Variables Events
    simulation craw-2013 -> /simulations/crawfordsville/craw-2000
      clock
        start_date = 01/01/2013  # Enter the start date of the simulation
        end_date = 31/12/2013  # Enter the end date of the simulation
      area paddock -> /simulations/crawfordsville/craw-2000/paddock
        outputfile -> /simulations/crawfordsville/craw-2000/paddock/outputfile: filename=craw-2013.out; title=craw-2013
          variables My Variables -> /simulations/crawfordsville/craw-2000/paddock/outputfile/My Variables
          events My Variables Events -> /simulations/crawfordsville/craw-2000/paddock/outputfile/My Variables Events
    simulation craw-2014 -> /simulations/crawfordsville/craw-2000
      clock
        start_date = 01/01/2014  # Enter the start date of the simulation
        end_date = 31/12/2014  # Enter the end date of the simulation
      area paddock -> /simulations/crawfordsville/craw-2000/paddock
        outputfile -> /simulations/crawfordsville/craw-2000/paddock/outputfile: filename=craw-2014.out; title=craw-2014
          variables My Variables -> /simulations/crawfordsville/craw-2000/paddock/outputfile/My Variables
          events My Variables Events -> /simulations/crawfordsville/craw-2000/paddock/outputfile/My Variables Events
    simulation craw-2015 -> /simulations/crawfordsville/craw-2000
      clock
        start_date = 01/01/2015  # Enter the start date of the simulation
        end_date = 31/12/2015  # Enter the end date of the simulation
      area paddock -> /simulations/crawfordsville/craw-2000/paddock
        outputfile -> /simulations/crawfordsville/craw-2000/paddock/outputfile: filename=craw-2015.out; title=craw-2015
          variables My Variables -> /simulations/crawfordsville/craw-2000/paddock/outputfile/My Variables
          events My Variables Events -> /simulations/crawfordsville/craw-2000/paddock/outputfile/My Variables Events
    simulation craw-2016 -> /simulations/crawfordsville/craw-2000
      clock
        start_date = 01/01/2016  # Enter the start date of the simulation
        end_date = 31/12/2016  # Enter the end date of the simulation
      area paddock -> /simulations/crawfordsville/craw-2000/paddock
        outputfile -> /simulations/crawfordsville/craw-2000/paddock/outputfile: filename=craw-2016.out; title=craw-2016
          variables My Variables -> /simulations/crawfordsville/craw-2000/paddock/outputfile/My Variables
          events My Variables Events -> /simulations/crawfordsville/craw-2000/paddock/outputfile/My Variables Events
  folder kanawha
    simulation kana-2000
      metfile met
        filename=C:\Users\vnichols\Box Sync\Gina_APSIM_modeling\yield-gap-gina\wea-data\kana_2000-2016.met
      clock
        start_date = 01/01/2000  # Enter the start date of the simulation
        end_date = 31/12/2000  # Enter the end date of the simulation
      summaryfile
      area paddock
        surfaceom SurfaceOrganicMatter
          PoolName = soybean  # Organic Matter pool name
          type = soybean  # Organic Matter type
          mass = 2000  # Initial surface residue (kg/ha)
          cnr = 45  # C:N ratio of initial residue
          standing_fraction = 0.0  # Fraction of residue standing
        fertiliser
        maize
          ini: filename=XML_corn7.9.xml
        manager WT_script
          on start_of_day:
          script: same as in Locations.CornSoy_plot1.paddock.WT_script
        folder Manager folder: same as ames.ames-2000.paddock.Manager folder
        outputfile: filename=kana-2000.out; title=kana-2000
          variables My Variables
            variables: dd/mm/yyyy as Date, year, yield, biomass, watertable, no3(), surfaceom_wt, lai, Rain, dlt_n_min()
          events My Variables Events: event=daily
        Soil KanawhaSoil: SoilType=507 Canisteo clay loam; NearestTown=Kanawha; State=Iowa; Country=US; YearOfSampling=0; DataSource=measured OC and texture and Web Soil Survey
          Comments=hydrological parameters and BD from Saxton and Rawls, 2006. This field has just one tile line (it is not pattern tile) thus is treated here as without tile drainage
          Water
            Thickness  BD    AirDry  LL15   DUL    SAT    KS
            25         1.25  0.097   0.194  0.319  0.547  409
            25         1.25  0.097   0.194  0.319  0.547  409
            50         1.25  0.097   0.194  0.319  0.547  409
            100        1.25  0.155   0.194  0.319  0.547  409
            100        1.25  0.23    0.23   0.336  0.491  148
            150        1.35  0.23    0.23   0.336  0.491  148
            150        1.35  0.207   0.207  0.324  0.458  106
            150        1.4   0.171   0.171  0.304  0.426  134
            150        1.4   0.171   0.171  0.304  0.426  134
            150        1.6   0.132   0.132  0.276  0.397  205
            150        1.6   0.132   0.132  0.276  0.397  205
            300        1.6   0.132   0.132  0.276  0.397  205
            300        1.6   0.132   0.132  0.276  0.342  23.593
            300        1.6   0.132   0.132  0.276  0.335  16.369
            300        1.6   0.132   0.132  0.276  0.329  11.357
            300        1.6   0.132   0.132  0.276  0.323  7.88
            300        1.6   0.132   0.132  0.276  0.318  5.467
            300        1.6   0.132   0.132  0.276  0.314  3.793
            300        1.6   0.132   0.132  0.276  0.31   2.632
            300        1.6   0.132   0.132  0.276  0.306  1.826
            BD source: Field measured and checked for sensibility (layer 2, 3, 4)
            AirDry source: Estimated based on local knowledge (layer 1, 2, 3, 4)
            LL15 source: Estimated based on local knowledge (layer 2, 3, 4)
            DUL source: Field measured and checked for sensibility (layer 1, 2, 3, 4)
            SAT source: Calculated from measured, estimated or calculated BD (layer 1, 2, 3, 4)
            SoilCrop maize
              LL=[0.194, 0.194, 0.194, 0.194, 0.23, 0.258, 0.248, 0.229, 0.238, 0.216, 0.224, 0.236, 0.248, 0.261, 0.264, 0.264, 0.264, 0.264, 0.264, 0.264]
              KL=[0.08, 0.08, 0.08, 0.08, 0.08, 0.08, 0.08, 0.08, 0.08, 0.08, 0.08, 0.04, 0.04, 0.03, 0.02, 0.02, 0.01, 0.01, 0, 0]
              XF=[1, 1, 1, 1, 1, 1, 1, 1, 1, 1, 1, 1, 1, 0.4, 0.4, 0, 0, 0, 0, 0]
              LL source: Estimated based on local knowledge (layer 2, 3, 4)
            SoilCrop soybean
              LL=[0.194, 0.194, 0.194, 0.194, 0.23, 0.258, 0.248, 0.229, 0.238, 0.216, 0.224, 0.236, 0.248, 0.261, 0.264, 0.264, 0.264, 0.264, 0.264, 0.264]
              KL=[0.08, 0.08, 0.08, 0.08, 0.08, 0.08, 0.08, 0.08, 0.08, 0.08, 0.08, 0.04, 0.04, 0.03, 0.02, 0.02, 0.01, 0.01, 0, 0]
              XF=[1, 1, 1, 1, 1, 1, 1, 1, 1, 1, 1, 1, 1, 0.4, 0.4, 0, 0, 0, 0, 0]
              LL source: Estimated based on local knowledge (layer 1, 2, 3, 4)
          SoilOrganicMatter: RootCN=39.7; RootWt=2183; SoilCN=12; EnrACoeff=7.4; EnrBCoeff=0.2; OCUnits=Total
            Thickness  OC    FBiom  FInert
            25         3.35  0.25   0.365
            25         3.35  0.176  0.365
            50         3.35  0.111  0.365
            100        2.32  0.07   0.42
            100        2.32  0.05   0.456
            150        1.31  0.038  0.5
            150        1.31  0.031  0.718
            150        0.75  0.026  0.738
            150        0.75  0.023  0.757
            150        0.63  0.02   0.961
            150        0.63  0.018  0.97
            300        0.6   0.016  0.984
            300        0.58  0.014  0.999
            300        0.52  0.013  0.999
            300        0.5   0.012  0.999
            300        0.1   0.011  0.999
            300        0.1   0.01   0.999
            300        0.1   0.009  0.999
            300        0.1   0.009  0.999
            300        0.1   0.008  0.999
            OC source: Estimated based on local knowledge (layer 1, 2, 3, 4)
          Analysis: PHUnits=Water; BoronUnits=HotWater
            Thickness  PH   ParticleSizeSand  ParticleSizeSilt  ParticleSizeClay
            25         7.4  30                38                32
            25         7.4  30                38                32
            50         7.4  30                38                32
            100        7.4  30                38                32
            100        7.4  32                36                32
            150        7.4  32                36                32
            150        7.4  32                36                32
            150        7.4  39                34                27
            150        7.4  39                34                27
            150        7.4  44                35                21
            150        7.4  44                35                21
            300        7.4  44                35                21
            300        7.4  44                35                21
            300        7.4  44                35                21
            300        7.4  44                35                21
            300        7.4  44                35                21
            300        7.4  44                35                21
            300        7.4  44                35                21
            300        7.4  44                35                21
            300        7.4  44                35                21
            PH source: Estimated based on local knowledge (layer 1, 2, 3, 4)
            ParticleSizeSand, ParticleSizeSilt source: Measured (layer 1)
            ParticleSizeClay source: Measured (layer 1, 2)
          Sample Initial nitrogen: NO3Units=kgha; NH4Units=kgha; SWUnits=Volumetric; OCUnits=Total; PHUnits=Water
            Thickness  NO3  NH4  SW
            25         0.3  2    0.319
            25         0.3  2    0.319
            50         0.7  2    0.319
            100        1    1    0.319
            100        1    1    0.336
            150        0.5  1    0.336
            150        0.5  1    0.324
            150        0.5  0.5  0.304
            150        0.5  0.5  0.304
            150        0.5  0.5  0.276
            150        0.5  0.5  0.276
            300        0.5  0.1  0.276
            300        0.4  1    0.316
            300        0.2  0    0.309
            300        0    0    0.303
            300        0.2  0    0.298
            300        0    0    0.294
            300        0.2  0    0.291
            300        0.2  0    0.29
            300        0    0    0.29
          Swim: Salb=0.13; CN2Bare=72; CNRed=20; CNCov=0.8; KDul=0.28; PSIDul=-200; VC=true; DTmin=0; DTmax=1440; MaxWaterIncrement=10; SpaceWeightingFactor=0; SoluteSpaceWeightingFactor=0; Diagnostics=false
            SwimSoluteParameters: same as Locations.CornSoy_plot1.paddock.Soil_Ames.Swim.SwimSoluteParameters
          SoilTemperature: BoundaryLayerConductance=20
            Thickness=[25, 25, 50, 100, 100, 150, 150, 150, 150, 150, 150, 300, 300, 300, 300, 300, 300, 300, 300, 300]
            InitialSoilTemperature=[10, 10, 10, 10, 10, 10, 10, 10, 10, 10, 10, 10, 10, 10, 10, 10, 10, 10, 10, 10]
        manager2 InitialiseWaterTable
          InitDOY = 1  # Day of year to initialise the water table
          WTDepth = 1650  # Depth to water table (mm)
          script: same as in ames.ames-2000.paddock.InitialiseWaterTable
    simulation kana-2001 -> /simulations/kanawha/kana-2000
      clock
        start_date = 01/01/2001  # Enter the start date of the simulation
        end_date = 31/12/2001  # Enter the end date of the simulation
      area paddock -> /simulations/kanawha/kana-2000/paddock
        outputfile -> /simulations/kanawha/kana-2000/paddock/outputfile: filename=kana-2001.out; title=kana-2001
          variables My Variables -> /simulations/kanawha/kana-2000/paddock/outputfile/My Variables
          events My Variables Events -> /simulations/kanawha/kana-2000/paddock/outputfile/My Variables Events
    simulation kana-2002 -> /simulations/kanawha/kana-2000
      clock
        start_date = 01/01/2002  # Enter the start date of the simulation
        end_date = 31/12/2002  # Enter the end date of the simulation
      area paddock -> /simulations/kanawha/kana-2000/paddock
        outputfile -> /simulations/kanawha/kana-2000/paddock/outputfile: filename=kana-2002.out; title=kana-2002
          variables My Variables -> /simulations/kanawha/kana-2000/paddock/outputfile/My Variables
          events My Variables Events -> /simulations/kanawha/kana-2000/paddock/outputfile/My Variables Events
    simulation kana-2003 -> /simulations/kanawha/kana-2000
      clock
        start_date = 01/01/2003  # Enter the start date of the simulation
        end_date = 31/12/2003  # Enter the end date of the simulation
      area paddock -> /simulations/kanawha/kana-2000/paddock
        outputfile -> /simulations/kanawha/kana-2000/paddock/outputfile: filename=kana-2003.out; title=kana-2003
          variables My Variables -> /simulations/kanawha/kana-2000/paddock/outputfile/My Variables
          events My Variables Events -> /simulations/kanawha/kana-2000/paddock/outputfile/My Variables Events
    simulation kana-2004 -> /simulations/kanawha/kana-2000
      clock
        start_date = 01/01/2004  # Enter the start date of the simulation
        end_date = 31/12/2004  # Enter the end date of the simulation
      area paddock -> /simulations/kanawha/kana-2000/paddock
        outputfile -> /simulations/kanawha/kana-2000/paddock/outputfile: filename=kana-2004.out; title=kana-2004
          variables My Variables -> /simulations/kanawha/kana-2000/paddock/outputfile/My Variables
          events My Variables Events -> /simulations/kanawha/kana-2000/paddock/outputfile/My Variables Events
    simulation kana-2005 -> /simulations/kanawha/kana-2000
      clock
        start_date = 01/01/2005  # Enter the start date of the simulation
        end_date = 31/12/2005  # Enter the end date of the simulation
      area paddock -> /simulations/kanawha/kana-2000/paddock
        outputfile -> /simulations/kanawha/kana-2000/paddock/outputfile: filename=kana-2005.out; title=kana-2005
          variables My Variables -> /simulations/kanawha/kana-2000/paddock/outputfile/My Variables
          events My Variables Events -> /simulations/kanawha/kana-2000/paddock/outputfile/My Variables Events
    simulation kana-2006 -> /simulations/kanawha/kana-2000
      clock
        start_date = 01/01/2006  # Enter the start date of the simulation
        end_date = 31/12/2006  # Enter the end date of the simulation
      area paddock -> /simulations/kanawha/kana-2000/paddock
        outputfile -> /simulations/kanawha/kana-2000/paddock/outputfile: filename=kana-2006.out; title=kana-2006
          variables My Variables -> /simulations/kanawha/kana-2000/paddock/outputfile/My Variables
          events My Variables Events -> /simulations/kanawha/kana-2000/paddock/outputfile/My Variables Events
    simulation kana-2007 -> /simulations/kanawha/kana-2000
      clock
        start_date = 01/01/2007  # Enter the start date of the simulation
        end_date = 31/12/2007  # Enter the end date of the simulation
      area paddock -> /simulations/kanawha/kana-2000/paddock
        outputfile -> /simulations/kanawha/kana-2000/paddock/outputfile: filename=kana-2007.out; title=kana-2007
          variables My Variables -> /simulations/kanawha/kana-2000/paddock/outputfile/My Variables
          events My Variables Events -> /simulations/kanawha/kana-2000/paddock/outputfile/My Variables Events
    simulation kana-2008 -> /simulations/kanawha/kana-2000
      clock
        start_date = 01/01/2008  # Enter the start date of the simulation
        end_date = 31/12/2008  # Enter the end date of the simulation
      area paddock -> /simulations/kanawha/kana-2000/paddock
        outputfile -> /simulations/kanawha/kana-2000/paddock/outputfile: filename=kana-2008.out; title=kana-2008
          variables My Variables -> /simulations/kanawha/kana-2000/paddock/outputfile/My Variables
          events My Variables Events -> /simulations/kanawha/kana-2000/paddock/outputfile/My Variables Events
    simulation kana-2009 -> /simulations/kanawha/kana-2000
      clock
        start_date = 01/01/2009  # Enter the start date of the simulation
        end_date = 31/12/2009  # Enter the end date of the simulation
      area paddock -> /simulations/kanawha/kana-2000/paddock
        outputfile -> /simulations/kanawha/kana-2000/paddock/outputfile: filename=kana-2009.out; title=kana-2009
          variables My Variables -> /simulations/kanawha/kana-2000/paddock/outputfile/My Variables
          events My Variables Events -> /simulations/kanawha/kana-2000/paddock/outputfile/My Variables Events
    simulation kana-2010 -> /simulations/kanawha/kana-2000
      clock
        start_date = 01/01/2010  # Enter the start date of the simulation
        end_date = 31/12/2010  # Enter the end date of the simulation
      area paddock -> /simulations/kanawha/kana-2000/paddock
        outputfile -> /simulations/kanawha/kana-2000/paddock/outputfile: filename=kana-2010.out; title=kana-2010
          variables My Variables -> /simulations/kanawha/kana-2000/paddock/outputfile/My Variables
          events My Variables Events -> /simulations/kanawha/kana-2000/paddock/outputfile/My Variables Events
    simulation kana-2011 -> /simulations/kanawha/kana-2000
      clock
        start_date = 01/01/2011  # Enter the start date of the simulation
        end_date = 31/12/2011  # Enter the end date of the simulation
      area paddock -> /simulations/kanawha/kana-2000/paddock
        outputfile -> /simulations/kanawha/kana-2000/paddock/outputfile: filename=kana-2011.out; title=kana-2011
          variables My Variables -> /simulations/kanawha/kana-2000/paddock/outputfile/My Variables
          events My Variables Events -> /simulations/kanawha/kana-2000/paddock/outputfile/My Variables Events
    simulation kana-2012 -> /simulations/kanawha/kana-2000
      clock
        start_date = 01/01/2012  # Enter the start date of the simulation
        end_date = 31/12/2012  # Enter the end date of the simulation
      area paddock -> /simulations/kanawha/kana-2000/paddock
        outputfile -> /simulations/kanawha/kana-2000/paddock/outputfile: filename=kana-2012.out; title=kana-2012
          variables My Variables -> /simulations/kanawha/kana-2000/paddock/outputfile/My Variables
          events My Variables Events -> /simulations/kanawha/kana-2000/paddock/outputfile/My Variables Events
    simulation kana-2013 -> /simulations/kanawha/kana-2000
      clock
        start_date = 01/01/2013  # Enter the start date of the simulation
        end_date = 31/12/2013  # Enter the end date of the simulation
      area paddock -> /simulations/kanawha/kana-2000/paddock
        outputfile -> /simulations/kanawha/kana-2000/paddock/outputfile: filename=kana-2013.out; title=kana-2013
          variables My Variables -> /simulations/kanawha/kana-2000/paddock/outputfile/My Variables
          events My Variables Events -> /simulations/kanawha/kana-2000/paddock/outputfile/My Variables Events
    simulation kana-2014 -> /simulations/kanawha/kana-2000
      clock
        start_date = 01/01/2014  # Enter the start date of the simulation
        end_date = 31/12/2014  # Enter the end date of the simulation
      area paddock -> /simulations/kanawha/kana-2000/paddock
        outputfile -> /simulations/kanawha/kana-2000/paddock/outputfile: filename=kana-2014.out; title=kana-2014
          variables My Variables -> /simulations/kanawha/kana-2000/paddock/outputfile/My Variables
          events My Variables Events -> /simulations/kanawha/kana-2000/paddock/outputfile/My Variables Events
    simulation kana-2015 -> /simulations/kanawha/kana-2000
      clock
        start_date = 01/01/2015  # Enter the start date of the simulation
        end_date = 31/12/2015  # Enter the end date of the simulation
      area paddock -> /simulations/kanawha/kana-2000/paddock
        outputfile -> /simulations/kanawha/kana-2000/paddock/outputfile: filename=kana-2015.out; title=kana-2015
          variables My Variables -> /simulations/kanawha/kana-2000/paddock/outputfile/My Variables
          events My Variables Events -> /simulations/kanawha/kana-2000/paddock/outputfile/My Variables Events
    simulation kana-2016 -> /simulations/kanawha/kana-2000
      clock
        start_date = 01/01/2016  # Enter the start date of the simulation
        end_date = 31/12/2016  # Enter the end date of the simulation
      area paddock -> /simulations/kanawha/kana-2000/paddock
        outputfile -> /simulations/kanawha/kana-2000/paddock/outputfile: filename=kana-2016.out; title=kana-2016
          variables My Variables -> /simulations/kanawha/kana-2000/paddock/outputfile/My Variables
          events My Variables Events -> /simulations/kanawha/kana-2000/paddock/outputfile/My Variables Events
  folder lewis
    simulation lewi-2000
      metfile met
        filename=C:\Users\vnichols\Box Sync\Gina_APSIM_modeling\yield-gap-gina\wea-data\lewis_2000-2016.met
      clock
        start_date = 01/01/2000  # Enter the start date of the simulation
        end_date = 31/12/2000  # Enter the end date of the simulation
      summaryfile
      area paddock
        surfaceom SurfaceOrganicMatter
          PoolName = soybean  # Organic Matter pool name
          type = soybean  # Organic Matter type
          mass = 2000  # Initial surface residue (kg/ha)
          cnr = 45  # C:N ratio of initial residue
          standing_fraction = 0.0  # Fraction of residue standing
        fertiliser
        maize
          ini: filename=XML_corn7.9.xml
        manager WT_script
          on start_of_day:
          script: same as in Locations.CornSoy_plot1.paddock.WT_script
        folder Manager folder: same as ames.ames-2000.paddock.Manager folder
        outputfile: filename=lewi-2000.out; title=lewi-2000
          events My Variables Events: event=daily
          variables My Variables
            variables: dd/mm/yyyy as Date, year, yield, biomass, watertable, no3(), surfaceom_wt, lai, Rain, dlt_n_min()
        Soil LewisDeaft: SoilType=Primghar; NearestTown=Sutherland; State=Iowa; Country=US; Latitude=42.92; Longitude=-95.53; YearOfSampling=0; DataSource=web soil survey; Comments=hydrological parameters and BD from Saxton and Rawls, 2006
          Water
            Thickness  BD    AirDry  LL15   DUL    SAT    KS
            25         1.25  0.059   0.117  0.278  0.48   302
            25         1.25  0.059   0.117  0.278  0.48   302
            50         1.25  0.059   0.117  0.278  0.47   302
            100        1.25  0.094   0.117  0.27   0.46   104
            100        1.25  0.121   0.121  0.265  0.45   104
            150        1.35  0.121   0.121  0.279  0.492  104
            150        1.35  0.121   0.121  0.279  0.492  104
            150        1.36  0.12    0.12   0.27   0.479  58
            150        1.36  0.12    0.12   0.274  0.47   58
            150        1.36  0.12    0.12   0.274  0.47   58
            150        1.4   0.12    0.12   0.274  0.45   50
            300        1.45  0.12    0.12   0.274  0.45   50
            300        1.45  0.12    0.12   0.269  0.36   68.913
            300        1.45  0.12    0.12   0.269  0.35   46.434
            300        1.45  0.12    0.12   0.269  0.341  31.288
            300        1.45  0.12    0.12   0.269  0.332  21.082
            300        1.45  0.12    0.12   0.269  0.325  14.206
            300        1.45  0.12    0.12   0.269  0.319  9.572
            300        1.45  0.12    0.12   0.269  0.313  6.45
            300        1.45  0.12    0.12   0.269  0.308  4.346
            BD source: Field measured and checked for sensibility (layer 2, 3, 4)
            AirDry source: Estimated based on local knowledge (layer 1, 2, 3, 4)
            LL15 source: Estimated based on local knowledge (layer 2, 3, 4)
            DUL source: Field measured and checked for sensibility (layer 1, 2, 3, 4)
            SAT source: Calculated from measured, estimated or calculated BD (layer 1, 2, 3, 4)
            SoilCrop maize
              LL=[0.117, 0.117, 0.117, 0.117, 0.121, 0.162, 0.177, 0.186, 0.198, 0.209, 0.219, 0.231, 0.24, 0.253, 0.257, 0.257, 0.257, 0.257, 0.257, 0.257]
              KL=[0.08, 0.08, 0.08, 0.08, 0.08, 0.08, 0.08, 0.08, 0.08, 0.08, 0.08, 0.04, 0.04, 0.03, 0.02, 0.02, 0.01, 0.01, 0, 0]
              XF=[1, 1, 1, 1, 1, 1, 1, 1, 1, 1, 1, 1, 1, 0.4, 0.4, 0, 0, 0, 0, 0]
              LL source: Estimated based on local knowledge (layer 2, 3, 4)
            SoilCrop soybean
              LL=[0.117, 0.117, 0.117, 0.117, 0.121, 0.162, 0.177, 0.186, 0.198, 0.209, 0.219, 0.231, 0.24, 0.253, 0.257, 0.257, 0.257, 0.257, 0.257, 0.257]
              KL=[0.08, 0.08, 0.08, 0.08, 0.08, 0.08, 0.08, 0.08, 0.08, 0.08, 0.08, 0.04, 0.04, 0.03, 0.02, 0.02, 0.01, 0.01, 0, 0]
              XF=[1, 1, 1, 1, 1, 1, 1, 1, 1, 1, 1, 1, 1, 0.4, 0.4, 0, 0, 0, 0, 0]
              LL source: Estimated based on local knowledge (layer 1, 2, 3, 4)
          SoilOrganicMatter: RootCN=59.7; RootWt=2183; SoilCN=12; EnrACoeff=7.4; EnrBCoeff=0.2; OCUnits=Total
            Thickness  OC    FBiom  FInert
            25         2.27  0.215  0.376
            25         2.27  0.176  0.376
            50         2.27  0.111  0.376
            100        2.27  0.07   0.432
            100        2.15  0.05   0.47
            150        2.15  0.038  0.515
            150        2.15  0.031  0.739
            150        1.65  0.026  0.761
            150        1.1   0.023  0.779
            150        0.7   0.02   0.801
            150        0.5   0.018  0.821
            300        0.5   0.016  0.85
            300        0.3   0.014  0.89
            300        0.1   0.013  0.999
            300        0.1   0.012  0.999
            300        0.1   0.011  0.999
            300        0.1   0.01   0.999
            300        0.1   0.009  0.999
            300        0.1   0.009  0.999
            300        0.1   0.008  0.999
            OC source: Estimated based on local knowledge (layer 1, 2, 3, 4)
          Analysis: PHUnits=Water; BoronUnits=HotWater
            Thickness  PH    CEC    ParticleSizeSand  ParticleSizeSilt  ParticleSizeClay
            25         5.73  34.46  3                 66                31
            25         5.73  34.46  3                 66                31
            50         5.73  34.46  3                 66                31
            100        5.73  33.61  3                 66                31
            100        6.05  29.32  3                 66                31
            150        6.05  29.32  3                 66                31
            150        6.05  24.61  3                 65                32
            150        6.16  24.61  3                 65                32
            150        6.05  27.5   3                 65                32
            150        6.05  27.5   3                 65                32
            150        6.05  27.5   3                 65                32
            300        6.05  27.5   4                 67                29
            300        6.32  27.5   4                 68                28
            300        6.48  27.5   4                 69                27
            300        6.42  27.5   4                 69                27
            300        6.05  27.5   4                 69                27
            300        6.05  27.5   4                 69                27
            300        6.32  27.5   4                 69                27
            300        6.48  27.5   4                 69                27
            300        6.42  27.5   4                 69                27
            PH source: Estimated based on local knowledge (layer 1, 2, 3, 4)
            ParticleSizeSand, ParticleSizeSilt source: Measured (layer 1)
            ParticleSizeClay source: Measured (layer 1, 2)
          Sample Initial nitrogen: NO3Units=kgha; NH4Units=kgha; SWUnits=Volumetric; OCUnits=Total; PHUnits=Water
            Thickness  NO3  NH4    SW
            25         2.3  3      0.278
            25         2.3  3      0.278
            50         2    3      0.278
            100        2    3      0.27
            100        2    4      0.265
            150        4    4      0.279
            150        4    4      0.279
            150        3    2.9    0.27
            150        3    1.8    0.274
            150        2    1.4    0.274
            150        1    0.9    0.274
            300        1.2  0.024  0.274
            300        0.4  0.238  0.269
            300        0.2  0      0.269
            300        0    0      0.269
            300        0.4  0.238  0.269
            300        0.2  0      0.325
            300        0    0      0.319
            300        0.4  0.238  0.313
            300        0.2  0      0.308
          Swim: Salb=0.13; CN2Bare=70; CNRed=20; CNCov=0.8; KDul=0.3; PSIDul=-300; VC=true; DTmin=0; DTmax=1440; MaxWaterIncrement=10; SpaceWeightingFactor=0; SoluteSpaceWeightingFactor=0; Diagnostics=false
            SwimSoluteParameters: same as Locations.CornSoy_plot1.paddock.Soil_Ames.Swim.SwimSoluteParameters
          SoilTemperature: BoundaryLayerConductance=20
            Thickness=[25, 25, 50, 100, 100, 150, 150, 150, 150, 150, 150, 300, 300, 300, 300, 300, 300, 300, 300, 300]
            InitialSoilTemperature=[10, 10, 10, 10, 10, 10, 10, 10, 10, 10, 10, 10, 10, 10, 10, 10, 10, 10, 10, 10]
        manager2 InitialiseWaterTable
          InitDOY = 1  # Day of year to initialise the water table
          WTDepth = 2050  # Depth to water table (mm)
          script: same as in ames.ames-2000.paddock.InitialiseWaterTable
    simulation lewi-2001 -> /simulations/lewis/lewi-2000
      clock
        start_date = 01/01/2001  # Enter the start date of the simulation
        end_date = 31/12/2001  # Enter the end date of the simulation
      area paddock -> /simulations/lewis/lewi-2000/paddock
        outputfile -> /simulations/lewis/lewi-2000/paddock/outputfile: filename=lewi-2001.out; title=lewi-2001
          events My Variables Events -> /simulations/lewis/lewi-2000/paddock/outputfile/My Variables Events
          variables My Variables -> /simulations/lewis/lewi-2000/paddock/outputfile/My Variables
    simulation lewi-2002 -> /simulations/lewis/lewi-2000
      clock
        start_date = 01/01/2002  # Enter the start date of the simulation
        end_date = 31/12/2002  # Enter the end date of the simulation
      area paddock -> /simulations/lewis/lewi-2000/paddock
        outputfile -> /simulations/lewis/lewi-2000/paddock/outputfile: filename=lewi-2002.out; title=lewi-2002
          events My Variables Events -> /simulations/lewis/lewi-2000/paddock/outputfile/My Variables Events
          variables My Variables -> /simulations/lewis/lewi-2000/paddock/outputfile/My Variables
    simulation lewi-2003 -> /simulations/lewis/lewi-2000
      clock
        start_date = 01/01/2003  # Enter the start date of the simulation
        end_date = 31/12/2003  # Enter the end date of the simulation
      area paddock -> /simulations/lewis/lewi-2000/paddock
        outputfile -> /simulations/lewis/lewi-2000/paddock/outputfile: filename=lewi-2003.out; title=lewi-2003
          events My Variables Events -> /simulations/lewis/lewi-2000/paddock/outputfile/My Variables Events
          variables My Variables -> /simulations/lewis/lewi-2000/paddock/outputfile/My Variables
    simulation lewi-2004 -> /simulations/lewis/lewi-2000
      clock
        start_date = 01/01/2004  # Enter the start date of the simulation
        end_date = 31/12/2004  # Enter the end date of the simulation
      area paddock -> /simulations/lewis/lewi-2000/paddock
        outputfile -> /simulations/lewis/lewi-2000/paddock/outputfile: filename=lewi-2004.out; title=lewi-2004
          events My Variables Events -> /simulations/lewis/lewi-2000/paddock/outputfile/My Variables Events
          variables My Variables -> /simulations/lewis/lewi-2000/paddock/outputfile/My Variables
    simulation lewi-2005 -> /simulations/lewis/lewi-2000
      clock
        start_date = 01/01/2005  # Enter the start date of the simulation
        end_date = 31/12/2005  # Enter the end date of the simulation
      area paddock -> /simulations/lewis/lewi-2000/paddock
        outputfile -> /simulations/lewis/lewi-2000/paddock/outputfile: filename=lewi-2005.out; title=lewi-2005
          events My Variables Events -> /simulations/lewis/lewi-2000/paddock/outputfile/My Variables Events
          variables My Variables -> /simulations/lewis/lewi-2000/paddock/outputfile/My Variables
    simulation lewi-2006 -> /simulations/lewis/lewi-2000
      clock
        start_date = 01/01/2006  # Enter the start date of the simulation
        end_date = 31/12/2006  # Enter the end date of the simulation
      area paddock -> /simulations/lewis/lewi-2000/paddock
        outputfile -> /simulations/lewis/lewi-2000/paddock/outputfile: filename=lewi-2006.out; title=lewi-2006
          events My Variables Events -> /simulations/lewis/lewi-2000/paddock/outputfile/My Variables Events
          variables My Variables -> /simulations/lewis/lewi-2000/paddock/outputfile/My Variables
    simulation lewi-2007 -> /simulations/lewis/lewi-2000
      clock
        start_date = 01/01/2007  # Enter the start date of the simulation
        end_date = 31/12/2007  # Enter the end date of the simulation
      area paddock -> /simulations/lewis/lewi-2000/paddock
        outputfile -> /simulations/lewis/lewi-2000/paddock/outputfile: filename=lewi-2007.out; title=lewi-2007
          events My Variables Events -> /simulations/lewis/lewi-2000/paddock/outputfile/My Variables Events
          variables My Variables -> /simulations/lewis/lewi-2000/paddock/outputfile/My Variables
    simulation lewi-2008 -> /simulations/lewis/lewi-2000
      clock
        start_date = 01/01/2008  # Enter the start date of the simulation
        end_date = 31/12/2008  # Enter the end date of the simulation
      area paddock -> /simulations/lewis/lewi-2000/paddock
        outputfile -> /simulations/lewis/lewi-2000/paddock/outputfile: filename=lewi-2008.out; title=lewi-2008
          events My Variables Events -> /simulations/lewis/lewi-2000/paddock/outputfile/My Variables Events
          variables My Variables -> /simulations/lewis/lewi-2000/paddock/outputfile/My Variables
    simulation lewi-2009 -> /simulations/lewis/lewi-2000
      clock
        start_date = 01/01/2009  # Enter the start date of the simulation
        end_date = 31/12/2009  # Enter the end date of the simulation
      area paddock -> /simulations/lewis/lewi-2000/paddock
        outputfile -> /simulations/lewis/lewi-2000/paddock/outputfile: filename=lewi-2009.out; title=lewi-2009
          events My Variables Events -> /simulations/lewis/lewi-2000/paddock/outputfile/My Variables Events
          variables My Variables -> /simulations/lewis/lewi-2000/paddock/outputfile/My Variables
    simulation lewi-2010 -> /simulations/lewis/lewi-2000
      clock
        start_date = 01/01/2010  # Enter the start date of the simulation
        end_date = 31/12/2010  # Enter the end date of the simulation
      area paddock -> /simulations/lewis/lewi-2000/paddock
        outputfile -> /simulations/lewis/lewi-2000/paddock/outputfile: filename=lewi-2010.out; title=lewi-2010
          events My Variables Events -> /simulations/lewis/lewi-2000/paddock/outputfile/My Variables Events
          variables My Variables -> /simulations/lewis/lewi-2000/paddock/outputfile/My Variables
    simulation lewi-2011 -> /simulations/lewis/lewi-2000
      clock
        start_date = 01/01/2011  # Enter the start date of the simulation
        end_date = 31/12/2011  # Enter the end date of the simulation
      area paddock -> /simulations/lewis/lewi-2000/paddock
        outputfile -> /simulations/lewis/lewi-2000/paddock/outputfile: filename=lewi-2011.out; title=lewi-2011
          events My Variables Events -> /simulations/lewis/lewi-2000/paddock/outputfile/My Variables Events
          variables My Variables -> /simulations/lewis/lewi-2000/paddock/outputfile/My Variables
    simulation lewi-2012 -> /simulations/lewis/lewi-2000
      clock
        start_date = 01/01/2012  # Enter the start date of the simulation
        end_date = 31/12/2012  # Enter the end date of the simulation
      area paddock -> /simulations/lewis/lewi-2000/paddock
        outputfile -> /simulations/lewis/lewi-2000/paddock/outputfile: filename=lewi-2012.out; title=lewi-2012
          events My Variables Events -> /simulations/lewis/lewi-2000/paddock/outputfile/My Variables Events
          variables My Variables -> /simulations/lewis/lewi-2000/paddock/outputfile/My Variables
    simulation lewi-2013 -> /simulations/lewis/lewi-2000
      clock
        start_date = 01/01/2013  # Enter the start date of the simulation
        end_date = 31/12/2013  # Enter the end date of the simulation
      area paddock -> /simulations/lewis/lewi-2000/paddock
        outputfile -> /simulations/lewis/lewi-2000/paddock/outputfile: filename=lewi-2013.out; title=lewi-2013
          events My Variables Events -> /simulations/lewis/lewi-2000/paddock/outputfile/My Variables Events
          variables My Variables -> /simulations/lewis/lewi-2000/paddock/outputfile/My Variables
    simulation lewi-2014 -> /simulations/lewis/lewi-2000
      clock
        start_date = 01/01/2014  # Enter the start date of the simulation
        end_date = 31/12/2014  # Enter the end date of the simulation
      area paddock -> /simulations/lewis/lewi-2000/paddock
        outputfile -> /simulations/lewis/lewi-2000/paddock/outputfile: filename=lewi-2014.out; title=lewi-2014
          events My Variables Events -> /simulations/lewis/lewi-2000/paddock/outputfile/My Variables Events
          variables My Variables -> /simulations/lewis/lewi-2000/paddock/outputfile/My Variables
    simulation lewi-2015 -> /simulations/lewis/lewi-2000
      clock
        start_date = 01/01/2015  # Enter the start date of the simulation
        end_date = 31/12/2015  # Enter the end date of the simulation
      area paddock -> /simulations/lewis/lewi-2000/paddock
        outputfile -> /simulations/lewis/lewi-2000/paddock/outputfile: filename=lewi-2015.out; title=lewi-2015
          events My Variables Events -> /simulations/lewis/lewi-2000/paddock/outputfile/My Variables Events
          variables My Variables -> /simulations/lewis/lewi-2000/paddock/outputfile/My Variables
    simulation lewi-2016 -> /simulations/lewis/lewi-2000
      clock
        start_date = 01/01/2016  # Enter the start date of the simulation
        end_date = 31/12/2016  # Enter the end date of the simulation
      area paddock -> /simulations/lewis/lewi-2000/paddock
        outputfile -> /simulations/lewis/lewi-2000/paddock/outputfile: filename=lewi-2016.out; title=lewi-2016
          events My Variables Events -> /simulations/lewis/lewi-2000/paddock/outputfile/My Variables Events
          variables My Variables -> /simulations/lewis/lewi-2000/paddock/outputfile/My Variables
  folder mcnay
    simulation mcna-2000
      metfile met
        filename=C:\Users\vnichols\Box Sync\Gina_APSIM_modeling\yield-gap-gina\wea-data\mcnay_2000-2016.met
      clock
        start_date = 01/01/2000  # Enter the start date of the simulation
        end_date = 31/12/2000  # Enter the end date of the simulation
      summaryfile
      area paddock
        surfaceom SurfaceOrganicMatter
          PoolName = soybean  # Organic Matter pool name
          type = soybean  # Organic Matter type
          mass = 2000  # Initial surface residue (kg/ha)
          cnr = 45  # C:N ratio of initial residue
          standing_fraction = 0.0  # Fraction of residue standing
        fertiliser
        maize
          ini: filename=XML_corn7.9.xml
        manager WT_script
          on start_of_day:
          script: same as in Locations.CornSoy_plot1.paddock.WT_script
        folder Manager folder: same as ames.ames-2000.paddock.Manager folder
        outputfile: filename=mcna-2000.out; title=mcna-2000
          events My Variables Events: event=daily
          variables My Variables
            variables: dd/mm/yyyy as Date, year, yield, biomass, watertable, no3(), surfaceom_wt, lai, Rain, dlt_n_min()
        Soil McNaySoil: SoilType=Primghar; NearestTown=Sutherland; State=Iowa; Country=US; Latitude=42.92; Longitude=-95.53; YearOfSampling=0; DataSource=web soil survey; Comments=hydrological parameters and BD from Saxton and Rawls, 2006
          Water
            Thickness  BD    AirDry  LL15   DUL    SAT    KS
            25         1.25  0.091   0.182  0.319  0.494  467
            25         1.25  0.091   0.182  0.319  0.494  467
            50         1.25  0.091   0.182  0.319  0.494  467
            100        1.25  0.146   0.182  0.319  0.494  63
            100        1.25  0.22    0.22   0.341  0.483  63
            150        1.35  0.247   0.247  0.322  0.479  41
            150        1.35  0.247   0.247  0.322  0.479  41
            150        1.38  0.247   0.247  0.322  0.479  41
            150        1.38  0.247   0.247  0.322  0.479  41
            150        1.45  0.2     0.2    0.329  0.453  49
            150        1.45  0.2     0.2    0.329  0.453  49
            300        1.45  0.2     0.2    0.329  0.453  49
            300        1.45  0.2     0.2    0.329  0.37   5.12
            300        1.45  0.2     0.2    0.329  0.363  2.651
            400        1.45  0.2     0.2    0.329  0.357  1.373
            300        1.45  0.2     0.2    0.329  0.352  0.711
            300        1.45  0.2     0.2    0.329  0.348  0.368
            300        1.45  0.2     0.2    0.329  0.344  0.191
            300        1.45  0.2     0.2    0.329  0.343  0.146
            300        1.45  0.2     0.2    0.329  0.343  0.146
            BD source: Field measured and checked for sensibility (layer 2, 3, 4)
            AirDry source: Estimated based on local knowledge (layer 1, 2, 3, 4)
            LL15 source: Estimated based on local knowledge (layer 2, 3, 4)
            DUL source: Field measured and checked for sensibility (layer 1, 2, 3, 4)
            SAT source: Calculated from measured, estimated or calculated BD (layer 1, 2, 3, 4)
            SoilCrop maize
              LL=[0.182, 0.182, 0.182, 0.182, 0.22, 0.267, 0.273, 0.28, 0.285, 0.275, 0.283, 0.293, 0.304, 0.315, 0.317, 0.317, 0.317, 0.317, 0.317, 0.317]
              KL=[0.08, 0.08, 0.08, 0.08, 0.08, 0.08, 0.08, 0.08, 0.08, 0.08, 0.08, 0.04, 0.04, 0.03, 0.02, 0.02, 0.01, 0.01, 0, 0]
              XF=[1, 1, 1, 1, 1, 0.7, 0.7, 0.7, 0.7, 0.7, 0.9, 0.9, 0.9, 0.4, 0, 0, 0, 0, 0, 0]
              LL source: Estimated based on local knowledge (layer 2, 3, 4)
            SoilCrop soybean
              LL=[0.182, 0.182, 0.182, 0.182, 0.22, 0.267, 0.273, 0.28, 0.285, 0.275, 0.283, 0.293, 0.304, 0.315, 0.317, 0.317, 0.317, 0.317, 0.317, 0.317]
              KL=[0.08, 0.08, 0.08, 0.08, 0.08, 0.08, 0.08, 0.08, 0.08, 0.08, 0.08, 0.04, 0.04, 0.03, 0.02, 0.02, 0.01, 0.01, 0, 0]
              XF=[1, 1, 1, 1, 1, 0.7, 0.7, 0.7, 0.7, 0.7, 0.9, 0.9, 0.9, 0.4, 0, 0, 0, 0, 0, 0]
              LL source: Estimated based on local knowledge (layer 1, 2, 3, 4)
          SoilOrganicMatter: RootCN=29.7; RootWt=2183; SoilCN=12; EnrACoeff=7.4; EnrBCoeff=0.2; OCUnits=Total
            Thickness  OC     FBiom  FInert
            25         2.549  0.215  0.365
            25         2.549  0.176  0.365
            50         2.549  0.111  0.365
            100        2.259  0.07   0.449
            100        1.968  0.05   0.73
            150        1.983  0.038  0.803
            150        1.983  0.031  0.999
            150        1.407  0.026  0.999
            150        1.407  0.023  0.999
            150        1.36   0.02   0.999
            150        1.36   0.018  0.999
            300        1.18   0.016  0.999
            300        1.18   0.014  0.999
            300        1.041  0.013  0.999
            400        1.041  0.012  0.999
            300        0.5    0.011  0.999
            300        0.1    0.01   0.999
            300        0.1    0.009  0.999
            300        0.1    0.009  0.999
            300        0.1    0.008  0.999
            OC source: Estimated based on local knowledge (layer 1, 2, 3, 4)
          Analysis: PHUnits=Water; BoronUnits=HotWater
            Thickness  PH    CEC     ParticleSizeSand  ParticleSizeSilt  ParticleSizeClay
            25         6.5   25.435  10                65                25
            25         6.5   25.435  10                65                25
            50         6.5   25.435  10                65                25
            100        6.55  24.773  8                 55                37
            100        6.6   24.11   8                 55                37
            150        6.65  30.535  7                 48                45
            150        6.65  30.535  7                 48                45
            150        6.45  33.85   7                 48                45
            150        6.45  33.85   7                 48                45
            150        6.8   28.09   7                 48                45
            150        6.8   28.09   18                48                34
            300        6.8   29.235  18                48                34
            300        6.8   29.235  18                48                34
            300        6.9   30.84   18                48                34
            400        6.9   30.84   18                48                34
            300        6.8   28.09   18                48                34
            300        6.8   29.235  18                48                34
            300        6.8   29.235  18                48                34
            300        6.9   30.84   18                48                34
            300        6.9   30.84   18                48                34
            PH source: Estimated based on local knowledge (layer 1, 2, 3, 4)
            ParticleSizeSand, ParticleSizeSilt source: Measured (layer 1)
            ParticleSizeClay source: Measured (layer 1, 2)
          Sample Initial nitrogen: NO3Units=kgha; NH4Units=kgha; SWUnits=Volumetric; OCUnits=Total; PHUnits=Water
            Thickness  NO3    NH4    SW
            25         2.3    1.25   0.319
            25         2.3    1.25   0.319
            50         4.375  2.5    0.319
            100        3.75   5      0.319
            100        3.75   5      0.341
            150        4.05   8.1    0.322
            150        4.05   8.1    0.322
            150        4.14   6.003  0.322
            150        4.14   3.726  0.322
            150        2      3.045  0.329
            150        1      1.958  0.329
            300        1.2    0.104  0.329
            300        0.4    1.035  0.383
            300        0.2    0      0.376
            400        0      0      0.369
            300        0.4    1.035  0.364
            300        0.4    1.035  0.359
            300        0.4    1.035  0.355
            300        0.2    0      0.351
            300        0      0      0.348
          Swim: Salb=0.13; CN2Bare=78; CNRed=20; CNCov=0.8; KDul=0.3; PSIDul=-300; VC=true; DTmin=0; DTmax=1440; MaxWaterIncrement=10; SpaceWeightingFactor=0; SoluteSpaceWeightingFactor=0; Diagnostics=false
            SwimSoluteParameters: same as Locations.CornSoy_plot1.paddock.Soil_Ames.Swim.SwimSoluteParameters
          SoilTemperature: BoundaryLayerConductance=20
            Thickness=[25, 25, 50, 100, 100, 150, 150, 150, 150, 150, 150, 300, 300, 300, 400, 300, 300, 300, 300, 300]
            InitialSoilTemperature=[10, 10, 10, 10, 10, 10, 10, 10, 10, 10, 10, 10, 10, 10, 10, 10, 10, 10, 10, 10]
        manager2 InitialiseWaterTable
          InitDOY = 1  # Day of year to initialise the water table
          WTDepth = 1000  # Depth to water table (mm)
          script: same as in ames.ames-2000.paddock.InitialiseWaterTable
    simulation mcna-2001 -> /simulations/mcnay/mcna-2000
      clock
        start_date = 01/01/2001  # Enter the start date of the simulation
        end_date = 31/12/2001  # Enter the end date of the simulation
      area paddock -> /simulations/mcnay/mcna-2000/paddock
        outputfile -> /simulations/mcnay/mcna-2000/paddock/outputfile: filename=mcna-2001.out; title=mcna-2001
          events My Variables Events -> /simulations/mcnay/mcna-2000/paddock/outputfile/My Variables Events
          variables My Variables -> /simulations/mcnay/mcna-2000/paddock/outputfile/My Variables
    simulation mcna-2002 -> /simulations/mcnay/mcna-2000
      clock
        start_date = 01/01/2002  # Enter the start date of the simulation
        end_date = 31/12/2002  # Enter the end date of the simulation
      area paddock -> /simulations/mcnay/mcna-2000/paddock
        outputfile -> /simulations/mcnay/mcna-2000/paddock/outputfile: filename=mcna-2002.out; title=mcna-2002
          events My Variables Events -> /simulations/mcnay/mcna-2000/paddock/outputfile/My Variables Events
          variables My Variables -> /simulations/mcnay/mcna-2000/paddock/outputfile/My Variables
    simulation mcna-2003 -> /simulations/mcnay/mcna-2000
      clock
        start_date = 01/01/2003  # Enter the start date of the simulation
        end_date = 31/12/2003  # Enter the end date of the simulation
      area paddock -> /simulations/mcnay/mcna-2000/paddock
        outputfile -> /simulations/mcnay/mcna-2000/paddock/outputfile: filename=mcna-2003.out; title=mcna-2003
          events My Variables Events -> /simulations/mcnay/mcna-2000/paddock/outputfile/My Variables Events
          variables My Variables -> /simulations/mcnay/mcna-2000/paddock/outputfile/My Variables
    simulation mcna-2004 -> /simulations/mcnay/mcna-2000
      clock
        start_date = 01/01/2004  # Enter the start date of the simulation
        end_date = 31/12/2004  # Enter the end date of the simulation
      area paddock -> /simulations/mcnay/mcna-2000/paddock
        outputfile -> /simulations/mcnay/mcna-2000/paddock/outputfile: filename=mcna-2004.out; title=mcna-2004
          events My Variables Events -> /simulations/mcnay/mcna-2000/paddock/outputfile/My Variables Events
          variables My Variables -> /simulations/mcnay/mcna-2000/paddock/outputfile/My Variables
    simulation mcna-2005 -> /simulations/mcnay/mcna-2000
      clock
        start_date = 01/01/2005  # Enter the start date of the simulation
        end_date = 31/12/2005  # Enter the end date of the simulation
      area paddock -> /simulations/mcnay/mcna-2000/paddock
        outputfile -> /simulations/mcnay/mcna-2000/paddock/outputfile: filename=mcna-2005.out; title=mcna-2005
          events My Variables Events -> /simulations/mcnay/mcna-2000/paddock/outputfile/My Variables Events
          variables My Variables -> /simulations/mcnay/mcna-2000/paddock/outputfile/My Variables
    simulation mcna-2006 -> /simulations/mcnay/mcna-2000
      clock
        start_date = 01/01/2006  # Enter the start date of the simulation
        end_date = 31/12/2006  # Enter the end date of the simulation
      area paddock -> /simulations/mcnay/mcna-2000/paddock
        outputfile -> /simulations/mcnay/mcna-2000/paddock/outputfile: filename=mcna-2006.out; title=mcna-2006
          events My Variables Events -> /simulations/mcnay/mcna-2000/paddock/outputfile/My Variables Events
          variables My Variables -> /simulations/mcnay/mcna-2000/paddock/outputfile/My Variables
    simulation mcna-2007 -> /simulations/mcnay/mcna-2000
      clock
        start_date = 01/01/2007  # Enter the start date of the simulation
        end_date = 31/12/2007  # Enter the end date of the simulation
      area paddock -> /simulations/mcnay/mcna-2000/paddock
        outputfile -> /simulations/mcnay/mcna-2000/paddock/outputfile: filename=mcna-2007.out; title=mcna-2007
          events My Variables Events -> /simulations/mcnay/mcna-2000/paddock/outputfile/My Variables Events
          variables My Variables -> /simulations/mcnay/mcna-2000/paddock/outputfile/My Variables
    simulation mcna-2008 -> /simulations/mcnay/mcna-2000
      clock
        start_date = 01/01/2008  # Enter the start date of the simulation
        end_date = 31/12/2008  # Enter the end date of the simulation
      area paddock -> /simulations/mcnay/mcna-2000/paddock
        outputfile -> /simulations/mcnay/mcna-2000/paddock/outputfile: filename=mcna-2008.out; title=mcna-2008
          events My Variables Events -> /simulations/mcnay/mcna-2000/paddock/outputfile/My Variables Events
          variables My Variables -> /simulations/mcnay/mcna-2000/paddock/outputfile/My Variables
    simulation mcna-2009 -> /simulations/mcnay/mcna-2000
      clock
        start_date = 01/01/2009  # Enter the start date of the simulation
        end_date = 31/12/2009  # Enter the end date of the simulation
      area paddock -> /simulations/mcnay/mcna-2000/paddock
        outputfile -> /simulations/mcnay/mcna-2000/paddock/outputfile: filename=mcna-2009.out; title=mcna-2009
          events My Variables Events -> /simulations/mcnay/mcna-2000/paddock/outputfile/My Variables Events
          variables My Variables -> /simulations/mcnay/mcna-2000/paddock/outputfile/My Variables
    simulation mcna-2010 -> /simulations/mcnay/mcna-2000
      clock
        start_date = 01/01/2010  # Enter the start date of the simulation
        end_date = 31/12/2010  # Enter the end date of the simulation
      area paddock -> /simulations/mcnay/mcna-2000/paddock
        outputfile -> /simulations/mcnay/mcna-2000/paddock/outputfile: filename=mcna-2010.out; title=mcna-2010
          events My Variables Events -> /simulations/mcnay/mcna-2000/paddock/outputfile/My Variables Events
          variables My Variables -> /simulations/mcnay/mcna-2000/paddock/outputfile/My Variables
    simulation mcna-2011 -> /simulations/mcnay/mcna-2000
      clock
        start_date = 01/01/2011  # Enter the start date of the simulation
        end_date = 31/12/2011  # Enter the end date of the simulation
      area paddock -> /simulations/mcnay/mcna-2000/paddock
        outputfile -> /simulations/mcnay/mcna-2000/paddock/outputfile: filename=mcna-2011.out; title=mcna-2011
          events My Variables Events -> /simulations/mcnay/mcna-2000/paddock/outputfile/My Variables Events
          variables My Variables -> /simulations/mcnay/mcna-2000/paddock/outputfile/My Variables
    simulation mcna-2012 -> /simulations/mcnay/mcna-2000
      clock
        start_date = 01/01/2012  # Enter the start date of the simulation
        end_date = 31/12/2012  # Enter the end date of the simulation
      area paddock -> /simulations/mcnay/mcna-2000/paddock
        outputfile -> /simulations/mcnay/mcna-2000/paddock/outputfile: filename=mcna-2012.out; title=mcna-2012
          events My Variables Events -> /simulations/mcnay/mcna-2000/paddock/outputfile/My Variables Events
          variables My Variables -> /simulations/mcnay/mcna-2000/paddock/outputfile/My Variables
    simulation mcna-2013 -> /simulations/mcnay/mcna-2000
      clock
        start_date = 01/01/2013  # Enter the start date of the simulation
        end_date = 31/12/2013  # Enter the end date of the simulation
      area paddock -> /simulations/mcnay/mcna-2000/paddock
        outputfile -> /simulations/mcnay/mcna-2000/paddock/outputfile: filename=mcna-2013.out; title=mcna-2013
          events My Variables Events -> /simulations/mcnay/mcna-2000/paddock/outputfile/My Variables Events
          variables My Variables -> /simulations/mcnay/mcna-2000/paddock/outputfile/My Variables
    simulation mcna-2014 -> /simulations/mcnay/mcna-2000
      clock
        start_date = 01/01/2014  # Enter the start date of the simulation
        end_date = 31/12/2014  # Enter the end date of the simulation
      area paddock -> /simulations/mcnay/mcna-2000/paddock
        outputfile -> /simulations/mcnay/mcna-2000/paddock/outputfile: filename=mcna-2014.out; title=mcna-2014
          events My Variables Events -> /simulations/mcnay/mcna-2000/paddock/outputfile/My Variables Events
          variables My Variables -> /simulations/mcnay/mcna-2000/paddock/outputfile/My Variables
    simulation mcna-2015 -> /simulations/mcnay/mcna-2000
      clock
        start_date = 01/01/2015  # Enter the start date of the simulation
        end_date = 31/12/2015  # Enter the end date of the simulation
      area paddock -> /simulations/mcnay/mcna-2000/paddock
        outputfile -> /simulations/mcnay/mcna-2000/paddock/outputfile: filename=mcna-2015.out; title=mcna-2015
          events My Variables Events -> /simulations/mcnay/mcna-2000/paddock/outputfile/My Variables Events
          variables My Variables -> /simulations/mcnay/mcna-2000/paddock/outputfile/My Variables
    simulation mcna-2016 -> /simulations/mcnay/mcna-2000
      clock
        start_date = 01/01/2016  # Enter the start date of the simulation
        end_date = 31/12/2016  # Enter the end date of the simulation
      area paddock -> /simulations/mcnay/mcna-2000/paddock
        outputfile -> /simulations/mcnay/mcna-2000/paddock/outputfile: filename=mcna-2016.out; title=mcna-2016
          events My Variables Events -> /simulations/mcnay/mcna-2000/paddock/outputfile/My Variables Events
          variables My Variables -> /simulations/mcnay/mcna-2000/paddock/outputfile/My Variables
  folder nashua
    simulation nash-2000
      metfile met
        filename=C:\Users\vnichols\Box Sync\Gina_APSIM_modeling\yield-gap-gina\wea-data\nash_2000-2016.met
      clock
        start_date = 01/01/2000  # Enter the start date of the simulation
        end_date = 31/12/2000  # Enter the end date of the simulation
      summaryfile
      area paddock
        surfaceom SurfaceOrganicMatter
          PoolName = soybean  # Organic Matter pool name
          type = soybean  # Organic Matter type
          mass = 2000  # Initial surface residue (kg/ha)
          cnr = 45  # C:N ratio of initial residue
          standing_fraction = 0.0  # Fraction of residue standing
        fertiliser
        maize
          ini: filename=XML_corn7.9.xml
        manager WT_script
          on start_of_day:
          script: same as in Locations.CornSoy_plot1.paddock.WT_script
        folder Manager folder: same as ames.ames-2000.paddock.Manager folder
        outputfile: filename=nash-2000.out; title=nash-2000
          events My Variables Events: event=daily
          variables My Variables
            variables: dd/mm/yyyy as Date, year, yield, biomass, watertable, no3(), surfaceom_wt, lai, Rain, dlt_n_min()
        Soil NashuaSoil_3m Cs ReInitialized: SoilType=Kenyon Floyd Readlyn Loams; Site=ISU Northeast Research and Demonstration Farm; NearestTown=Nashua; Region=Floyd, Co.; State=Iowa; Country=USA; Latitude=42.93; Longitude=-92.57; YearOfSampling=0; Comments=SVA and RFM, Feb 2016
          DataSource=Malone et al. (2007) and web soil survey - soil profile to 3 m
          Water
            Thickness  BD    AirDry  LL15   DUL    SAT    KS
            10         1.25  0.05    0.099  0.259  0.415  247
            40         1.25  0.051   0.102  0.259  0.415  247
            50         1.25  0.054   0.107  0.259  0.415  247
            100        1.25  0.092   0.115  0.255  0.4    247
            100        1.25  0.101   0.101  0.246  0.38   141
            150        1.35  0.102   0.102  0.24   0.38   141
            150        1.35  0.111   0.111  0.24   0.38   152
            200        1.56  0.115   0.115  0.239  0.4    102
            200        1.56  0.139   0.139  0.259  0.38   102
            200        1.56  0.14    0.14   0.269  0.38   102
            300        1.73  0.134   0.134  0.266  0.38   102
            300        1.82  0.143   0.143  0.272  0.321  8.789
            300        1.84  0.146   0.146  0.274  0.316  5.365
            300        1.84  0.144   0.144  0.272  0.308  3.275
            300        1.84  0.134   0.134  0.266  0.297  2
            300        1.84  0.146   0.146  0.274  0.301  1.221
            300        1.84  0.146   0.146  0.274  0.297  0.745
            300        1.84  0.146   0.146  0.274  0.294  0.455
            300        1.84  0.146   0.146  0.274  0.291  0.278
            SoilCrop maize
              LL=[0.099, 0.102, 0.107, 0.115, 0.101, 0.138, 0.156, 0.171, 0.204, 0.221, 0.229, 0.247, 0.258, 0.26, 0.254, 0.262, 0.262, 0.262, 0.262]
              KL=[0.08, 0.08, 0.08, 0.08, 0.08, 0.08, 0.08, 0.08, 0.08, 0.08, 0.04, 0.04, 0.03, 0.02, 0.02, 0.01, 0.01, 0, 0]
              XF=[1, 1, 1, 1, 1, 1, 1, 1, 1, 1, 0.4, 0.4, 0.4, 0.4, 0, 0, 0, 0, 0]
              LL source: Estimated based on local knowledge (layer 2, 3, 4)
            SoilCrop soybean
              LL=[0.099, 0.102, 0.107, 0.115, 0.101, 0.138, 0.156, 0.171, 0.204, 0.221, 0.229, 0.247, 0.258, 0.26, 0.254, 0.262, 0.262, 0.262, 0.262]
              KL=[0.08, 0.08, 0.08, 0.08, 0.08, 0.08, 0.08, 0.08, 0.08, 0.08, 0.04, 0.04, 0.03, 0.02, 0.02, 0.01, 0.01, 0, 0]
              XF=[1, 1, 1, 1, 1, 1, 1, 1, 1, 1, 0.4, 0.4, 0.4, 0.4, 0, 0, 0, 0, 0]
              LL source: Estimated based on local knowledge (layer 1, 2, 3, 4)
          SoilOrganicMatter: RootCN=29; RootWt=2195; SoilCN=12; EnrACoeff=7.4; EnrBCoeff=0.2; OCUnits=Total
            Thickness  OC     FBiom  FInert
            10         2.52   0.215  0.365
            40         2.47   0.204  0.365
            50         2.4    0.111  0.365
            100        2.28   0.07   0.42
            100        2.08   0.05   0.456
            150        1.67   0.038  0.699
            150        1.11   0.03   0.718
            200        0.62   0.025  0.741
            200        0.43   0.021  0.767
            200        0.3    0.019  0.793
            300        0.231  0.016  0.826
            300        0.132  0.014  0.999
            300        0.099  0.013  0.999
            300        0.121  0.012  0.999
            300        0.121  0.011  0.999
            300        0.1    0.01   0.999
            300        0.1    0.009  0.999
            300        0.1    0.009  0.999
            300        0.1    0.008  0.999
          Analysis: PHUnits=Water; BoronUnits=HotWater
            Thickness  PH    Boron  CEC    Ca     Mg     Na    K     Mn     Al      ParticleSizeSand  ParticleSizeSilt  ParticleSizeClay
            10         6.37  0.98   19.87  78.76  14.89  0.37  2.06  84.33  410.33  36.8              40.5              22.7
            40         6.37  0.98   19.85  78.76  14.89  0.37  2.06  84.33  410.33  36.2              41.2              22.6
            50         6.37  0.98   19.81  78.76  14.89  0.37  2.06  84.33  410.33  35.4              42.2              22.5
            100        6.37  1.01   19.76  78.48  14.48  0.45  1.58  73     418.83  34                43.8              22.2
            100        6.37  0.87   19.97  77.8   15.24  0.42  1.18  42     445.71  32.3              45.6              22.2
            150        6.37  0.7    20.95  76.18  17.73  0.46  1.06  28.17  452.33  31.2              45.6              23.2
            150        6.38  0.58   20.9   74.79  19.97  0.5   1.07  24.67  450     33.3              42                24.7
            200        6.54  0.47   19.37  77.47  17.61  0.48  0.96  40.17  312.92  40.9              34.2              24.9
            200        6.72  0.36   18.35  80.15  15.24  0.45  0.85  55.67  175.83  50.8              25.8              23.4
            200        6.69  0.36   18.35  80.15  15.24  0.45  0.85  55.67  175.83  53.1              24.5              22.4
            300        6.65  0.36   18     80.15  15.24  0.45  0.85  55.67  175.83  49                27.7              23.3
            300        6.69  0.36   17.25  80.15  15.24  0.45  0.85  55.67  175.83  44.4              31.3              24.3
            300        6.98  0.36   15.45  80.15  15.24  0.45  0.85  55.67  175.83  41.5              34.3              24.1
            300        7.35  0.36   14.17  80.15  15.24  0.45  0.85  55.67  175.83  44.2              33.3              22.5
            300        7.38  0.36   14.42  80.15  15.24  0.45  0.85  55.67  175.83  45.8              32.2              22
            300        6.65  0.36   18     80.15  15.24  0.45  0.85  55.67  175.83  49                27.7              23.3
            300        6.69  0.36   17.25  80.15  15.24  0.45  0.85  55.67  175.83  44.4              31.3              24.3
            300        6.98  0.36   15.45  80.15  15.24  0.45  0.85  55.67  175.83  41.5              34.3              24.1
            300        7.35  0.36   14.17  80.15  15.24  0.45  0.85  55.67  175.83  44.2              33.3              22.5
            ParticleSizeSand, ParticleSizeSilt source: Measured (layer 1)
            ParticleSizeClay source: Measured (layer 1, 2)
          Swim: Salb=0.13; CN2Bare=65; CNRed=20; CNCov=0.8; KDul=0.3; PSIDul=-300; VC=true; DTmin=0; DTmax=1440; MaxWaterIncrement=10; SpaceWeightingFactor=0; SoluteSpaceWeightingFactor=0; Diagnostics=false
            SwimSoluteParameters: same as Locations.CornSoy_plot1.paddock.Soil_Ames.Swim.SwimSoluteParameters
            SwimSubsurfaceDrain: DrainDepth=1200; DrainSpacing=28500; DrainRadius=100; Klat=1000; ImpermDepth=3000
          SoilTemperature: BoundaryLayerConductance=20
            Thickness=[10, 40, 50, 100, 100, 150, 150, 200, 200, 200, 300, 300, 300, 300, 300, 300, 300, 300, 300]
            InitialSoilTemperature=[10, 10, 10, 10, 10, 10, 10, 10, 10, 10, 10, 10, 10, 10, 10, 10, 10, 10, 10]
          Sample Initial nitrogen: NO3Units=kgha; NH4Units=kgha; SWUnits=Volumetric; OCUnits=Total; PHUnits=Water
            Thickness  NO3  NH4  SW
            10         3.5  4    0.259
            40         3.5  4    0.259
            50         3.5  4    0.259
            100        3.5  4    0.255
            100        3.7  4    0.246
            150        5.9  10   0.24
            150        5.3  10   0.24
            200        6.6  3    0.239
            200        3.4  0.1  0.259
            200        2.9  0.1  0.269
            300        1.7  0.1  0.266
            300        1.2  0.5  0.272
            300        0.2  0.3  0.274
            300        0.2  0.2  0.272
            300        0    0    0.266
            300        1.2  0.5  0.272
            300        0.2  0.3  0.274
            300        0.2  0.2  0.272
            300        0    0    0.266
        manager2 InitialiseWaterTable: same as ames.ames-2000.paddock.InitialiseWaterTable
    simulation nash-2001 -> /simulations/nashua/nash-2000
      clock
        start_date = 01/01/2001  # Enter the start date of the simulation
        end_date = 31/12/2001  # Enter the end date of the simulation
      area paddock -> /simulations/nashua/nash-2000/paddock
        outputfile -> /simulations/nashua/nash-2000/paddock/outputfile: filename=nash-2001.out; title=nash-2001
          events My Variables Events -> /simulations/nashua/nash-2000/paddock/outputfile/My Variables Events
          variables My Variables -> /simulations/nashua/nash-2000/paddock/outputfile/My Variables
    simulation nash-2002 -> /simulations/nashua/nash-2000
      clock
        start_date = 01/01/2002  # Enter the start date of the simulation
        end_date = 31/12/2002  # Enter the end date of the simulation
      area paddock -> /simulations/nashua/nash-2000/paddock
        outputfile -> /simulations/nashua/nash-2000/paddock/outputfile: filename=nash-2002.out; title=nash-2002
          events My Variables Events -> /simulations/nashua/nash-2000/paddock/outputfile/My Variables Events
          variables My Variables -> /simulations/nashua/nash-2000/paddock/outputfile/My Variables
    simulation nash-2003 -> /simulations/nashua/nash-2000
      clock
        start_date = 01/01/2003  # Enter the start date of the simulation
        end_date = 31/12/2003  # Enter the end date of the simulation
      area paddock -> /simulations/nashua/nash-2000/paddock
        outputfile -> /simulations/nashua/nash-2000/paddock/outputfile: filename=nash-2003.out; title=nash-2003
          events My Variables Events -> /simulations/nashua/nash-2000/paddock/outputfile/My Variables Events
          variables My Variables -> /simulations/nashua/nash-2000/paddock/outputfile/My Variables
    simulation nash-2004 -> /simulations/nashua/nash-2000
      clock
        start_date = 01/01/2004  # Enter the start date of the simulation
        end_date = 31/12/2004  # Enter the end date of the simulation
      area paddock -> /simulations/nashua/nash-2000/paddock
        outputfile -> /simulations/nashua/nash-2000/paddock/outputfile: filename=nash-2004.out; title=nash-2004
          events My Variables Events -> /simulations/nashua/nash-2000/paddock/outputfile/My Variables Events
          variables My Variables -> /simulations/nashua/nash-2000/paddock/outputfile/My Variables
    simulation nash-2005 -> /simulations/nashua/nash-2000
      clock
        start_date = 01/01/2005  # Enter the start date of the simulation
        end_date = 31/12/2005  # Enter the end date of the simulation
      area paddock -> /simulations/nashua/nash-2000/paddock
        outputfile -> /simulations/nashua/nash-2000/paddock/outputfile: filename=nash-2005.out; title=nash-2005
          events My Variables Events -> /simulations/nashua/nash-2000/paddock/outputfile/My Variables Events
          variables My Variables -> /simulations/nashua/nash-2000/paddock/outputfile/My Variables
    simulation nash-2006 -> /simulations/nashua/nash-2000
      clock
        start_date = 01/01/2006  # Enter the start date of the simulation
        end_date = 31/12/2006  # Enter the end date of the simulation
      area paddock -> /simulations/nashua/nash-2000/paddock
        outputfile -> /simulations/nashua/nash-2000/paddock/outputfile: filename=nash-2006.out; title=nash-2006
          events My Variables Events -> /simulations/nashua/nash-2000/paddock/outputfile/My Variables Events
          variables My Variables -> /simulations/nashua/nash-2000/paddock/outputfile/My Variables
    simulation nash-2007 -> /simulations/nashua/nash-2000
      clock
        start_date = 01/01/2007  # Enter the start date of the simulation
        end_date = 31/12/2007  # Enter the end date of the simulation
      area paddock -> /simulations/nashua/nash-2000/paddock
        outputfile -> /simulations/nashua/nash-2000/paddock/outputfile: filename=nash-2007.out; title=nash-2007
          events My Variables Events -> /simulations/nashua/nash-2000/paddock/outputfile/My Variables Events
          variables My Variables -> /simulations/nashua/nash-2000/paddock/outputfile/My Variables
    simulation nash-2008 -> /simulations/nashua/nash-2000
      clock
        start_date = 01/01/2008  # Enter the start date of the simulation
        end_date = 31/12/2008  # Enter the end date of the simulation
      area paddock -> /simulations/nashua/nash-2000/paddock
        outputfile -> /simulations/nashua/nash-2000/paddock/outputfile: filename=nash-2008.out; title=nash-2008
          events My Variables Events -> /simulations/nashua/nash-2000/paddock/outputfile/My Variables Events
          variables My Variables -> /simulations/nashua/nash-2000/paddock/outputfile/My Variables
    simulation nash-2009 -> /simulations/nashua/nash-2000
      clock
        start_date = 01/01/2009  # Enter the start date of the simulation
        end_date = 31/12/2009  # Enter the end date of the simulation
      area paddock -> /simulations/nashua/nash-2000/paddock
        outputfile -> /simulations/nashua/nash-2000/paddock/outputfile: filename=nash-2009.out; title=nash-2009
          events My Variables Events -> /simulations/nashua/nash-2000/paddock/outputfile/My Variables Events
          variables My Variables -> /simulations/nashua/nash-2000/paddock/outputfile/My Variables
    simulation nash-2010 -> /simulations/nashua/nash-2000
      clock
        start_date = 01/01/2010  # Enter the start date of the simulation
        end_date = 31/12/2010  # Enter the end date of the simulation
      area paddock -> /simulations/nashua/nash-2000/paddock
        outputfile -> /simulations/nashua/nash-2000/paddock/outputfile: filename=nash-2010.out; title=nash-2010
          events My Variables Events -> /simulations/nashua/nash-2000/paddock/outputfile/My Variables Events
          variables My Variables -> /simulations/nashua/nash-2000/paddock/outputfile/My Variables
    simulation nash-2011 -> /simulations/nashua/nash-2000
      clock
        start_date = 01/01/2011  # Enter the start date of the simulation
        end_date = 31/12/2011  # Enter the end date of the simulation
      area paddock -> /simulations/nashua/nash-2000/paddock
        outputfile -> /simulations/nashua/nash-2000/paddock/outputfile: filename=nash-2011.out; title=nash-2011
          events My Variables Events -> /simulations/nashua/nash-2000/paddock/outputfile/My Variables Events
          variables My Variables -> /simulations/nashua/nash-2000/paddock/outputfile/My Variables
    simulation nash-2012 -> /simulations/nashua/nash-2000
      clock
        start_date = 01/01/2012  # Enter the start date of the simulation
        end_date = 31/12/2012  # Enter the end date of the simulation
      area paddock -> /simulations/nashua/nash-2000/paddock
        outputfile -> /simulations/nashua/nash-2000/paddock/outputfile: filename=nash-2012.out; title=nash-2012
          events My Variables Events -> /simulations/nashua/nash-2000/paddock/outputfile/My Variables Events
          variables My Variables -> /simulations/nashua/nash-2000/paddock/outputfile/My Variables
    simulation nash-2013 -> /simulations/nashua/nash-2000
      clock
        start_date = 01/01/2013  # Enter the start date of the simulation
        end_date = 31/12/2013  # Enter the end date of the simulation
      area paddock -> /simulations/nashua/nash-2000/paddock
        outputfile -> /simulations/nashua/nash-2000/paddock/outputfile: filename=nash-2013.out; title=nash-2013
          events My Variables Events -> /simulations/nashua/nash-2000/paddock/outputfile/My Variables Events
          variables My Variables -> /simulations/nashua/nash-2000/paddock/outputfile/My Variables
    simulation nash-2014 -> /simulations/nashua/nash-2000
      clock
        start_date = 01/01/2014  # Enter the start date of the simulation
        end_date = 31/12/2014  # Enter the end date of the simulation
      area paddock -> /simulations/nashua/nash-2000/paddock
        outputfile -> /simulations/nashua/nash-2000/paddock/outputfile: filename=nash-2014.out; title=nash-2014
          events My Variables Events -> /simulations/nashua/nash-2000/paddock/outputfile/My Variables Events
          variables My Variables -> /simulations/nashua/nash-2000/paddock/outputfile/My Variables
    simulation nash-2015 -> /simulations/nashua/nash-2000
      clock
        start_date = 01/01/2015  # Enter the start date of the simulation
        end_date = 31/12/2015  # Enter the end date of the simulation
      area paddock -> /simulations/nashua/nash-2000/paddock
        outputfile -> /simulations/nashua/nash-2000/paddock/outputfile: filename=nash-2015.out; title=nash-2015
          events My Variables Events -> /simulations/nashua/nash-2000/paddock/outputfile/My Variables Events
          variables My Variables -> /simulations/nashua/nash-2000/paddock/outputfile/My Variables
    simulation nash-2016 -> /simulations/nashua/nash-2000
      clock
        start_date = 01/01/2016  # Enter the start date of the simulation
        end_date = 31/12/2016  # Enter the end date of the simulation
      area paddock -> /simulations/nashua/nash-2000/paddock
        outputfile -> /simulations/nashua/nash-2000/paddock/outputfile: filename=nash-2016.out; title=nash-2016
          events My Variables Events -> /simulations/nashua/nash-2000/paddock/outputfile/My Variables Events
          variables My Variables -> /simulations/nashua/nash-2000/paddock/outputfile/My Variables
  folder sutherland
    simulation suth-2000
      metfile met
        filename=C:\Users\vnichols\Box Sync\Gina_APSIM_modeling\yield-gap-gina\wea-data\suth_2000-2016.met
      clock
        start_date = 01/01/2000  # Enter the start date of the simulation
        end_date = 31/12/2000  # Enter the end date of the simulation
      summaryfile
      area paddock
        surfaceom SurfaceOrganicMatter
          PoolName = soybean  # Organic Matter pool name
          type = soybean  # Organic Matter type
          mass = 2000  # Initial surface residue (kg/ha)
          cnr = 45  # C:N ratio of initial residue
          standing_fraction = 0.0  # Fraction of residue standing
        fertiliser
        maize
          ini: filename=XML_corn7.9.xml
        manager WT_script
          on start_of_day:
          script: same as in Locations.CornSoy_plot1.paddock.WT_script
        folder Manager folder
          manager N Deposition: same as Locations.CornSoy_plot1.paddock.Manager folder.N Deposition
          manager Tillage21: same as Locations.CornSoy_plot1.paddock.Manager folder.Tillage21
          manager Harvest maize: same as Locations.CornSoy_plot1.paddock.Manager folder.Harvest maize
        outputfile: filename=suth-2000.out; title=suth-2000
          events My Variables Events: event=daily
          variables My Variables
            variables: dd/mm/yyyy as Date, year, yield, biomass, watertable, no3(), surfaceom_wt, lai, Rain, dlt_n_min(), final_soil_temp
        manager2 InitialiseWaterTable: same as ames.ames-2000.paddock.InitialiseWaterTable
        Soil SoilsutherlandSoy: SoilType=Primghar; NearestTown=Sutherland; State=Iowa; Country=US; Latitude=42.92; Longitude=-95.53; YearOfSampling=0; DataSource=web soil survey; Comments=hydrological parameters and BD from Saxton and Rawls, 2006
          Water
            Thickness  BD    AirDry  LL15   DUL    SAT    KS
            25         1.25  0.086   0.171  0.28   0.487  216
            25         1.25  0.086   0.171  0.28   0.487  216
            50         1.25  0.086   0.171  0.28   0.44   216
            100        1.25  0.121   0.151  0.28   0.415  216
            100        1.25  0.141   0.141  0.27   0.421  133
            150        1.35  0.13    0.13   0.25   0.42   133
            150        1.35  0.13    0.13   0.24   0.413  119
            150        1.36  0.14    0.14   0.27   0.438  119
            150        1.36  0.14    0.14   0.263  0.438  119
            150        1.36  0.14    0.14   0.26   0.438  103
            150        1.4   0.14    0.14   0.24   0.438  103
            300        1.4   0.11    0.11   0.24   0.438  89
            300        1.4   0.11    0.11   0.24   0.327  58.997
            300        1.4   0.11    0.11   0.24   0.315  36.017
            300        1.4   0.11    0.11   0.24   0.304  21.988
            300        1.4   0.11    0.11   0.24   0.295  13.423
            300        1.4   0.11    0.11   0.24   0.288  8.195
            300        1.4   0.11    0.11   0.24   0.281  5.003
            300        1.4   0.11    0.11   0.24   0.275  3.054
            300        1.4   0.11    0.11   0.24   0.27   1.865
            BD source: Field measured and checked for sensibility (layer 2, 3, 4)
            AirDry source: Estimated based on local knowledge (layer 1, 2, 3, 4)
            LL15 source: Estimated based on local knowledge (layer 2, 3, 4)
            DUL source: Field measured and checked for sensibility (layer 1, 2, 3, 4)
            SAT source: Calculated from measured, estimated or calculated BD (layer 1, 2, 3, 4)
            SoilCrop maize
              LL=[0.171, 0.171, 0.171, 0.151, 0.141, 0.161, 0.169, 0.197, 0.202, 0.21, 0.204, 0.204, 0.215, 0.226, 0.228, 0.228, 0.228, 0.228, 0.228, 0.228]
              KL=[0.08, 0.08, 0.08, 0.08, 0.08, 0.08, 0.08, 0.08, 0.08, 0.08, 0.08, 0.04, 0.04, 0.03, 0.02, 0.02, 0.01, 0.01, 0, 0]
              XF=[1, 1, 1, 1, 1, 1, 1, 1, 1, 1, 1, 1, 1, 0.4, 0.4, 0, 0, 0, 0, 0]
              LL source: Estimated based on local knowledge (layer 2, 3, 4)
            SoilCrop soybean
              LL=[0.171, 0.171, 0.171, 0.151, 0.141, 0.161, 0.169, 0.197, 0.202, 0.21, 0.204, 0.204, 0.215, 0.226, 0.228, 0.228, 0.228, 0.228, 0.228, 0.228]
              KL=[0.08, 0.08, 0.08, 0.08, 0.08, 0.08, 0.08, 0.08, 0.08, 0.08, 0.08, 0.04, 0.04, 0.03, 0.02, 0.02, 0.01, 0.01, 0, 0]
              XF=[1, 1, 1, 1, 1, 1, 1, 1, 1, 1, 1, 1, 1, 0.4, 0.4, 0, 0, 0, 0, 0]
              LL source: Estimated based on local knowledge (layer 1, 2, 3, 4)
          SoilOrganicMatter: RootCN=29.7; RootWt=2183; SoilCN=12; EnrACoeff=7.4; EnrBCoeff=0.2; OCUnits=Total
            Thickness  OC    FBiom  FInert
            25         2.5   0.25   0.365
            25         2.45  0.176  0.365
            50         2.46  0.111  0.365
            100        2.17  0.07   0.42
            100        1.85  0.05   0.456
            150        1.86  0.038  0.5
            150        1.11  0.031  0.718
            150        1.12  0.026  0.738
            150        0.39  0.023  0.757
            150        0.39  0.02   0.777
            150        0.39  0.018  0.797
            300        0.39  0.016  0.984
            300        0.2   0.014  0.999
            300        0.1   0.013  0.999
            300        0.1   0.012  0.999
            300        0.01  0.011  0.999
            300        0.01  0.01   0.999
            300        0.01  0.009  0.999
            300        0.01  0.009  0.999
            300        0.01  0.008  0.999
            OC source: Estimated based on local knowledge (layer 1, 2, 3, 4)
          Analysis: PHUnits=Water; BoronUnits=HotWater
            Thickness  PH    CEC    ParticleSizeSand  ParticleSizeSilt  ParticleSizeClay
            25         5.48  34.46  5                 65                30
            25         5.48  34.46  5                 65                30
            50         5.48  34.46  5                 65                30
            100        5.68  33.61  5                 65                30
            100        5.98  29.32  5                 65                30
            150        5.98  29.32  5                 65                30
            150        6.75  24.61  5                 65                30
            150        6.75  24.61  5                 65                30
            150        7.97  27.5   5                 65                30
            150        7.97  27.5   5                 65                30
            150        7.97  27.5   5                 65                30
            300        7.97  27.5   5                 65                30
            300        7.97  27.5   5                 65                30
            300        7.97  27.5   5                 65                30
            300        7.97  27.5   5                 65                30
            300        7.97  27.5   5                 65                30
            300        7.97  27.5   5                 65                30
            300        7.97  27.5   5                 65                30
            300        7.97  27.5   5                 65                30
            300        7.97  27.5   5                 65                30
            999999     -     -      -                 -                 -
            PH source: Estimated based on local knowledge (layer 1, 2, 3, 4)
            ParticleSizeSand, ParticleSizeSilt source: Measured (layer 1)
            ParticleSizeClay source: Measured (layer 1, 2)
          Sample Initial nitrogen: NO3Units=kgha; NH4Units=kgha; SWUnits=Volumetric; OCUnits=Total; PHUnits=Water
            Thickness  NO3   NH4  SW
            25         0.8   2.5  0.28
            25         0.8   2    0.28
            50         1.6   2    0.28
            100        3.8   2    0.28
            100        4.3   3    0.27
            150        6.9   2    0.25
            150        7.5   2    0.24
            150        8.4   3    0.27
            150        8     2    0.263
            150        7.6   1    0.26
            150        5.7   0.1  0.24
            300        10.1  0.1  0.438
            300        4.2   0.8  0.327
            300        3.5   0    0.315
            300        2     0    0.304
            300        1.7   0    0.295
            300        1     0.1  0.288
            300        0.8   0    0.281
            300        0.4   0    0.275
            300        0     0    0.27
          Swim: same as lewis.lewi-2000.paddock.LewisDeaft.Swim
          SoilTemperature: BoundaryLayerConductance=20
            Thickness=[25, 25, 50, 100, 100, 150, 150, 150, 150, 150, 150, 300, 300, 300, 300, 300, 300, 300, 300, 300, 999999]
            InitialSoilTemperature=[10, 10, 10, 10, 10, 10, 10, 10, 10, 10, 10, 10, 10, 10, 10, 10, 10, 10, 10, 10, -]
    simulation suth-2001 -> /simulations/sutherland/suth-2000
      clock
        start_date = 01/01/2001  # Enter the start date of the simulation
        end_date = 31/12/2001  # Enter the end date of the simulation
      area paddock -> /simulations/sutherland/suth-2000/paddock
        outputfile -> /simulations/sutherland/suth-2000/paddock/outputfile: filename=suth-2001.out; title=suth-2001
          events My Variables Events -> /simulations/sutherland/suth-2000/paddock/outputfile/My Variables Events
          variables My Variables -> /simulations/sutherland/suth-2000/paddock/outputfile/My Variables
    simulation suth-2002 -> /simulations/sutherland/suth-2000
      clock
        start_date = 01/01/2002  # Enter the start date of the simulation
        end_date = 31/12/2002  # Enter the end date of the simulation
      area paddock -> /simulations/sutherland/suth-2000/paddock
        outputfile -> /simulations/sutherland/suth-2000/paddock/outputfile: filename=suth-2002.out; title=suth-2002
          events My Variables Events -> /simulations/sutherland/suth-2000/paddock/outputfile/My Variables Events
          variables My Variables -> /simulations/sutherland/suth-2000/paddock/outputfile/My Variables
    simulation suth-2003 -> /simulations/sutherland/suth-2000
      clock
        start_date = 01/01/2003  # Enter the start date of the simulation
        end_date = 31/12/2003  # Enter the end date of the simulation
      area paddock -> /simulations/sutherland/suth-2000/paddock
        outputfile -> /simulations/sutherland/suth-2000/paddock/outputfile: filename=suth-2003.out; title=suth-2003
          events My Variables Events -> /simulations/sutherland/suth-2000/paddock/outputfile/My Variables Events
          variables My Variables -> /simulations/sutherland/suth-2000/paddock/outputfile/My Variables
    simulation suth-2004 -> /simulations/sutherland/suth-2000
      clock
        start_date = 01/01/2004  # Enter the start date of the simulation
        end_date = 31/12/2004  # Enter the end date of the simulation
      area paddock -> /simulations/sutherland/suth-2000/paddock
        outputfile -> /simulations/sutherland/suth-2000/paddock/outputfile: filename=suth-2004.out; title=suth-2004
          events My Variables Events -> /simulations/sutherland/suth-2000/paddock/outputfile/My Variables Events
          variables My Variables -> /simulations/sutherland/suth-2000/paddock/outputfile/My Variables
    simulation suth-2005 -> /simulations/sutherland/suth-2000
      clock
        start_date = 01/01/2005  # Enter the start date of the simulation
        end_date = 31/12/2005  # Enter the end date of the simulation
      area paddock -> /simulations/sutherland/suth-2000/paddock
        outputfile -> /simulations/sutherland/suth-2000/paddock/outputfile: filename=suth-2005.out; title=suth-2005
          events My Variables Events -> /simulations/sutherland/suth-2000/paddock/outputfile/My Variables Events
          variables My Variables -> /simulations/sutherland/suth-2000/paddock/outputfile/My Variables
    simulation suth-2006 -> /simulations/sutherland/suth-2000
      clock
        start_date = 01/01/2006  # Enter the start date of the simulation
        end_date = 31/12/2006  # Enter the end date of the simulation
      area paddock -> /simulations/sutherland/suth-2000/paddock
        outputfile -> /simulations/sutherland/suth-2000/paddock/outputfile: filename=suth-2006.out; title=suth-2006
          events My Variables Events -> /simulations/sutherland/suth-2000/paddock/outputfile/My Variables Events
          variables My Variables -> /simulations/sutherland/suth-2000/paddock/outputfile/My Variables
    simulation suth-2007 -> /simulations/sutherland/suth-2000
      clock
        start_date = 01/01/2007  # Enter the start date of the simulation
        end_date = 31/12/2007  # Enter the end date of the simulation
      area paddock -> /simulations/sutherland/suth-2000/paddock
        outputfile -> /simulations/sutherland/suth-2000/paddock/outputfile: filename=suth-2007.out; title=suth-2007
          events My Variables Events -> /simulations/sutherland/suth-2000/paddock/outputfile/My Variables Events
          variables My Variables -> /simulations/sutherland/suth-2000/paddock/outputfile/My Variables
    simulation suth-2008 -> /simulations/sutherland/suth-2000
      clock
        start_date = 01/01/2008  # Enter the start date of the simulation
        end_date = 31/12/2008  # Enter the end date of the simulation
      area paddock -> /simulations/sutherland/suth-2000/paddock
        outputfile -> /simulations/sutherland/suth-2000/paddock/outputfile: filename=suth-2008.out; title=suth-2008
          events My Variables Events -> /simulations/sutherland/suth-2000/paddock/outputfile/My Variables Events
          variables My Variables -> /simulations/sutherland/suth-2000/paddock/outputfile/My Variables
    simulation suth-2009 -> /simulations/sutherland/suth-2000
      clock
        start_date = 01/01/2009  # Enter the start date of the simulation
        end_date = 31/12/2009  # Enter the end date of the simulation
      area paddock -> /simulations/sutherland/suth-2000/paddock
        outputfile -> /simulations/sutherland/suth-2000/paddock/outputfile: filename=suth-2009.out; title=suth-2009
          events My Variables Events -> /simulations/sutherland/suth-2000/paddock/outputfile/My Variables Events
          variables My Variables -> /simulations/sutherland/suth-2000/paddock/outputfile/My Variables
    simulation suth-2010 -> /simulations/sutherland/suth-2000
      clock
        start_date = 01/01/2010  # Enter the start date of the simulation
        end_date = 31/12/2010  # Enter the end date of the simulation
      area paddock -> /simulations/sutherland/suth-2000/paddock
        outputfile -> /simulations/sutherland/suth-2000/paddock/outputfile: filename=suth-2010.out; title=suth-2010
          events My Variables Events -> /simulations/sutherland/suth-2000/paddock/outputfile/My Variables Events
          variables My Variables -> /simulations/sutherland/suth-2000/paddock/outputfile/My Variables
    simulation suth-2011 -> /simulations/sutherland/suth-2000
      clock
        start_date = 01/01/2011  # Enter the start date of the simulation
        end_date = 31/12/2011  # Enter the end date of the simulation
      area paddock -> /simulations/sutherland/suth-2000/paddock
        outputfile -> /simulations/sutherland/suth-2000/paddock/outputfile: filename=suth-2011.out; title=suth-2011
          events My Variables Events -> /simulations/sutherland/suth-2000/paddock/outputfile/My Variables Events
          variables My Variables -> /simulations/sutherland/suth-2000/paddock/outputfile/My Variables
    simulation suth-2012 -> /simulations/sutherland/suth-2000
      clock
        start_date = 01/01/2012  # Enter the start date of the simulation
        end_date = 31/12/2012  # Enter the end date of the simulation
      area paddock -> /simulations/sutherland/suth-2000/paddock
        outputfile -> /simulations/sutherland/suth-2000/paddock/outputfile: filename=suth-2012.out; title=suth-2012
          events My Variables Events -> /simulations/sutherland/suth-2000/paddock/outputfile/My Variables Events
          variables My Variables -> /simulations/sutherland/suth-2000/paddock/outputfile/My Variables
    simulation suth-2013 -> /simulations/sutherland/suth-2000
      clock
        start_date = 01/01/2013  # Enter the start date of the simulation
        end_date = 31/12/2013  # Enter the end date of the simulation
      area paddock -> /simulations/sutherland/suth-2000/paddock
        outputfile -> /simulations/sutherland/suth-2000/paddock/outputfile: filename=suth-2013.out; title=suth-2013
          events My Variables Events -> /simulations/sutherland/suth-2000/paddock/outputfile/My Variables Events
          variables My Variables -> /simulations/sutherland/suth-2000/paddock/outputfile/My Variables
    simulation suth-2014 -> /simulations/sutherland/suth-2000
      clock
        start_date = 01/01/2014  # Enter the start date of the simulation
        end_date = 31/12/2014  # Enter the end date of the simulation
      area paddock -> /simulations/sutherland/suth-2000/paddock
        outputfile -> /simulations/sutherland/suth-2000/paddock/outputfile: filename=suth-2014.out; title=suth-2014
          events My Variables Events -> /simulations/sutherland/suth-2000/paddock/outputfile/My Variables Events
          variables My Variables -> /simulations/sutherland/suth-2000/paddock/outputfile/My Variables
    simulation suth-2015 -> /simulations/sutherland/suth-2000
      clock
        start_date = 01/01/2015  # Enter the start date of the simulation
        end_date = 31/12/2015  # Enter the end date of the simulation
      area paddock -> /simulations/sutherland/suth-2000/paddock
        outputfile -> /simulations/sutherland/suth-2000/paddock/outputfile: filename=suth-2015.out; title=suth-2015
          events My Variables Events -> /simulations/sutherland/suth-2000/paddock/outputfile/My Variables Events
          variables My Variables -> /simulations/sutherland/suth-2000/paddock/outputfile/My Variables
    simulation suth-2016 -> /simulations/sutherland/suth-2000
      clock
        start_date = 01/01/2016  # Enter the start date of the simulation
        end_date = 31/12/2016  # Enter the end date of the simulation
      area paddock -> /simulations/sutherland/suth-2000/paddock
        outputfile -> /simulations/sutherland/suth-2000/paddock/outputfile: filename=suth-2016.out; title=suth-2016
          events My Variables Events -> /simulations/sutherland/suth-2000/paddock/outputfile/My Variables Events
          variables My Variables -> /simulations/sutherland/suth-2000/paddock/outputfile/My Variables
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