folder simulations: version=37; creator=Apsim 7.9-r4044
  folder Corn-Soy_oat43
    simulation Corn_0_oat43 -> /simulations/Corn-Soy_oat43/Corn_135_oat43
      area paddock -> /simulations/Corn-Soy_oat43/Corn_135_oat43/paddock
        outputfile: filename=Corn_0_oat43.out; title=Corn_0_oat43
          variables My Variables
            variables: dd/mm/yyyy as Date, year, CropYield, CropBiomamas, RootDepth, FlowerDate, MaturityDate, LAI_maximum, TotalNupt, AvgWTInseason, RainSeason, NfertilizerAmount, GrossMiner, NetMiner, SowingNO3_60cm
          events My Variables Events -> /simulations/Corn-Soy_oat43/Corn_135_oat43/paddock/outputfile/My Variables Events
        Soil CentralIA: YearOfSampling=0; DataSource=CSIRO Sustainable Ecosystems, Toowoomba
          Comments=Soil naming structure: \State\Region\Classification-Local Name (Site/district and locator number); oc and ph estimated
          Water -> /simulations/Corn-Soy_oat43/Corn_135_oat43/paddock/CentralIA/Water
          SoilOrganicMatter -> /simulations/Corn-Soy_oat43/Corn_135_oat43/paddock/CentralIA/SoilOrganicMatter
          Analysis -> /simulations/Corn-Soy_oat43/Corn_135_oat43/paddock/CentralIA/Analysis
          Sample InitialNitrogen -> /simulations/Corn-Soy_oat43/Corn_135_oat43/paddock/CentralIA/InitialNitrogen
          Swim -> /simulations/Corn-Soy_oat43/Corn_135_oat43/paddock/CentralIA/Swim
          SoilTemperature -> /simulations/Corn-Soy_oat43/Corn_135_oat43/paddock/CentralIA/SoilTemperature
        tracker
          variable:
            maximum of corn_buac on end_of_day from SpecialReport5 to SpecialReport6 as CropYield
            maximum of biomass on end_of_day from SpecialReport5 to SpecialReport6 as CropBiomamas
            maximum of root_depth on end_of_day from SpecialReport5 to SpecialReport6 as RootDepth
            maximum of flowering_date on end_of_day from SpecialReport5 to SpecialReport6 as FlowerDate
            maximum of maturity_date on end_of_day from SpecialReport5 to SpecialReport6 as MaturityDate
            maximum of lai on end_of_day from sowing to harvesting as LAI_maximum
            maximum of biomass_n on end_of_day from SpecialReport5 to SpecialReport6 as TotalNupt
            average of watertable on end_of_day from sowing to harvesting as AvgWTInseason
            sum of rain on end_of_day from sowing to harvesting as RainSeason
            maximum of fertiliser on end_of_day from SpecialReport5 to SpecialReport6 as NfertilizerAmount
            sum of dlt_n_min() on end_of_day from sowing to harvesting as GrossMiner
            sum of dlt_n_min_tot() on end_of_day from sowing to harvesting as NetMiner
            value of NO3_60cm on sowing as SowingNO3_60cm
        manager Fertilise on fixed date
          # When should fertiliser be applied
          fert_date = 15-apr  # Enter fertiliser date (dd-mmm)
          fert_criteria = 1000  # Don't add fertiliser if N in top 2 layers exceeds (kg/ha)
          # Fertiliser application details
          fertmodule = fertiliser  # Module used to apply the fertiliser
          fert_amount = 0  # Amount of fertiliser to apply (kg/ha)
          fert_type = UAN_N  # Fertiliser type
          on start_of_day:
```
         if (today = date('[fert_date]') then
            N_topsoil = no3(1) + nh4(1) + no3(2) + nh4(2)
            if (N_topsoil < [fert_criteria]) then
               [fertmodule] apply amount = [fert_amount] (kg/ha), depth = 50 (mm), type = [fert_type] ()
            endif
         endif
```
    simulation Corn_67_oat43 -> /simulations/Corn-Soy_oat43/Corn_135_oat43
      area paddock -> /simulations/Corn-Soy_oat43/Corn_135_oat43/paddock
        outputfile: filename=Corn_67_oat43.out; title=Corn_67_oat43
          variables My Variables
            variables: dd/mm/yyyy as Date, year, CropYield, CropBiomamas, RootDepth, FlowerDate, MaturityDate, LAI_maximum, TotalNupt, AvgWTInseason, RainSeason, NfertilizerAmount, GrossMiner, NetMiner, SowingNO3_60cm
          events My Variables Events -> /simulations/Corn-Soy_oat43/Corn_135_oat43/paddock/outputfile/My Variables Events
        Soil CentralIA: same as Corn-Soy_oat43.Corn_0_oat43.paddock.CentralIA
        tracker: same as Corn-Soy_oat43.Corn_0_oat43.paddock.tracker
        manager Fertilise on fixed date
          # When should fertiliser be applied
          fert_date = 15-apr  # Enter fertiliser date (dd-mmm)
          fert_criteria = 1000  # Don't add fertiliser if N in top 2 layers exceeds (kg/ha)
          # Fertiliser application details
          fertmodule = fertiliser  # Module used to apply the fertiliser
          fert_amount = 67.4  # Amount of fertiliser to apply (kg/ha)
          fert_type = UAN_N  # Fertiliser type
          on start_of_day:
          script: same as in Corn-Soy_oat43.Corn_0_oat43.paddock.Fertilise on fixed date
    simulation Corn_135_oat43
      metfile met: filename=data-wea\ames_2000-2016.met
      clock
        start_date = 01/01/2000  # Enter the start date of the simulation
        end_date = 31/12/2016  # Enter the end date of the simulation
      summaryfile
      area paddock
        surfaceom SurfaceOrganicMatter
          PoolName = maize  # Organic Matter pool name
          type = maize  # Organic Matter type
          mass = 10000  # Initial surface residue (kg/ha)
          cnr = 70  # C:N ratio of initial residue
          standing_fraction = 0.0  # Fraction of residue standing
        fertiliser
        maize
          ini: filename=XML_corn7.9_gn
        folder Manager folder
          manager Harvest maize
            # Harvesting criteria
            crop = maize  # Enter name of crop to harvest when ripe
            on end_of_day:
```
           if ('[crop]' = 'cotton') then
              if ([crop].ozcot_status > 0) then
                  [crop] harvest
              endif
           elseif ([crop].StageName = 'harvest_ripe' or [crop].plant_status = 'dead') then
              [crop]  harvest
              [crop]  end_crop
           endif
```
        outputfile: filename=Corn_135_oat43.out; title=Corn_135_oat43
          variables My Variables
            variables: dd/mm/yyyy as Date, year, CropYield, CropBiomamas, RootDepth, FlowerDate, MaturityDate, LAI_maximum, TotalNupt, AvgWTInseason, RainSeason, NfertilizerAmount, GrossMiner, NetMiner, SowingNO3_60cm
          events My Variables Events: event=end_year
        Soil CentralIA: YearOfSampling=0; DataSource=CSIRO Sustainable Ecosystems, Toowoomba
          Comments=Soil naming structure: \State\Region\Classification-Local Name (Site/district and locator number); oc and ph estimated
          Water
            Thickness  BD       AirDry     LL15      DUL       SAT       KS
            50         1.22623  0.0848289  0.169658  0.295603  0.468513  384.223
            50         1.22623  0.0848289  0.169658  0.295603  0.468513  384.223
            50         1.22623  0.0848289  0.169658  0.295603  0.468513  384.223
            150        1.30028  0.138232   0.17279   0.297022  0.444032  279.539
            150        1.3606   0.171225   0.171225  0.294741  0.428634  244.378
            150        1.39182  0.165046   0.165046  0.289254  0.41806   227.455
            200        1.4099   0.155791   0.155791  0.283314  0.416747  243.151
            200        1.46546  0.142778   0.142778  0.273095  0.394423  212.871
            200        1.53668  0.125398   0.125398  0.260566  0.378215  208.244
            300        1.56854  0.120051   0.120051  0.257154  0.368957  202.494
            300        1.56782  0.119401   0.119401  0.256525  0.309838  11.8815
            300        1.57258  0.118829   0.118829  0.25562   0.301637  7.32133
            300        1.57311  0.118766   0.118766  0.25552   0.295707  4.68846
            300        1.57311  0.118766   0.118766  0.25552   0.290584  2.99353
            300        1.57311  0.118766   0.118766  0.25552   0.286114  1.91131
            300        1.57311  0.118766   0.118766  0.25552   0.282214  1.22036
            300        1.57311  0.118766   0.118766  0.25552   0.278811  0.77918
            300        1.57311  0.118766   0.118766  0.25552   0.275842  0.497506
            SoilCrop maize
              LL=[0.17, 0.17, 0.17, 0.173, 0.171, 0.165, 0.156, 0.143, 0.125, 0.12, 0.119, 0.119, 0.119, 0.119, 0.119, 0.119, 0.119, 0.119]
              KL=[0.08, 0.08, 0.08, 0.08, 0.08, 0.08, 0.08, 0.08, 0.05, 0.04, 0.04, 0.03, 0.02, 0.02, 0.01, 0.01, 0, 0]
              XF=[0.9, 0.9, 0.9, 0.9, 0.9, 0.9, 0.9, 0.9, 1, 1, 1, 0.3, 0.3, 0, 0, 0, 0, 0]
            SoilCrop soybean
              LL=[0.169658, 0.169658, 0.169658, 0.17279, 0.210198, 0.21703, 0.222583, 0.224374, 0.221552, 0.229288, 0.238796, 0.24362, 0.24352, 0.24352, 0.24352, 0.24352, 0.24352, 0.24352]
              KL=[0.08, 0.08, 0.08, 0.08, 0.08, 0.08, 0.08, 0.08, 0.0486665, 0.0422964, 0.0350564, 0.0282843, 0.022015, 0.0162927, 0.0111758, 0.0067466, 0.00313554, 0.000603434]
              XF=[0.90006, 0.90006, 0.90006, 0.899898, 0.901268, 0.904677, 0.92835, 0.941544, 0.970535, 0.975485, 0.975485, 0.3, 0.3, 0, 0, 0, 0, 0]
            SoilCrop wheat
              LL=[0.169658, 0.169658, 0.169658, 0.17279, 0.171225, 0.165046, 0.155791, 0.142778, 0.125398, 0.120051, 0.119401, 0.118829, 0.118766, 0.118766, 0.118766, 0.118766, 0.118766, 0.118766]
              KL=[0.08, 0.08, 0.08, 0.08, 0.08, 0.08, 0.08, 0.08, 0.0486665, 0.0422964, 0.0350564, 0.0282843, 0.022015, 0.0162927, 0.0111758, 0.0067466, 0.00313554, 0.000603434]
              XF=[0.90006, 0.90006, 0.90006, 0.899898, 0.901268, 0.904677, 0.92835, 0.941544, 0.970535, 0.975485, 0.975485, 0.3, 0.3, 0, 0, 0, 0, 0]
          SoilOrganicMatter: RootCN=29; RootWt=1736; SoilCN=11; EnrACoeff=7.4; EnrBCoeff=0.2; OCUnits=Total
            Thickness  OC        FBiom       FInert
            50         2.84066   0.115718    0.376743
            50         2.84066   0.106986    0.376743
            50         2.84066   0.078973    0.376743
            150        2.2981    0.0534537   0.487985
            150        1.79066   0.0380776   0.576355
            150        1.56776   0.0304538   0.678041
            200        1.12743   0.0251583   0.731231
            200        0.850991  0.0212917   0.834379
            200        0.544586  0.0186355   0.911966
            300        0.506189  0.0162662   0.967249
            300        0.504044  0.014237    0.991858
            300        0.504044  0.0127422   0.99196
            300        0.504044  0.0115872   0.993472
            300        0.504044  0.0106631   0.994675
            300        0.504044  0.00990398  0.995529
            300        0.504044  0.0092672   0.996384
            300        0.504044  0.00872398  0.997239
            300        0.504044  0.0082541   0.998093
          Analysis: PHUnits=Water; BoronUnits=HotWater
            Thickness  PH       ParticleSizeSand  ParticleSizeSilt  ParticleSizeClay
            50         6.46178  36.4599           38.2777           25.2624
            50         6.46178  36.4599           38.2777           25.2624
            50         6.46178  36.4599           38.2777           25.2624
            150        6.55969  36.7055           37.7242           25.5703
            150        6.65187  37.8126           36.703            25.4844
            150        6.80356  38.6979           36.5243           24.7778
            200        6.87529  39.9761           36.3414           23.6826
            200        7.18385  42.7373           35.7082           21.5545
            200        7.34233  47.1472           34.1757           18.6771
            300        7.35219  49.0463           33.3399           17.6138
            300        7.35539  49.1851           33.2938           17.5211
            300        7.3411   49.2804           33.2938           17.4258
            300        7.33951  49.291            33.2938           17.4152
            300        7.33951  49.291            33.2938           17.4152
            300        7.33951  49.291            33.2938           17.4152
            300        7.33951  49.291            33.2938           17.4152
            300        7.33951  49.291            33.2938           17.4152
            300        7.33951  49.291            33.2938           17.4152
          Sample InitialNitrogen: NO3Units=kgha; NH4Units=kgha; SWUnits=Volumetric; OCUnits=Total; PHUnits=Water
            Thickness  NO3       NH4       SW
            50         2.84066   2.84066   0.295603
            50         2.84066   2.84066   0.295603
            50         2.84066   2.84066   0.295603
            150        2.2981    2.2981    0.297022
            150        1.79066   1.79066   0.294741
            150        1.56776   1.56776   0.289254
            200        1.12743   1.12743   0.283314
            200        0.850991  0.850991  0.273095
            200        0.544586  0.544586  0.260566
            300        0.506189  0.506189  0.257154
            300        0.504044  0.504044  0.256525
            300        0.504044  0.504044  0.25562
            300        0.504044  0.504044  0.25552
            300        0.504044  0.504044  0.25552
            300        0.504044  0.504044  0.25552
            300        0.504044  0.504044  0.25552
            300        0.504044  0.504044  0.25552
            300        0.504044  0.504044  0.25552
          Swim: Salb=0.120747; CN2Bare=73.5832; CNRed=20; CNCov=0.8; KDul=0.25; PSIDul=-250; VC=true; DTmin=0; DTmax=1440; MaxWaterIncrement=10; SpaceWeightingFactor=0; SoluteSpaceWeightingFactor=0; Diagnostics=false
            SwimSoluteParameters: Dis=15; Disp=1; A=1; DTHP=1
              zero: DTHC, WaterTableCl, WaterTableNO3, WaterTableNH4, WaterTableUrea, WaterTableTracer, WaterTableMineralisationInhibitor, WaterTableUreaseInhibitor, WaterTableNitrificationInhibitor, WaterTableDenitrificationInhibitor
              Thickness  NO3Exco  NO3FIP  NH4Exco  NH4FIP  UreaExco  UreaFIP  ClExco  ClFIP
              1000       0        1       100      1       0         1        0       1
              1000       0        1       100      1       0         1        0       1
              1000       0        1       100      1       0         1        0       1
            SwimSubsurfaceDrain: DrainDepth=1070; DrainSpacing=29000; DrainRadius=100; Klat=225; ImpermDepth=3900
          SoilTemperature: BoundaryLayerConductance=20
            Thickness=[50, 50, 50, 150, 150, 150, 200, 200, 200, 300, 300, 300, 300, 300, 300, 300, 300, 300]
            InitialSoilTemperature=[10, 10, 10, 10, 10, 10, 10, 10, 10, 10, 10, 10, 10, 10, 10, 10, 10, 10]
        manager WT_script
          on start_of_day:
```
bbc_potential = 390 - 110 ! profile depth minus WR

corn_buac = yield * 0.0159 / 0.85

NO3_60cm = no3(1) + no3(2) + no3(3) + no3(4) + no3(5) + no3(6)
```
        manager Reset-SWIM
          # When should a reset be done
          reset_date = 01-jan  # Enter date of reset (dd-mmm)
          # Reset details
          soilmodule = CentralIA  # Name of your soil module
          surfaceommodule = SurfaceOrganicMatter  # Name of your surface organic matter module
          pmodule = Phosphorus  # Name of your phosphorus module
          resetWater = yes  # Reset soil water?
          resetNitrogen = yes  # Reset soil nitrogen?
          resetSurfaceOM = yes  # Reset surface organic matter?
          resetP = no  # Reset phosphorus?
          on start_of_day:
```
         if (today = date('[reset_date]')) then
            resetWater = '[resetWater]'
            resetNitrogen  = '[resetNitrogen]'
            resetSurfaceOM = '[resetSurfaceOM]'
            resetP = '[resetP]'
            if (resetWater = 'yes') then
                SWIM reset
            endif
            if (resetNitrogen = 'yes') then
                '[soilmodule] Nitrogen' reset
            endif
            if (resetSurfaceOM = 'yes') then
                '[surfaceommodule]' reset
            endif
            if (resetP = 'yes') then
                '[pmodule]' reset
            endif
            act_mods reseting
         endif
```
        manager2 InitialiseWaterTable_Reset
          InitDOY = 1  # Day of year to initialise the water table
          WTDepth = 99.136  # Depth to water table (cm)
```vb
Imports System
Imports ModelFramework
Imports CSGeneral
Imports System.Collections.Generic

Public Class Script
   
   <Link()> Dim MySimulation As Simulation
   <Link()> Dim Clock As Clock
   <Param()> Dim InitDOY As Integer
   <Param()> Dim WTDepth As Single
   <Input> Private dlayer As Double()           'Array of soil layer thicknesses - for calculation of mineral N in the soil
   <Input> Dim Today As DateTime                ' Equates to the value of the current simulation date - from CLOCK
   
   <Output> Dim ProfileDepth As Double
   <Output> Dim BBCPotential As Double
   <Output> Dim InitPsi() As Double
      
   <EventHandler()> Public Sub OnInit()
      ProfileDepth = 0
      BBCPotential = 0
      
   End Sub
   
   <EventHandler()> Public Sub OnPrepare()

      If (today.DayOfYear = InitDOY And WTDepth < 280) Then
         ProfileDepth = MathUtility.Sum(dlayer)
         BBCPotential = 390 - WTDepth
         ReDim InitPsi(dlayer.length - 1) 
         
         InitPsi(dlayer.length - 1) = BBCPotential 
         InitPsi(0) = -WTDepth
         InitPsi(1) = InitPsi(0) + (dlayer(0) + dlayer(1) / 2) / 10
         Dim i As Integer
         
         For i = 2 To dlayer.length - 2
            InitPsi(i) = InitPsi(i - 1) + (dlayer(i - 1) + dlayer(i)) / 2 / 10   
         Next
         
         'Dim SWIM As Component = MySimulation.LinkByName("SWIM")
         MySimulation.Set("psi", InitPsi)
         MySimulation.Set("bbc_potential", BBCPotential)
         
      End If      
      
      
   End Sub


End Class
```
        manager Sow on a fixed date
          # Sowing criteria
          date = 5-may  # Enter sowing date (dd-mmm)
          # Sowing parameters
          crop = maize  # Enter name of crop to sow
          density = 7  # Enter sowing density (plants/m2)
          depth = 50  # Enter sowing depth (mm)
          cultivar = psims_110RMlowRUE  # Enter cultivar
          class = plant  # Enter crop growth class
          row_spacing = 760  # Enter row spacing (mm)
          on start_of_day:
```
        if (today = date('[date]') then
              [crop] sow plants =[density], sowing_depth = [depth], cultivar = [cultivar], row_spacing = [row_spacing], crop_class = [class]
         endif
```
        manager Tillage
          # When should tillage be done
          tillage_date = 24-apr  # Enter tillage date (dd-mmm)
          # Tillage application details
          surfaceommodule = SurfaceOrganicMatter  # Module used to apply the tillage
          tillage_type = user_defined
          tillage_depth = 50  # User_defined depth of seedbed preparation (mm)
          tillage_f_incorp = 0.1  # User_defined fraction of surface residues to incorporate (0-1)
          on start_of_day:
```
         if (today = date('[tillage_date]') then
            if ('[tillage_type]' = 'user_defined') then
                '[surfaceommodule]' tillage type = [tillage_type], f_incorp = [tillage_f_incorp] (), tillage_depth = [tillage_depth]
            else
                '[surfaceommodule]' tillage type = [tillage_type]
            endif
            ready_to_till_pre_sow = 0
            till_day_pre_sow = 0
         endif
```
        manager2 SpecialReporter_Annual
          date = 1-jan  # Date for the special report
          date2 = 31-dec  # date for second one
```csharp
using System;
using ModelFramework;
using CSGeneral;

public class Script 
{      
   [Link] Paddock MyPaddock; // Can be used to dynamically get access to simulation structure and variables
   [Input] DateTime Today;   // Equates to the value of the current simulation date - value comes from CLOCK
   [Param] string date;         // The value for this will come from the Properties page.
   [Param] string date2;
   
   [Event] public event NullTypeDelegate SpecialReport5;
   [Event] public event NullTypeDelegate SpecialReport6;

   
   // The following event handler will be called once at the beginning of the simulation
   [EventHandler] public void OnInitialised()
   {
      
   }
      
   // The following event handler will be called each day at the beginning of the day
   [EventHandler] public void OnPrepare()
   {
      if (DateUtility.DatesEqual(date, Today))
         SpecialReport5.Invoke();
      
      if (DateUtility.DatesEqual(date2, Today))
         SpecialReport6.Invoke();
   }
   
}
```
        tracker: same as Corn-Soy_oat43.Corn_0_oat43.paddock.tracker
        manager Fertilise on fixed date
          # When should fertiliser be applied
          fert_date = 15-apr  # Enter fertiliser date (dd-mmm)
          fert_criteria = 1000  # Don't add fertiliser if N in top 2 layers exceeds (kg/ha)
          # Fertiliser application details
          fertmodule = fertiliser  # Module used to apply the fertiliser
          fert_amount = 135  # Amount of fertiliser to apply (kg/ha)
          fert_type = UAN_N  # Fertiliser type
          on start_of_day:
          script: same as in Corn-Soy_oat43.Corn_0_oat43.paddock.Fertilise on fixed date
    simulation Corn_202_oat43 -> /simulations/Corn-Soy_oat43/Corn_135_oat43
      area paddock -> /simulations/Corn-Soy_oat43/Corn_135_oat43/paddock
        outputfile: filename=Corn_202_oat43.out; title=Corn_202_oat43
          variables My Variables
            variables: dd/mm/yyyy as Date, year, CropYield, CropBiomamas, RootDepth, FlowerDate, MaturityDate, LAI_maximum, TotalNupt, AvgWTInseason, RainSeason, NfertilizerAmount, GrossMiner, NetMiner, SowingNO3_60cm
          events My Variables Events -> /simulations/Corn-Soy_oat43/Corn_135_oat43/paddock/outputfile/My Variables Events
        Soil CentralIA: same as Corn-Soy_oat43.Corn_0_oat43.paddock.CentralIA
        tracker: same as Corn-Soy_oat43.Corn_0_oat43.paddock.tracker
        manager Fertilise on fixed date
          # When should fertiliser be applied
          fert_date = 15-apr  # Enter fertiliser date (dd-mmm)
          fert_criteria = 1000  # Don't add fertiliser if N in top 2 layers exceeds (kg/ha)
          # Fertiliser application details
          fertmodule = fertiliser  # Module used to apply the fertiliser
          fert_amount = 202  # Amount of fertiliser to apply (kg/ha)
          fert_type = UAN_N  # Fertiliser type
          on start_of_day:
          script: same as in Corn-Soy_oat43.Corn_0_oat43.paddock.Fertilise on fixed date
    simulation Corn_270_oat43 -> /simulations/Corn-Soy_oat43/Corn_135_oat43
      area paddock -> /simulations/Corn-Soy_oat43/Corn_135_oat43/paddock
        outputfile: filename=Corn_270_oat43.out; title=Corn_270_oat43
          variables My Variables
            variables: dd/mm/yyyy as Date, year, CropYield, CropBiomamas, RootDepth, FlowerDate, MaturityDate, LAI_maximum, TotalNupt, AvgWTInseason, RainSeason, NfertilizerAmount, GrossMiner, NetMiner, SowingNO3_60cm
          events My Variables Events -> /simulations/Corn-Soy_oat43/Corn_135_oat43/paddock/outputfile/My Variables Events
        Soil CentralIA: same as Corn-Soy_oat43.Corn_0_oat43.paddock.CentralIA
        tracker: same as Corn-Soy_oat43.Corn_0_oat43.paddock.tracker
        manager Fertilise on fixed date
          # When should fertiliser be applied
          fert_date = 15-apr  # Enter fertiliser date (dd-mmm)
          fert_criteria = 1000  # Don't add fertiliser if N in top 2 layers exceeds (kg/ha)
          # Fertiliser application details
          fertmodule = fertiliser  # Module used to apply the fertiliser
          fert_amount = 270  # Amount of fertiliser to apply (kg/ha)
          fert_type = UAN_N  # Fertiliser type
          on start_of_day:
          script: same as in Corn-Soy_oat43.Corn_0_oat43.paddock.Fertilise on fixed date
  folder Corn-Soy_oat44
    simulation Corn_0_oat44 -> /simulations/Corn-Soy_oat44/Corn_135_oat44
      area paddock -> /simulations/Corn-Soy_oat44/Corn_135_oat44/paddock
        outputfile: filename=Corn_0_oat44.out; title=Corn_0_oat44
          variables My Variables
            variables: dd/mm/yyyy as Date, year, CropYield, CropBiomamas, RootDepth, FlowerDate, MaturityDate, LAI_maximum, TotalNupt, AvgWTInseason, RainSeason, NfertilizerAmount, GrossMiner, NetMiner, SowingNO3_60cm
          events My Variables Events -> /simulations/Corn-Soy_oat44/Corn_135_oat44/paddock/outputfile/My Variables Events
        Soil CentralIA: YearOfSampling=0; DataSource=CSIRO Sustainable Ecosystems, Toowoomba
          Comments=Soil naming structure: \State\Region\Classification-Local Name (Site/district and locator number); oc and ph estimated
          Water -> /simulations/Corn-Soy_oat44/Corn_135_oat44/paddock/CentralIA/Water
          SoilOrganicMatter -> /simulations/Corn-Soy_oat44/Corn_135_oat44/paddock/CentralIA/SoilOrganicMatter
          Analysis -> /simulations/Corn-Soy_oat44/Corn_135_oat44/paddock/CentralIA/Analysis
          Sample InitialNitrogen -> /simulations/Corn-Soy_oat44/Corn_135_oat44/paddock/CentralIA/InitialNitrogen
          Swim -> /simulations/Corn-Soy_oat44/Corn_135_oat44/paddock/CentralIA/Swim
          SoilTemperature -> /simulations/Corn-Soy_oat44/Corn_135_oat44/paddock/CentralIA/SoilTemperature
        tracker: same as Corn-Soy_oat43.Corn_0_oat43.paddock.tracker
        manager Fertilise on fixed date: same as Corn-Soy_oat43.Corn_0_oat43.paddock.Fertilise on fixed date
    simulation Corn_67_oat44 -> /simulations/Corn-Soy_oat44/Corn_135_oat44
      area paddock -> /simulations/Corn-Soy_oat44/Corn_135_oat44/paddock
        outputfile: filename=Corn_67_oat44.out; title=Corn_67_oat44
          variables My Variables
            variables: dd/mm/yyyy as Date, year, CropYield, CropBiomamas, RootDepth, FlowerDate, MaturityDate, LAI_maximum, TotalNupt, AvgWTInseason, RainSeason, NfertilizerAmount, GrossMiner, NetMiner, SowingNO3_60cm
          events My Variables Events -> /simulations/Corn-Soy_oat44/Corn_135_oat44/paddock/outputfile/My Variables Events
        Soil CentralIA: same as Corn-Soy_oat44.Corn_0_oat44.paddock.CentralIA
        tracker: same as Corn-Soy_oat43.Corn_0_oat43.paddock.tracker
        manager Fertilise on fixed date: same as Corn-Soy_oat43.Corn_67_oat43.paddock.Fertilise on fixed date
    simulation Corn_135_oat44
      metfile met: filename=data-wea\ames_2000-2016.met
      clock
        start_date = 01/01/2000  # Enter the start date of the simulation
        end_date = 31/12/2016  # Enter the end date of the simulation
      summaryfile
      area paddock
        surfaceom SurfaceOrganicMatter
          PoolName = maize  # Organic Matter pool name
          type = maize  # Organic Matter type
          mass = 10000  # Initial surface residue (kg/ha)
          cnr = 70  # C:N ratio of initial residue
          standing_fraction = 0.0  # Fraction of residue standing
        fertiliser
        maize
          ini: filename=XML_corn7.9_gn
        folder Manager folder: same as Corn-Soy_oat43.Corn_135_oat43.paddock.Manager folder
        outputfile: filename=Corn_135_oat44.out; title=Corn_135_oat44
          variables My Variables
            variables: dd/mm/yyyy as Date, year, CropYield, CropBiomamas, RootDepth, FlowerDate, MaturityDate, LAI_maximum, TotalNupt, AvgWTInseason, RainSeason, NfertilizerAmount, GrossMiner, NetMiner, SowingNO3_60cm
          events My Variables Events: event=end_year
        Soil CentralIA: same as Corn-Soy_oat43.Corn_135_oat43.paddock.CentralIA
        manager WT_script
          on start_of_day:
          script: same as in Corn-Soy_oat43.Corn_135_oat43.paddock.WT_script
        manager Reset-SWIM: same as Corn-Soy_oat43.Corn_135_oat43.paddock.Reset-SWIM
        manager2 InitialiseWaterTable_Reset: same as Corn-Soy_oat43.Corn_135_oat43.paddock.InitialiseWaterTable_Reset
        manager Sow on a fixed date
          # Sowing criteria
          date = 5-may  # Enter sowing date (dd-mmm)
          # Sowing parameters
          crop = maize  # Enter name of crop to sow
          density = 7  # Enter sowing density (plants/m2)
          depth = 50  # Enter sowing depth (mm)
          cultivar = psims_110RMlowRFV1  # Enter cultivar
          class = plant  # Enter crop growth class
          row_spacing = 760  # Enter row spacing (mm)
          on start_of_day:
          script: same as in Corn-Soy_oat43.Corn_135_oat43.paddock.Sow on a fixed date
        manager Tillage: same as Corn-Soy_oat43.Corn_135_oat43.paddock.Tillage
        manager2 SpecialReporter_Annual: same as Corn-Soy_oat43.Corn_135_oat43.paddock.SpecialReporter_Annual
        tracker: same as Corn-Soy_oat43.Corn_0_oat43.paddock.tracker
        manager Fertilise on fixed date: same as Corn-Soy_oat43.Corn_135_oat43.paddock.Fertilise on fixed date
    simulation Corn_202_oat44 -> /simulations/Corn-Soy_oat44/Corn_135_oat44
      area paddock -> /simulations/Corn-Soy_oat44/Corn_135_oat44/paddock
        outputfile: filename=Corn_202_oat44.out; title=Corn_202_oat44
          variables My Variables
            variables: dd/mm/yyyy as Date, year, CropYield, CropBiomamas, RootDepth, FlowerDate, MaturityDate, LAI_maximum, TotalNupt, AvgWTInseason, RainSeason, NfertilizerAmount, GrossMiner, NetMiner, SowingNO3_60cm
          events My Variables Events -> /simulations/Corn-Soy_oat44/Corn_135_oat44/paddock/outputfile/My Variables Events
        Soil CentralIA: same as Corn-Soy_oat44.Corn_0_oat44.paddock.CentralIA
        tracker: same as Corn-Soy_oat43.Corn_0_oat43.paddock.tracker
        manager Fertilise on fixed date: same as Corn-Soy_oat43.Corn_202_oat43.paddock.Fertilise on fixed date
    simulation Corn_270_oat44 -> /simulations/Corn-Soy_oat44/Corn_135_oat44
      area paddock -> /simulations/Corn-Soy_oat44/Corn_135_oat44/paddock
        outputfile: filename=Corn_270_oat44.out; title=Corn_270_oat44
          variables My Variables
            variables: dd/mm/yyyy as Date, year, CropYield, CropBiomamas, RootDepth, FlowerDate, MaturityDate, LAI_maximum, TotalNupt, AvgWTInseason, RainSeason, NfertilizerAmount, GrossMiner, NetMiner, SowingNO3_60cm
          events My Variables Events -> /simulations/Corn-Soy_oat44/Corn_135_oat44/paddock/outputfile/My Variables Events
        Soil CentralIA: same as Corn-Soy_oat44.Corn_0_oat44.paddock.CentralIA
        tracker: same as Corn-Soy_oat43.Corn_0_oat43.paddock.tracker
        manager Fertilise on fixed date: same as Corn-Soy_oat43.Corn_270_oat43.paddock.Fertilise on fixed date
  folder Corn-Soy_oat45
    simulation Corn_0_oat45 -> /simulations/Corn-Soy_oat45/Corn_135_oat45
      area paddock -> /simulations/Corn-Soy_oat45/Corn_135_oat45/paddock
        outputfile: filename=Corn_0_oat45.out; title=Corn_0_oat45
          variables My Variables
            variables: dd/mm/yyyy as Date, year, CropYield, CropBiomamas, RootDepth, FlowerDate, MaturityDate, LAI_maximum, TotalNupt, AvgWTInseason, RainSeason, NfertilizerAmount, GrossMiner, NetMiner, SowingNO3_60cm
          events My Variables Events -> /simulations/Corn-Soy_oat45/Corn_135_oat45/paddock/outputfile/My Variables Events
        Soil CentralIA: YearOfSampling=0; DataSource=CSIRO Sustainable Ecosystems, Toowoomba
          Comments=Soil naming structure: \State\Region\Classification-Local Name (Site/district and locator number); oc and ph estimated
          Water -> /simulations/Corn-Soy_oat45/Corn_135_oat45/paddock/CentralIA/Water
          SoilOrganicMatter -> /simulations/Corn-Soy_oat45/Corn_135_oat45/paddock/CentralIA/SoilOrganicMatter
          Analysis -> /simulations/Corn-Soy_oat45/Corn_135_oat45/paddock/CentralIA/Analysis
          Sample InitialNitrogen -> /simulations/Corn-Soy_oat45/Corn_135_oat45/paddock/CentralIA/InitialNitrogen
          Swim -> /simulations/Corn-Soy_oat45/Corn_135_oat45/paddock/CentralIA/Swim
          SoilTemperature -> /simulations/Corn-Soy_oat45/Corn_135_oat45/paddock/CentralIA/SoilTemperature
        tracker: same as Corn-Soy_oat43.Corn_0_oat43.paddock.tracker
        manager Fertilise on fixed date: same as Corn-Soy_oat43.Corn_0_oat43.paddock.Fertilise on fixed date
    simulation Corn_67_oat45 -> /simulations/Corn-Soy_oat45/Corn_135_oat45
      area paddock -> /simulations/Corn-Soy_oat45/Corn_135_oat45/paddock
        outputfile: filename=Corn_67_oat45.out; title=Corn_67_oat45
          variables My Variables
            variables: dd/mm/yyyy as Date, year, CropYield, CropBiomamas, RootDepth, FlowerDate, MaturityDate, LAI_maximum, TotalNupt, AvgWTInseason, RainSeason, NfertilizerAmount, GrossMiner, NetMiner, SowingNO3_60cm
          events My Variables Events -> /simulations/Corn-Soy_oat45/Corn_135_oat45/paddock/outputfile/My Variables Events
        Soil CentralIA: same as Corn-Soy_oat45.Corn_0_oat45.paddock.CentralIA
        tracker: same as Corn-Soy_oat43.Corn_0_oat43.paddock.tracker
        manager Fertilise on fixed date: same as Corn-Soy_oat43.Corn_67_oat43.paddock.Fertilise on fixed date
    simulation Corn_135_oat45
      metfile met: filename=data-wea\ames_2000-2016.met
      clock
        start_date = 01/01/2000  # Enter the start date of the simulation
        end_date = 31/12/2016  # Enter the end date of the simulation
      summaryfile
      area paddock
        surfaceom SurfaceOrganicMatter
          PoolName = maize  # Organic Matter pool name
          type = maize  # Organic Matter type
          mass = 10000  # Initial surface residue (kg/ha)
          cnr = 70  # C:N ratio of initial residue
          standing_fraction = 0.0  # Fraction of residue standing
        fertiliser
        maize
          ini: filename=XML_corn7.9_gn
        folder Manager folder: same as Corn-Soy_oat43.Corn_135_oat43.paddock.Manager folder
        outputfile: filename=Corn_135_oat45.out; title=Corn_135_oat45
          variables My Variables
            variables: dd/mm/yyyy as Date, year, CropYield, CropBiomamas, RootDepth, FlowerDate, MaturityDate, LAI_maximum, TotalNupt, AvgWTInseason, RainSeason, NfertilizerAmount, GrossMiner, NetMiner, SowingNO3_60cm
          events My Variables Events: event=end_year
        Soil CentralIA: YearOfSampling=0; DataSource=CSIRO Sustainable Ecosystems, Toowoomba
          Comments=Soil naming structure: \State\Region\Classification-Local Name (Site/district and locator number); oc and ph estimated
          Water
            Thickness  BD       AirDry     LL15      DUL       SAT       KS
            50         1.22623  0.0848289  0.169658  0.295603  0.468513  384.223
            50         1.22623  0.0848289  0.169658  0.295603  0.468513  384.223
            50         1.22623  0.0848289  0.169658  0.295603  0.468513  384.223
            150        1.30028  0.138232   0.17279   0.297022  0.444032  279.539
            150        1.3606   0.171225   0.171225  0.294741  0.428634  244.378
            150        1.39182  0.165046   0.165046  0.289254  0.41806   227.455
            200        1.4099   0.155791   0.155791  0.283314  0.416747  243.151
            200        1.46546  0.142778   0.142778  0.273095  0.394423  212.871
            200        1.53668  0.125398   0.125398  0.260566  0.378215  208.244
            300        1.56854  0.120051   0.120051  0.257154  0.368957  202.494
            300        1.56782  0.119401   0.119401  0.256525  0.309838  11.8815
            300        1.57258  0.118829   0.118829  0.25562   0.301637  7.32133
            300        1.57311  0.118766   0.118766  0.25552   0.295707  4.68846
            300        1.57311  0.118766   0.118766  0.25552   0.290584  2.99353
            300        1.57311  0.118766   0.118766  0.25552   0.286114  1.91131
            300        1.57311  0.118766   0.118766  0.25552   0.282214  1.22036
            300        1.57311  0.118766   0.118766  0.25552   0.278811  0.77918
            300        1.57311  0.118766   0.118766  0.25552   0.275842  0.497506
            SoilCrop maize
              LL=[0.17, 0.17, 0.17, 0.173, 0.171, 0.165, 0.156, 0.143, 0.125, 0.12, 0.119, 0.119, 0.119, 0.119, 0.119, 0.119, 0.119, 0.119]
              KL=[0.05, 0.05, 0.05, 0.05, 0.05, 0.05, 0.05, 0.05, 0.05, 0.04, 0.04, 0.03, 0.02, 0.02, 0.01, 0.01, 0, 0]
              XF=[0.9, 0.9, 0.9, 0.9, 0.9, 0.9, 0.9, 0.9, 1, 1, 1, 0.3, 0.3, 0, 0, 0, 0, 0]
            SoilCrop soybean: same as Corn-Soy_oat43.Corn_135_oat43.paddock.CentralIA.Water.soybean
            SoilCrop wheat: same as Corn-Soy_oat43.Corn_135_oat43.paddock.CentralIA.Water.wheat
          SoilOrganicMatter: same as Corn-Soy_oat43.Corn_135_oat43.paddock.CentralIA.SoilOrganicMatter
          Analysis: same as Corn-Soy_oat43.Corn_135_oat43.paddock.CentralIA.Analysis
          Sample InitialNitrogen: same as Corn-Soy_oat43.Corn_135_oat43.paddock.CentralIA.InitialNitrogen
          Swim: same as Corn-Soy_oat43.Corn_135_oat43.paddock.CentralIA.Swim
          SoilTemperature: BoundaryLayerConductance=20
            Thickness=[50, 50, 50, 150, 150, 150, 200, 200, 200, 300, 300, 300, 300, 300, 300, 300, 300, 300]
            InitialSoilTemperature=[10, 10, 10, 10, 10, 10, 10, 10, 10, 10, 10, 10, 10, 10, 10, 10, 10, 10]
        manager WT_script
          on start_of_day:
          script: same as in Corn-Soy_oat43.Corn_135_oat43.paddock.WT_script
        manager Reset-SWIM: same as Corn-Soy_oat43.Corn_135_oat43.paddock.Reset-SWIM
        manager2 InitialiseWaterTable_Reset: same as Corn-Soy_oat43.Corn_135_oat43.paddock.InitialiseWaterTable_Reset
        manager Sow on a fixed date
          # Sowing criteria
          date = 5-may  # Enter sowing date (dd-mmm)
          # Sowing parameters
          crop = maize  # Enter name of crop to sow
          density = 7  # Enter sowing density (plants/m2)
          depth = 50  # Enter sowing depth (mm)
          cultivar = psims_110RM  # Enter cultivar
          class = plant  # Enter crop growth class
          row_spacing = 760  # Enter row spacing (mm)
          on start_of_day:
          script: same as in Corn-Soy_oat43.Corn_135_oat43.paddock.Sow on a fixed date
        manager Tillage: same as Corn-Soy_oat43.Corn_135_oat43.paddock.Tillage
        manager2 SpecialReporter_Annual: same as Corn-Soy_oat43.Corn_135_oat43.paddock.SpecialReporter_Annual
        tracker: same as Corn-Soy_oat43.Corn_0_oat43.paddock.tracker
        manager Fertilise on fixed date: same as Corn-Soy_oat43.Corn_135_oat43.paddock.Fertilise on fixed date
    simulation Corn_202_oat45 -> /simulations/Corn-Soy_oat45/Corn_135_oat45
      area paddock -> /simulations/Corn-Soy_oat45/Corn_135_oat45/paddock
        outputfile: filename=Corn_202_oat45.out; title=Corn_202_oat45
          variables My Variables
            variables: dd/mm/yyyy as Date, year, CropYield, CropBiomamas, RootDepth, FlowerDate, MaturityDate, LAI_maximum, TotalNupt, AvgWTInseason, RainSeason, NfertilizerAmount, GrossMiner, NetMiner, SowingNO3_60cm
          events My Variables Events -> /simulations/Corn-Soy_oat45/Corn_135_oat45/paddock/outputfile/My Variables Events
        Soil CentralIA: same as Corn-Soy_oat45.Corn_0_oat45.paddock.CentralIA
        tracker: same as Corn-Soy_oat43.Corn_0_oat43.paddock.tracker
        manager Fertilise on fixed date: same as Corn-Soy_oat43.Corn_202_oat43.paddock.Fertilise on fixed date
    simulation Corn_270_oat45 -> /simulations/Corn-Soy_oat45/Corn_135_oat45
      area paddock -> /simulations/Corn-Soy_oat45/Corn_135_oat45/paddock
        outputfile: filename=Corn_270_oat45.out; title=Corn_270_oat45
          variables My Variables
            variables: dd/mm/yyyy as Date, year, CropYield, CropBiomamas, RootDepth, FlowerDate, MaturityDate, LAI_maximum, TotalNupt, AvgWTInseason, RainSeason, NfertilizerAmount, GrossMiner, NetMiner, SowingNO3_60cm
          events My Variables Events -> /simulations/Corn-Soy_oat45/Corn_135_oat45/paddock/outputfile/My Variables Events
        Soil CentralIA: same as Corn-Soy_oat45.Corn_0_oat45.paddock.CentralIA
        tracker: same as Corn-Soy_oat43.Corn_0_oat43.paddock.tracker
        manager Fertilise on fixed date: same as Corn-Soy_oat43.Corn_270_oat43.paddock.Fertilise on fixed date
  folder Corn-Soy_oat46
    simulation Corn_0_oat46 -> /simulations/Corn-Soy_oat46/Corn_135_oat46
      area paddock -> /simulations/Corn-Soy_oat46/Corn_135_oat46/paddock
        outputfile: filename=Corn_0_oat46.out; title=Corn_0_oat46
          variables My Variables
            variables: dd/mm/yyyy as Date, year, CropYield, CropBiomamas, RootDepth, FlowerDate, MaturityDate, LAI_maximum, TotalNupt, AvgWTInseason, RainSeason, NfertilizerAmount, GrossMiner, NetMiner, SowingNO3_60cm
          events My Variables Events -> /simulations/Corn-Soy_oat46/Corn_135_oat46/paddock/outputfile/My Variables Events
        Soil CentralIA: YearOfSampling=0; DataSource=CSIRO Sustainable Ecosystems, Toowoomba
          Comments=Soil naming structure: \State\Region\Classification-Local Name (Site/district and locator number); oc and ph estimated
          Water -> /simulations/Corn-Soy_oat46/Corn_135_oat46/paddock/CentralIA/Water
          SoilOrganicMatter -> /simulations/Corn-Soy_oat46/Corn_135_oat46/paddock/CentralIA/SoilOrganicMatter
          Analysis -> /simulations/Corn-Soy_oat46/Corn_135_oat46/paddock/CentralIA/Analysis
          Sample InitialNitrogen -> /simulations/Corn-Soy_oat46/Corn_135_oat46/paddock/CentralIA/InitialNitrogen
          Swim -> /simulations/Corn-Soy_oat46/Corn_135_oat46/paddock/CentralIA/Swim
          SoilTemperature -> /simulations/Corn-Soy_oat46/Corn_135_oat46/paddock/CentralIA/SoilTemperature
        tracker: same as Corn-Soy_oat43.Corn_0_oat43.paddock.tracker
        manager Fertilise on fixed date: same as Corn-Soy_oat43.Corn_0_oat43.paddock.Fertilise on fixed date
    simulation Corn_67_oat46 -> /simulations/Corn-Soy_oat46/Corn_135_oat46
      area paddock -> /simulations/Corn-Soy_oat46/Corn_135_oat46/paddock
        outputfile: filename=Corn_67_oat46.out; title=Corn_67_oat46
          variables My Variables
            variables: dd/mm/yyyy as Date, year, CropYield, CropBiomamas, RootDepth, FlowerDate, MaturityDate, LAI_maximum, TotalNupt, AvgWTInseason, RainSeason, NfertilizerAmount, GrossMiner, NetMiner, SowingNO3_60cm
          events My Variables Events -> /simulations/Corn-Soy_oat46/Corn_135_oat46/paddock/outputfile/My Variables Events
        Soil CentralIA: same as Corn-Soy_oat46.Corn_0_oat46.paddock.CentralIA
        tracker: same as Corn-Soy_oat43.Corn_0_oat43.paddock.tracker
        manager Fertilise on fixed date: same as Corn-Soy_oat43.Corn_67_oat43.paddock.Fertilise on fixed date
    simulation Corn_135_oat46
      metfile met: filename=data-wea\ames_2000-2016.met
      clock
        start_date = 01/01/2000  # Enter the start date of the simulation
        end_date = 31/12/2016  # Enter the end date of the simulation
      summaryfile
      area paddock
        surfaceom SurfaceOrganicMatter
          PoolName = maize  # Organic Matter pool name
          type = maize  # Organic Matter type
          mass = 10000  # Initial surface residue (kg/ha)
          cnr = 70  # C:N ratio of initial residue
          standing_fraction = 0.0  # Fraction of residue standing
        fertiliser
        maize
          ini: filename=XML_corn7.9_gn
        folder Manager folder: same as Corn-Soy_oat43.Corn_135_oat43.paddock.Manager folder
        outputfile: filename=Corn_135_oat46.out; title=Corn_135_oat46
          variables My Variables
            variables: dd/mm/yyyy as Date, year, CropYield, CropBiomamas, RootDepth, FlowerDate, MaturityDate, LAI_maximum, TotalNupt, AvgWTInseason, RainSeason, NfertilizerAmount, GrossMiner, NetMiner, SowingNO3_60cm
          events My Variables Events: event=end_year
        Soil CentralIA: same as Corn-Soy_oat43.Corn_135_oat43.paddock.CentralIA
        manager WT_script
          on start_of_day:
          script: same as in Corn-Soy_oat43.Corn_135_oat43.paddock.WT_script
        manager Reset-SWIM: same as Corn-Soy_oat43.Corn_135_oat43.paddock.Reset-SWIM
        manager2 InitialiseWaterTable_Reset: same as Corn-Soy_oat43.Corn_135_oat43.paddock.InitialiseWaterTable_Reset
        manager Sow on a fixed date
          # Sowing criteria
          date = 5-may  # Enter sowing date (dd-mmm)
          # Sowing parameters
          crop = maize  # Enter name of crop to sow
          density = 7  # Enter sowing density (plants/m2)
          depth = 50  # Enter sowing depth (mm)
          cultivar = psims_110RMlowKN2  # Enter cultivar
          class = plant  # Enter crop growth class
          row_spacing = 760  # Enter row spacing (mm)
          on start_of_day:
          script: same as in Corn-Soy_oat43.Corn_135_oat43.paddock.Sow on a fixed date
        manager Tillage: same as Corn-Soy_oat43.Corn_135_oat43.paddock.Tillage
        manager2 SpecialReporter_Annual: same as Corn-Soy_oat43.Corn_135_oat43.paddock.SpecialReporter_Annual
        tracker: same as Corn-Soy_oat43.Corn_0_oat43.paddock.tracker
        manager Fertilise on fixed date: same as Corn-Soy_oat43.Corn_135_oat43.paddock.Fertilise on fixed date
    simulation Corn_202_oat46 -> /simulations/Corn-Soy_oat46/Corn_135_oat46
      area paddock -> /simulations/Corn-Soy_oat46/Corn_135_oat46/paddock
        outputfile: filename=Corn_202_oat46.out; title=Corn_202_oat46
          variables My Variables
            variables: dd/mm/yyyy as Date, year, CropYield, CropBiomamas, RootDepth, FlowerDate, MaturityDate, LAI_maximum, TotalNupt, AvgWTInseason, RainSeason, NfertilizerAmount, GrossMiner, NetMiner, SowingNO3_60cm
          events My Variables Events -> /simulations/Corn-Soy_oat46/Corn_135_oat46/paddock/outputfile/My Variables Events
        Soil CentralIA: same as Corn-Soy_oat46.Corn_0_oat46.paddock.CentralIA
        tracker: same as Corn-Soy_oat43.Corn_0_oat43.paddock.tracker
        manager Fertilise on fixed date: same as Corn-Soy_oat43.Corn_202_oat43.paddock.Fertilise on fixed date
    simulation Corn_270_oat46 -> /simulations/Corn-Soy_oat46/Corn_135_oat46
      area paddock -> /simulations/Corn-Soy_oat46/Corn_135_oat46/paddock
        outputfile: filename=Corn_270_oat46.out; title=Corn_270_oat46
          variables My Variables
            variables: dd/mm/yyyy as Date, year, CropYield, CropBiomamas, RootDepth, FlowerDate, MaturityDate, LAI_maximum, TotalNupt, AvgWTInseason, RainSeason, NfertilizerAmount, GrossMiner, NetMiner, SowingNO3_60cm
          events My Variables Events -> /simulations/Corn-Soy_oat46/Corn_135_oat46/paddock/outputfile/My Variables Events
        Soil CentralIA: same as Corn-Soy_oat46.Corn_0_oat46.paddock.CentralIA
        tracker: same as Corn-Soy_oat43.Corn_0_oat43.paddock.tracker
        manager Fertilise on fixed date: same as Corn-Soy_oat43.Corn_270_oat43.paddock.Fertilise on fixed date
  folder Corn-Soy_oat47
    simulation Corn_0_oat47 -> /simulations/Corn-Soy_oat47/Corn_135_oat47
      area paddock -> /simulations/Corn-Soy_oat47/Corn_135_oat47/paddock
        outputfile: filename=Corn_0_oat47.out; title=Corn_0_oat47
          variables My Variables
            variables: dd/mm/yyyy as Date, year, CropYield, CropBiomamas, RootDepth, FlowerDate, MaturityDate, LAI_maximum, TotalNupt, AvgWTInseason, RainSeason, NfertilizerAmount, GrossMiner, NetMiner, SowingNO3_60cm
          events My Variables Events -> /simulations/Corn-Soy_oat47/Corn_135_oat47/paddock/outputfile/My Variables Events
        Soil CentralIA: YearOfSampling=0; DataSource=CSIRO Sustainable Ecosystems, Toowoomba
          Comments=Soil naming structure: \State\Region\Classification-Local Name (Site/district and locator number); oc and ph estimated
          Water -> /simulations/Corn-Soy_oat47/Corn_135_oat47/paddock/CentralIA/Water
          SoilOrganicMatter -> /simulations/Corn-Soy_oat47/Corn_135_oat47/paddock/CentralIA/SoilOrganicMatter
          Analysis -> /simulations/Corn-Soy_oat47/Corn_135_oat47/paddock/CentralIA/Analysis
          Sample InitialNitrogen -> /simulations/Corn-Soy_oat47/Corn_135_oat47/paddock/CentralIA/InitialNitrogen
          Swim -> /simulations/Corn-Soy_oat47/Corn_135_oat47/paddock/CentralIA/Swim
          SoilTemperature -> /simulations/Corn-Soy_oat47/Corn_135_oat47/paddock/CentralIA/SoilTemperature
        tracker: same as Corn-Soy_oat43.Corn_0_oat43.paddock.tracker
        manager Fertilise on fixed date: same as Corn-Soy_oat43.Corn_0_oat43.paddock.Fertilise on fixed date
    simulation Corn_67_oat47 -> /simulations/Corn-Soy_oat47/Corn_135_oat47
      area paddock -> /simulations/Corn-Soy_oat47/Corn_135_oat47/paddock
        outputfile: filename=Corn_67_oat47.out; title=Corn_67_oat47
          variables My Variables
            variables: dd/mm/yyyy as Date, year, CropYield, CropBiomamas, RootDepth, FlowerDate, MaturityDate, LAI_maximum, TotalNupt, AvgWTInseason, RainSeason, NfertilizerAmount, GrossMiner, NetMiner, SowingNO3_60cm
          events My Variables Events -> /simulations/Corn-Soy_oat47/Corn_135_oat47/paddock/outputfile/My Variables Events
        Soil CentralIA: same as Corn-Soy_oat47.Corn_0_oat47.paddock.CentralIA
        tracker: same as Corn-Soy_oat43.Corn_0_oat43.paddock.tracker
        manager Fertilise on fixed date: same as Corn-Soy_oat43.Corn_67_oat43.paddock.Fertilise on fixed date
    simulation Corn_135_oat47
      metfile met: filename=data-wea\ames_2000-2016.met
      clock
        start_date = 01/01/2000  # Enter the start date of the simulation
        end_date = 31/12/2016  # Enter the end date of the simulation
      summaryfile
      area paddock
        surfaceom SurfaceOrganicMatter
          PoolName = soybean  # Organic Matter pool name
          type = soybean  # Organic Matter type
          mass = 2000  # Initial surface residue (kg/ha)
          cnr = 45  # C:N ratio of initial residue
          standing_fraction = 0.0  # Fraction of residue standing
        fertiliser
        maize
          ini: filename=XML_corn7.9_gn
        folder Manager folder: same as Corn-Soy_oat43.Corn_135_oat43.paddock.Manager folder
        outputfile: filename=Corn_135_oat47.out; title=Corn_135_oat47
          variables My Variables
            variables: dd/mm/yyyy as Date, year, CropYield, CropBiomamas, RootDepth, FlowerDate, MaturityDate, LAI_maximum, TotalNupt, AvgWTInseason, RainSeason, NfertilizerAmount, GrossMiner, NetMiner, SowingNO3_60cm
          events My Variables Events: event=end_year
        Soil CentralIA: same as Corn-Soy_oat43.Corn_135_oat43.paddock.CentralIA
        manager WT_script
          on start_of_day:
          script: same as in Corn-Soy_oat43.Corn_135_oat43.paddock.WT_script
        manager Reset-SWIM: same as Corn-Soy_oat43.Corn_135_oat43.paddock.Reset-SWIM
        manager2 InitialiseWaterTable_Reset: same as Corn-Soy_oat43.Corn_135_oat43.paddock.InitialiseWaterTable_Reset
        manager Sow on a fixed date
          # Sowing criteria
          date = 5-may  # Enter sowing date (dd-mmm)
          # Sowing parameters
          crop = maize  # Enter name of crop to sow
          density = 7  # Enter sowing density (plants/m2)
          depth = 50  # Enter sowing depth (mm)
          cultivar = psims_110RMoat34  # Enter cultivar
          class = plant  # Enter crop growth class
          row_spacing = 760  # Enter row spacing (mm)
          on start_of_day:
          script: same as in Corn-Soy_oat43.Corn_135_oat43.paddock.Sow on a fixed date
        manager Tillage: same as Corn-Soy_oat43.Corn_135_oat43.paddock.Tillage
        manager2 SpecialReporter_Annual: same as Corn-Soy_oat43.Corn_135_oat43.paddock.SpecialReporter_Annual
        tracker: same as Corn-Soy_oat43.Corn_0_oat43.paddock.tracker
        manager Fertilise on fixed date: same as Corn-Soy_oat43.Corn_135_oat43.paddock.Fertilise on fixed date
    simulation Corn_202_oat47 -> /simulations/Corn-Soy_oat47/Corn_135_oat47
      area paddock -> /simulations/Corn-Soy_oat47/Corn_135_oat47/paddock
        outputfile: filename=Corn_202_oat47.out; title=Corn_202_oat47
          variables My Variables
            variables: dd/mm/yyyy as Date, year, CropYield, CropBiomamas, RootDepth, FlowerDate, MaturityDate, LAI_maximum, TotalNupt, AvgWTInseason, RainSeason, NfertilizerAmount, GrossMiner, NetMiner, SowingNO3_60cm
          events My Variables Events -> /simulations/Corn-Soy_oat47/Corn_135_oat47/paddock/outputfile/My Variables Events
        Soil CentralIA: same as Corn-Soy_oat47.Corn_0_oat47.paddock.CentralIA
        tracker: same as Corn-Soy_oat43.Corn_0_oat43.paddock.tracker
        manager Fertilise on fixed date: same as Corn-Soy_oat43.Corn_202_oat43.paddock.Fertilise on fixed date
    simulation Corn_270_oat47 -> /simulations/Corn-Soy_oat47/Corn_135_oat47
      area paddock -> /simulations/Corn-Soy_oat47/Corn_135_oat47/paddock
        outputfile: filename=Corn_270_oat47.out; title=Corn_270_oat47
          variables My Variables
            variables: dd/mm/yyyy as Date, year, CropYield, CropBiomamas, RootDepth, FlowerDate, MaturityDate, LAI_maximum, TotalNupt, AvgWTInseason, RainSeason, NfertilizerAmount, GrossMiner, NetMiner, SowingNO3_60cm
          events My Variables Events -> /simulations/Corn-Soy_oat47/Corn_135_oat47/paddock/outputfile/My Variables Events
        Soil CentralIA: same as Corn-Soy_oat47.Corn_0_oat47.paddock.CentralIA
        tracker: same as Corn-Soy_oat43.Corn_0_oat43.paddock.tracker
        manager Fertilise on fixed date: same as Corn-Soy_oat43.Corn_270_oat43.paddock.Fertilise on fixed date
  folder Corn-Soy_oat48
    simulation Corn_0_oat48 -> /simulations/Corn-Soy_oat48/Corn_135_oat48
      area paddock -> /simulations/Corn-Soy_oat48/Corn_135_oat48/paddock
        outputfile: filename=Corn_0_oat48.out; title=Corn_0_oat48
          variables My Variables
            variables: dd/mm/yyyy as Date, year, CropYield, CropBiomamas, RootDepth, FlowerDate, MaturityDate, LAI_maximum, TotalNupt, AvgWTInseason, RainSeason, NfertilizerAmount, GrossMiner, NetMiner, SowingNO3_60cm
          events My Variables Events -> /simulations/Corn-Soy_oat48/Corn_135_oat48/paddock/outputfile/My Variables Events
        Soil CentralIA: YearOfSampling=0; DataSource=CSIRO Sustainable Ecosystems, Toowoomba
          Comments=Soil naming structure: \State\Region\Classification-Local Name (Site/district and locator number); oc and ph estimated
          Water -> /simulations/Corn-Soy_oat48/Corn_135_oat48/paddock/CentralIA/Water
          SoilOrganicMatter -> /simulations/Corn-Soy_oat48/Corn_135_oat48/paddock/CentralIA/SoilOrganicMatter
          Analysis -> /simulations/Corn-Soy_oat48/Corn_135_oat48/paddock/CentralIA/Analysis
          Sample InitialNitrogen -> /simulations/Corn-Soy_oat48/Corn_135_oat48/paddock/CentralIA/InitialNitrogen
          Swim -> /simulations/Corn-Soy_oat48/Corn_135_oat48/paddock/CentralIA/Swim
          SoilTemperature -> /simulations/Corn-Soy_oat48/Corn_135_oat48/paddock/CentralIA/SoilTemperature
        tracker: same as Corn-Soy_oat43.Corn_0_oat43.paddock.tracker
        manager Fertilise on fixed date: same as Corn-Soy_oat43.Corn_0_oat43.paddock.Fertilise on fixed date
    simulation Corn_67_oat48 -> /simulations/Corn-Soy_oat48/Corn_135_oat48
      area paddock -> /simulations/Corn-Soy_oat48/Corn_135_oat48/paddock
        outputfile: filename=Corn_67_oat48.out; title=Corn_67_oat48
          variables My Variables
            variables: dd/mm/yyyy as Date, year, CropYield, CropBiomamas, RootDepth, FlowerDate, MaturityDate, LAI_maximum, TotalNupt, AvgWTInseason, RainSeason, NfertilizerAmount, GrossMiner, NetMiner, SowingNO3_60cm
          events My Variables Events -> /simulations/Corn-Soy_oat48/Corn_135_oat48/paddock/outputfile/My Variables Events
        Soil CentralIA: same as Corn-Soy_oat48.Corn_0_oat48.paddock.CentralIA
        tracker: same as Corn-Soy_oat43.Corn_0_oat43.paddock.tracker
        manager Fertilise on fixed date: same as Corn-Soy_oat43.Corn_67_oat43.paddock.Fertilise on fixed date
    simulation Corn_135_oat48
      metfile met: filename=data-wea\ames_2000-2016.met
      clock
        start_date = 01/01/2000  # Enter the start date of the simulation
        end_date = 31/12/2016  # Enter the end date of the simulation
      summaryfile
      area paddock
        surfaceom SurfaceOrganicMatter
          PoolName = soybean  # Organic Matter pool name
          type = soybean  # Organic Matter type
          mass = 2000  # Initial surface residue (kg/ha)
          cnr = 45  # C:N ratio of initial residue
          standing_fraction = 0.0  # Fraction of residue standing
        fertiliser
        maize
          ini: filename=XML_corn7.9_gn
        folder Manager folder: same as Corn-Soy_oat43.Corn_135_oat43.paddock.Manager folder
        outputfile: filename=Corn_135_oat48.out; title=Corn_135_oat48
          variables My Variables
            variables: dd/mm/yyyy as Date, year, CropYield, CropBiomamas, RootDepth, FlowerDate, MaturityDate, LAI_maximum, TotalNupt, AvgWTInseason, RainSeason, NfertilizerAmount, GrossMiner, NetMiner, SowingNO3_60cm
          events My Variables Events: event=end_year
        Soil CentralIA: same as Corn-Soy_oat45.Corn_135_oat45.paddock.CentralIA
        manager WT_script
          on start_of_day:
          script: same as in Corn-Soy_oat43.Corn_135_oat43.paddock.WT_script
        manager Reset-SWIM: same as Corn-Soy_oat43.Corn_135_oat43.paddock.Reset-SWIM
        manager2 InitialiseWaterTable_Reset: same as Corn-Soy_oat43.Corn_135_oat43.paddock.InitialiseWaterTable_Reset
        manager Sow on a fixed date: same as Corn-Soy_oat43.Corn_135_oat43.paddock.Sow on a fixed date
        manager Tillage: same as Corn-Soy_oat43.Corn_135_oat43.paddock.Tillage
        manager2 SpecialReporter_Annual: same as Corn-Soy_oat43.Corn_135_oat43.paddock.SpecialReporter_Annual
        tracker: same as Corn-Soy_oat43.Corn_0_oat43.paddock.tracker
        manager Fertilise on fixed date: same as Corn-Soy_oat43.Corn_135_oat43.paddock.Fertilise on fixed date
    simulation Corn_202_oat48 -> /simulations/Corn-Soy_oat48/Corn_135_oat48
      area paddock -> /simulations/Corn-Soy_oat48/Corn_135_oat48/paddock
        outputfile: filename=Corn_202_oat48.out; title=Corn_202_oat48
          variables My Variables
            variables: dd/mm/yyyy as Date, year, CropYield, CropBiomamas, RootDepth, FlowerDate, MaturityDate, LAI_maximum, TotalNupt, AvgWTInseason, RainSeason, NfertilizerAmount, GrossMiner, NetMiner, SowingNO3_60cm
          events My Variables Events -> /simulations/Corn-Soy_oat48/Corn_135_oat48/paddock/outputfile/My Variables Events
        Soil CentralIA: same as Corn-Soy_oat48.Corn_0_oat48.paddock.CentralIA
        tracker: same as Corn-Soy_oat43.Corn_0_oat43.paddock.tracker
        manager Fertilise on fixed date: same as Corn-Soy_oat43.Corn_202_oat43.paddock.Fertilise on fixed date
    simulation Corn_270_oat48 -> /simulations/Corn-Soy_oat48/Corn_135_oat48
      area paddock -> /simulations/Corn-Soy_oat48/Corn_135_oat48/paddock
        outputfile: filename=Corn_270_oat48.out; title=Corn_270_oat48
          variables My Variables
            variables: dd/mm/yyyy as Date, year, CropYield, CropBiomamas, RootDepth, FlowerDate, MaturityDate, LAI_maximum, TotalNupt, AvgWTInseason, RainSeason, NfertilizerAmount, GrossMiner, NetMiner, SowingNO3_60cm
          events My Variables Events -> /simulations/Corn-Soy_oat48/Corn_135_oat48/paddock/outputfile/My Variables Events
        Soil CentralIA: same as Corn-Soy_oat48.Corn_0_oat48.paddock.CentralIA
        tracker: same as Corn-Soy_oat43.Corn_0_oat43.paddock.tracker
        manager Fertilise on fixed date: same as Corn-Soy_oat43.Corn_270_oat43.paddock.Fertilise on fixed date
  folder Corn-Soy_oat49
    simulation Corn_0_oat49 -> /simulations/Corn-Soy_oat49/Corn_135_oat49
      area paddock -> /simulations/Corn-Soy_oat49/Corn_135_oat49/paddock
        outputfile: filename=Corn_0_oat49.out; title=Corn_0_oat49
          variables My Variables
            variables: dd/mm/yyyy as Date, year, CropYield, CropBiomamas, RootDepth, FlowerDate, MaturityDate, LAI_maximum, TotalNupt, AvgWTInseason, RainSeason, NfertilizerAmount, GrossMiner, NetMiner, SowingNO3_60cm
          events My Variables Events -> /simulations/Corn-Soy_oat49/Corn_135_oat49/paddock/outputfile/My Variables Events
        Soil CentralIA: YearOfSampling=0; DataSource=CSIRO Sustainable Ecosystems, Toowoomba
          Comments=Soil naming structure: \State\Region\Classification-Local Name (Site/district and locator number); oc and ph estimated
          Water -> /simulations/Corn-Soy_oat49/Corn_135_oat49/paddock/CentralIA/Water
          SoilOrganicMatter -> /simulations/Corn-Soy_oat49/Corn_135_oat49/paddock/CentralIA/SoilOrganicMatter
          Analysis -> /simulations/Corn-Soy_oat49/Corn_135_oat49/paddock/CentralIA/Analysis
          Sample InitialNitrogen -> /simulations/Corn-Soy_oat49/Corn_135_oat49/paddock/CentralIA/InitialNitrogen
          Swim -> /simulations/Corn-Soy_oat49/Corn_135_oat49/paddock/CentralIA/Swim
          SoilTemperature -> /simulations/Corn-Soy_oat49/Corn_135_oat49/paddock/CentralIA/SoilTemperature
        tracker: same as Corn-Soy_oat43.Corn_0_oat43.paddock.tracker
        manager Fertilise on fixed date: same as Corn-Soy_oat43.Corn_0_oat43.paddock.Fertilise on fixed date
    simulation Corn_67_oat49 -> /simulations/Corn-Soy_oat49/Corn_135_oat49
      area paddock -> /simulations/Corn-Soy_oat49/Corn_135_oat49/paddock
        outputfile: filename=Corn_67_oat49.out; title=Corn_67_oat49
          variables My Variables
            variables: dd/mm/yyyy as Date, year, CropYield, CropBiomamas, RootDepth, FlowerDate, MaturityDate, LAI_maximum, TotalNupt, AvgWTInseason, RainSeason, NfertilizerAmount, GrossMiner, NetMiner, SowingNO3_60cm
          events My Variables Events -> /simulations/Corn-Soy_oat49/Corn_135_oat49/paddock/outputfile/My Variables Events
        Soil CentralIA: same as Corn-Soy_oat49.Corn_0_oat49.paddock.CentralIA
        tracker: same as Corn-Soy_oat43.Corn_0_oat43.paddock.tracker
        manager Fertilise on fixed date: same as Corn-Soy_oat43.Corn_67_oat43.paddock.Fertilise on fixed date
    simulation Corn_135_oat49
      metfile met: filename=data-wea\ames_2000-2016.met
      clock
        start_date = 01/01/2000  # Enter the start date of the simulation
        end_date = 31/12/2016  # Enter the end date of the simulation
      summaryfile
      area paddock
        surfaceom SurfaceOrganicMatter
          PoolName = soybean  # Organic Matter pool name
          type = soybean  # Organic Matter type
          mass = 2000  # Initial surface residue (kg/ha)
          cnr = 45  # C:N ratio of initial residue
          standing_fraction = 0.0  # Fraction of residue standing
        fertiliser
        maize
          ini: filename=XML_corn7.9_gn
        folder Manager folder: same as Corn-Soy_oat43.Corn_135_oat43.paddock.Manager folder
        outputfile: filename=Corn_135_oat49.out; title=Corn_135_oat49
          variables My Variables
            variables: dd/mm/yyyy as Date, year, CropYield, CropBiomamas, RootDepth, FlowerDate, MaturityDate, LAI_maximum, TotalNupt, AvgWTInseason, RainSeason, NfertilizerAmount, GrossMiner, NetMiner, SowingNO3_60cm
          events My Variables Events: event=end_year
        Soil CentralIA: same as Corn-Soy_oat43.Corn_135_oat43.paddock.CentralIA
        manager WT_script
          on start_of_day:
          script: same as in Corn-Soy_oat43.Corn_135_oat43.paddock.WT_script
        manager Reset-SWIM: same as Corn-Soy_oat43.Corn_135_oat43.paddock.Reset-SWIM
        manager2 InitialiseWaterTable_Reset: same as Corn-Soy_oat43.Corn_135_oat43.paddock.InitialiseWaterTable_Reset
        manager Sow on a fixed date
          # Sowing criteria
          date = 5-may  # Enter sowing date (dd-mmm)
          # Sowing parameters
          crop = maize  # Enter name of crop to sow
          density = 7  # Enter sowing density (plants/m2)
          depth = 50  # Enter sowing depth (mm)
          cultivar = psims_110RMoat31  # Enter cultivar
          class = plant  # Enter crop growth class
          row_spacing = 760  # Enter row spacing (mm)
          on start_of_day:
          script: same as in Corn-Soy_oat43.Corn_135_oat43.paddock.Sow on a fixed date
        manager Tillage: same as Corn-Soy_oat43.Corn_135_oat43.paddock.Tillage
        manager2 SpecialReporter_Annual: same as Corn-Soy_oat43.Corn_135_oat43.paddock.SpecialReporter_Annual
        tracker: same as Corn-Soy_oat43.Corn_0_oat43.paddock.tracker
        manager Fertilise on fixed date: same as Corn-Soy_oat43.Corn_135_oat43.paddock.Fertilise on fixed date
    simulation Corn_202_oat49 -> /simulations/Corn-Soy_oat49/Corn_135_oat49
      area paddock -> /simulations/Corn-Soy_oat49/Corn_135_oat49/paddock
        outputfile: filename=Corn_202_oat49.out; title=Corn_202_oat49
          variables My Variables
            variables: dd/mm/yyyy as Date, year, CropYield, CropBiomamas, RootDepth, FlowerDate, MaturityDate, LAI_maximum, TotalNupt, AvgWTInseason, RainSeason, NfertilizerAmount, GrossMiner, NetMiner, SowingNO3_60cm
          events My Variables Events -> /simulations/Corn-Soy_oat49/Corn_135_oat49/paddock/outputfile/My Variables Events
        Soil CentralIA: same as Corn-Soy_oat49.Corn_0_oat49.paddock.CentralIA
        tracker: same as Corn-Soy_oat43.Corn_0_oat43.paddock.tracker
        manager Fertilise on fixed date: same as Corn-Soy_oat43.Corn_202_oat43.paddock.Fertilise on fixed date
    simulation Corn_270_oat49 -> /simulations/Corn-Soy_oat49/Corn_135_oat49
      area paddock -> /simulations/Corn-Soy_oat49/Corn_135_oat49/paddock
        outputfile: filename=Corn_270_oat49.out; title=Corn_270_oat49
          variables My Variables
            variables: dd/mm/yyyy as Date, year, CropYield, CropBiomamas, RootDepth, FlowerDate, MaturityDate, LAI_maximum, TotalNupt, AvgWTInseason, RainSeason, NfertilizerAmount, GrossMiner, NetMiner, SowingNO3_60cm
          events My Variables Events -> /simulations/Corn-Soy_oat49/Corn_135_oat49/paddock/outputfile/My Variables Events
        Soil CentralIA: same as Corn-Soy_oat49.Corn_0_oat49.paddock.CentralIA
        tracker: same as Corn-Soy_oat43.Corn_0_oat43.paddock.tracker
        manager Fertilise on fixed date: same as Corn-Soy_oat43.Corn_270_oat43.paddock.Fertilise on fixed date
  folder Corn-Soy_oat50
    simulation Corn_0_oat50 -> /simulations/Corn-Soy_oat50/Corn_135_oat50
      area paddock -> /simulations/Corn-Soy_oat50/Corn_135_oat50/paddock
        outputfile: filename=Corn_0_oat50.out; title=Corn_0_oat50
          variables My Variables
            variables: dd/mm/yyyy as Date, year, CropYield, CropBiomamas, RootDepth, FlowerDate, MaturityDate, LAI_maximum, TotalNupt, AvgWTInseason, RainSeason, NfertilizerAmount, GrossMiner, NetMiner, SowingNO3_60cm
          events My Variables Events -> /simulations/Corn-Soy_oat50/Corn_135_oat50/paddock/outputfile/My Variables Events
        Soil CentralIA: YearOfSampling=0; DataSource=CSIRO Sustainable Ecosystems, Toowoomba
          Comments=Soil naming structure: \State\Region\Classification-Local Name (Site/district and locator number); oc and ph estimated
          Water -> /simulations/Corn-Soy_oat50/Corn_135_oat50/paddock/CentralIA/Water
          SoilOrganicMatter -> /simulations/Corn-Soy_oat50/Corn_135_oat50/paddock/CentralIA/SoilOrganicMatter
          Analysis -> /simulations/Corn-Soy_oat50/Corn_135_oat50/paddock/CentralIA/Analysis
          Sample InitialNitrogen -> /simulations/Corn-Soy_oat50/Corn_135_oat50/paddock/CentralIA/InitialNitrogen
          Swim -> /simulations/Corn-Soy_oat50/Corn_135_oat50/paddock/CentralIA/Swim
          SoilTemperature -> /simulations/Corn-Soy_oat50/Corn_135_oat50/paddock/CentralIA/SoilTemperature
        tracker: same as Corn-Soy_oat43.Corn_0_oat43.paddock.tracker
        manager Fertilise on fixed date: same as Corn-Soy_oat43.Corn_0_oat43.paddock.Fertilise on fixed date
    simulation Corn_67_oat50 -> /simulations/Corn-Soy_oat50/Corn_135_oat50
      area paddock -> /simulations/Corn-Soy_oat50/Corn_135_oat50/paddock
        outputfile: filename=Corn_67_oat50.out; title=Corn_67_oat50
          variables My Variables
            variables: dd/mm/yyyy as Date, year, CropYield, CropBiomamas, RootDepth, FlowerDate, MaturityDate, LAI_maximum, TotalNupt, AvgWTInseason, RainSeason, NfertilizerAmount, GrossMiner, NetMiner, SowingNO3_60cm
          events My Variables Events -> /simulations/Corn-Soy_oat50/Corn_135_oat50/paddock/outputfile/My Variables Events
        Soil CentralIA: same as Corn-Soy_oat50.Corn_0_oat50.paddock.CentralIA
        tracker: same as Corn-Soy_oat43.Corn_0_oat43.paddock.tracker
        manager Fertilise on fixed date: same as Corn-Soy_oat43.Corn_67_oat43.paddock.Fertilise on fixed date
    simulation Corn_135_oat50
      metfile met: filename=data-wea\ames_2000-2016.met
      clock
        start_date = 01/01/2000  # Enter the start date of the simulation
        end_date = 31/12/2016  # Enter the end date of the simulation
      summaryfile
      area paddock
        surfaceom SurfaceOrganicMatter
          PoolName = soybean  # Organic Matter pool name
          type = soybean  # Organic Matter type
          mass = 2000  # Initial surface residue (kg/ha)
          cnr = 45  # C:N ratio of initial residue
          standing_fraction = 0.0  # Fraction of residue standing
        fertiliser
        maize
          ini: filename=XML_corn7.9_gn
        folder Manager folder: same as Corn-Soy_oat43.Corn_135_oat43.paddock.Manager folder
        outputfile: filename=Corn_135_oat50.out; title=Corn_135_oat50
          variables My Variables
            variables: dd/mm/yyyy as Date, year, CropYield, CropBiomamas, RootDepth, FlowerDate, MaturityDate, LAI_maximum, TotalNupt, AvgWTInseason, RainSeason, NfertilizerAmount, GrossMiner, NetMiner, SowingNO3_60cm
          events My Variables Events: event=end_year
        Soil CentralIA: same as Corn-Soy_oat45.Corn_135_oat45.paddock.CentralIA
        manager WT_script
          on start_of_day:
          script: same as in Corn-Soy_oat43.Corn_135_oat43.paddock.WT_script
        manager Reset-SWIM: same as Corn-Soy_oat43.Corn_135_oat43.paddock.Reset-SWIM
        manager2 InitialiseWaterTable_Reset: same as Corn-Soy_oat43.Corn_135_oat43.paddock.InitialiseWaterTable_Reset
        manager Sow on a fixed date: same as Corn-Soy_oat44.Corn_135_oat44.paddock.Sow on a fixed date
        manager Tillage: same as Corn-Soy_oat43.Corn_135_oat43.paddock.Tillage
        manager2 SpecialReporter_Annual: same as Corn-Soy_oat43.Corn_135_oat43.paddock.SpecialReporter_Annual
        tracker: same as Corn-Soy_oat43.Corn_0_oat43.paddock.tracker
        manager Fertilise on fixed date: same as Corn-Soy_oat43.Corn_135_oat43.paddock.Fertilise on fixed date
    simulation Corn_202_oat50 -> /simulations/Corn-Soy_oat50/Corn_135_oat50
      area paddock -> /simulations/Corn-Soy_oat50/Corn_135_oat50/paddock
        outputfile: filename=Corn_202_oat50.out; title=Corn_202_oat50
          variables My Variables
            variables: dd/mm/yyyy as Date, year, CropYield, CropBiomamas, RootDepth, FlowerDate, MaturityDate, LAI_maximum, TotalNupt, AvgWTInseason, RainSeason, NfertilizerAmount, GrossMiner, NetMiner, SowingNO3_60cm
          events My Variables Events -> /simulations/Corn-Soy_oat50/Corn_135_oat50/paddock/outputfile/My Variables Events
        Soil CentralIA: same as Corn-Soy_oat50.Corn_0_oat50.paddock.CentralIA
        tracker: same as Corn-Soy_oat43.Corn_0_oat43.paddock.tracker
        manager Fertilise on fixed date: same as Corn-Soy_oat43.Corn_202_oat43.paddock.Fertilise on fixed date
    simulation Corn_270_oat50 -> /simulations/Corn-Soy_oat50/Corn_135_oat50
      area paddock -> /simulations/Corn-Soy_oat50/Corn_135_oat50/paddock
        outputfile: filename=Corn_270_oat50.out; title=Corn_270_oat50
          variables My Variables
            variables: dd/mm/yyyy as Date, year, CropYield, CropBiomamas, RootDepth, FlowerDate, MaturityDate, LAI_maximum, TotalNupt, AvgWTInseason, RainSeason, NfertilizerAmount, GrossMiner, NetMiner, SowingNO3_60cm
          events My Variables Events -> /simulations/Corn-Soy_oat50/Corn_135_oat50/paddock/outputfile/My Variables Events
        Soil CentralIA: same as Corn-Soy_oat50.Corn_0_oat50.paddock.CentralIA
        tracker: same as Corn-Soy_oat43.Corn_0_oat43.paddock.tracker
        manager Fertilise on fixed date: same as Corn-Soy_oat43.Corn_270_oat43.paddock.Fertilise on fixed date
  folder Corn-Soy_oat51
    simulation Corn_0_oat51 -> /simulations/Corn-Soy_oat51/Corn_135_oat51
      area paddock -> /simulations/Corn-Soy_oat51/Corn_135_oat51/paddock
        outputfile: filename=Corn_0_oat51.out; title=Corn_0_oat51
          variables My Variables
            variables: dd/mm/yyyy as Date, year, CropYield, CropBiomamas, RootDepth, FlowerDate, MaturityDate, LAI_maximum, TotalNupt, AvgWTInseason, RainSeason, NfertilizerAmount, GrossMiner, NetMiner, SowingNO3_60cm
          events My Variables Events -> /simulations/Corn-Soy_oat51/Corn_135_oat51/paddock/outputfile/My Variables Events
        Soil CentralIA: YearOfSampling=0; DataSource=CSIRO Sustainable Ecosystems, Toowoomba
          Comments=Soil naming structure: \State\Region\Classification-Local Name (Site/district and locator number); oc and ph estimated
          Water -> /simulations/Corn-Soy_oat51/Corn_135_oat51/paddock/CentralIA/Water
          SoilOrganicMatter -> /simulations/Corn-Soy_oat51/Corn_135_oat51/paddock/CentralIA/SoilOrganicMatter
          Analysis -> /simulations/Corn-Soy_oat51/Corn_135_oat51/paddock/CentralIA/Analysis
          Sample InitialNitrogen -> /simulations/Corn-Soy_oat51/Corn_135_oat51/paddock/CentralIA/InitialNitrogen
          Swim -> /simulations/Corn-Soy_oat51/Corn_135_oat51/paddock/CentralIA/Swim
          SoilTemperature -> /simulations/Corn-Soy_oat51/Corn_135_oat51/paddock/CentralIA/SoilTemperature
        tracker: same as Corn-Soy_oat43.Corn_0_oat43.paddock.tracker
        manager Fertilise on fixed date: same as Corn-Soy_oat43.Corn_0_oat43.paddock.Fertilise on fixed date
    simulation Corn_67_oat51 -> /simulations/Corn-Soy_oat51/Corn_135_oat51
      area paddock -> /simulations/Corn-Soy_oat51/Corn_135_oat51/paddock
        outputfile: filename=Corn_67_oat51.out; title=Corn_67_oat51
          variables My Variables
            variables: dd/mm/yyyy as Date, year, CropYield, CropBiomamas, RootDepth, FlowerDate, MaturityDate, LAI_maximum, TotalNupt, AvgWTInseason, RainSeason, NfertilizerAmount, GrossMiner, NetMiner, SowingNO3_60cm
          events My Variables Events -> /simulations/Corn-Soy_oat51/Corn_135_oat51/paddock/outputfile/My Variables Events
        Soil CentralIA: same as Corn-Soy_oat51.Corn_0_oat51.paddock.CentralIA
        tracker: same as Corn-Soy_oat43.Corn_0_oat43.paddock.tracker
        manager Fertilise on fixed date: same as Corn-Soy_oat43.Corn_67_oat43.paddock.Fertilise on fixed date
    simulation Corn_135_oat51
      metfile met: filename=data-wea\ames_2000-2016.met
      clock
        start_date = 01/01/2000  # Enter the start date of the simulation
        end_date = 31/12/2016  # Enter the end date of the simulation
      summaryfile
      area paddock
        surfaceom SurfaceOrganicMatter
          PoolName = soybean  # Organic Matter pool name
          type = soybean  # Organic Matter type
          mass = 2000  # Initial surface residue (kg/ha)
          cnr = 45  # C:N ratio of initial residue
          standing_fraction = 0.0  # Fraction of residue standing
        fertiliser
        maize
          ini: filename=XML_corn7.9_gn
        folder Manager folder: same as Corn-Soy_oat43.Corn_135_oat43.paddock.Manager folder
        outputfile: filename=Corn_135_oat51.out; title=Corn_135_oat51
          variables My Variables
            variables: dd/mm/yyyy as Date, year, CropYield, CropBiomamas, RootDepth, FlowerDate, MaturityDate, LAI_maximum, TotalNupt, AvgWTInseason, RainSeason, NfertilizerAmount, GrossMiner, NetMiner, SowingNO3_60cm
          events My Variables Events: event=end_year
        Soil CentralIA: same as Corn-Soy_oat43.Corn_135_oat43.paddock.CentralIA
        manager WT_script
          on start_of_day:
          script: same as in Corn-Soy_oat43.Corn_135_oat43.paddock.WT_script
        manager Reset-SWIM: same as Corn-Soy_oat43.Corn_135_oat43.paddock.Reset-SWIM
        manager2 InitialiseWaterTable_Reset: same as Corn-Soy_oat43.Corn_135_oat43.paddock.InitialiseWaterTable_Reset
        manager Sow on a fixed date
          # Sowing criteria
          date = 5-may  # Enter sowing date (dd-mmm)
          # Sowing parameters
          crop = maize  # Enter name of crop to sow
          density = 7  # Enter sowing density (plants/m2)
          depth = 50  # Enter sowing depth (mm)
          cultivar = psims_110RMoat39  # Enter cultivar
          class = plant  # Enter crop growth class
          row_spacing = 760  # Enter row spacing (mm)
          on start_of_day:
          script: same as in Corn-Soy_oat43.Corn_135_oat43.paddock.Sow on a fixed date
        manager Tillage: same as Corn-Soy_oat43.Corn_135_oat43.paddock.Tillage
        manager2 SpecialReporter_Annual: same as Corn-Soy_oat43.Corn_135_oat43.paddock.SpecialReporter_Annual
        tracker: same as Corn-Soy_oat43.Corn_0_oat43.paddock.tracker
        manager Fertilise on fixed date: same as Corn-Soy_oat43.Corn_135_oat43.paddock.Fertilise on fixed date
    simulation Corn_202_oat51 -> /simulations/Corn-Soy_oat51/Corn_135_oat51
      area paddock -> /simulations/Corn-Soy_oat51/Corn_135_oat51/paddock
        outputfile: filename=Corn_202_oat51.out; title=Corn_202_oat51
          variables My Variables
            variables: dd/mm/yyyy as Date, year, CropYield, CropBiomamas, RootDepth, FlowerDate, MaturityDate, LAI_maximum, TotalNupt, AvgWTInseason, RainSeason, NfertilizerAmount, GrossMiner, NetMiner, SowingNO3_60cm
          events My Variables Events -> /simulations/Corn-Soy_oat51/Corn_135_oat51/paddock/outputfile/My Variables Events
        Soil CentralIA: same as Corn-Soy_oat51.Corn_0_oat51.paddock.CentralIA
        tracker: same as Corn-Soy_oat43.Corn_0_oat43.paddock.tracker
        manager Fertilise on fixed date: same as Corn-Soy_oat43.Corn_202_oat43.paddock.Fertilise on fixed date
    simulation Corn_270_oat51 -> /simulations/Corn-Soy_oat51/Corn_135_oat51
      area paddock -> /simulations/Corn-Soy_oat51/Corn_135_oat51/paddock
        outputfile: filename=Corn_270_oat51.out; title=Corn_270_oat51
          variables My Variables
            variables: dd/mm/yyyy as Date, year, CropYield, CropBiomamas, RootDepth, FlowerDate, MaturityDate, LAI_maximum, TotalNupt, AvgWTInseason, RainSeason, NfertilizerAmount, GrossMiner, NetMiner, SowingNO3_60cm
          events My Variables Events -> /simulations/Corn-Soy_oat51/Corn_135_oat51/paddock/outputfile/My Variables Events
        Soil CentralIA: same as Corn-Soy_oat51.Corn_0_oat51.paddock.CentralIA
        tracker: same as Corn-Soy_oat43.Corn_0_oat43.paddock.tracker
        manager Fertilise on fixed date: same as Corn-Soy_oat43.Corn_270_oat43.paddock.Fertilise on fixed date
  folder Corn-Soy_oat52
    simulation Corn_0_oat52 -> /simulations/Corn-Soy_oat52/Corn_135_oat52
      area paddock -> /simulations/Corn-Soy_oat52/Corn_135_oat52/paddock
        outputfile: filename=Corn_0_oat52.out; title=Corn_0_oat52
          variables My Variables
            variables: dd/mm/yyyy as Date, year, CropYield, CropBiomamas, RootDepth, FlowerDate, MaturityDate, LAI_maximum, TotalNupt, AvgWTInseason, RainSeason, NfertilizerAmount, GrossMiner, NetMiner, SowingNO3_60cm
          events My Variables Events -> /simulations/Corn-Soy_oat52/Corn_135_oat52/paddock/outputfile/My Variables Events
        Soil CentralIA: YearOfSampling=0; DataSource=CSIRO Sustainable Ecosystems, Toowoomba
          Comments=Soil naming structure: \State\Region\Classification-Local Name (Site/district and locator number); oc and ph estimated
          Water -> /simulations/Corn-Soy_oat52/Corn_135_oat52/paddock/CentralIA/Water
          SoilOrganicMatter -> /simulations/Corn-Soy_oat52/Corn_135_oat52/paddock/CentralIA/SoilOrganicMatter
          Analysis -> /simulations/Corn-Soy_oat52/Corn_135_oat52/paddock/CentralIA/Analysis
          Sample InitialNitrogen -> /simulations/Corn-Soy_oat52/Corn_135_oat52/paddock/CentralIA/InitialNitrogen
          Swim -> /simulations/Corn-Soy_oat52/Corn_135_oat52/paddock/CentralIA/Swim
          SoilTemperature -> /simulations/Corn-Soy_oat52/Corn_135_oat52/paddock/CentralIA/SoilTemperature
        tracker: same as Corn-Soy_oat43.Corn_0_oat43.paddock.tracker
        manager Fertilise on fixed date: same as Corn-Soy_oat43.Corn_0_oat43.paddock.Fertilise on fixed date
    simulation Corn_67_oat52 -> /simulations/Corn-Soy_oat52/Corn_135_oat52
      area paddock -> /simulations/Corn-Soy_oat52/Corn_135_oat52/paddock
        outputfile: filename=Corn_67_oat52.out; title=Corn_67_oat52
          variables My Variables
            variables: dd/mm/yyyy as Date, year, CropYield, CropBiomamas, RootDepth, FlowerDate, MaturityDate, LAI_maximum, TotalNupt, AvgWTInseason, RainSeason, NfertilizerAmount, GrossMiner, NetMiner, SowingNO3_60cm
          events My Variables Events -> /simulations/Corn-Soy_oat52/Corn_135_oat52/paddock/outputfile/My Variables Events
        Soil CentralIA: same as Corn-Soy_oat52.Corn_0_oat52.paddock.CentralIA
        tracker: same as Corn-Soy_oat43.Corn_0_oat43.paddock.tracker
        manager Fertilise on fixed date: same as Corn-Soy_oat43.Corn_67_oat43.paddock.Fertilise on fixed date
    simulation Corn_135_oat52
      metfile met: filename=data-wea\ames_2000-2016.met
      clock
        start_date = 01/01/2000  # Enter the start date of the simulation
        end_date = 31/12/2016  # Enter the end date of the simulation
      summaryfile
      area paddock
        surfaceom SurfaceOrganicMatter
          PoolName = soybean  # Organic Matter pool name
          type = soybean  # Organic Matter type
          mass = 2000  # Initial surface residue (kg/ha)
          cnr = 45  # C:N ratio of initial residue
          standing_fraction = 0.0  # Fraction of residue standing
        fertiliser
        maize
          ini: filename=XML_corn7.9_gn
        folder Manager folder: same as Corn-Soy_oat43.Corn_135_oat43.paddock.Manager folder
        outputfile: filename=Corn_135_oat52.out; title=Corn_135_oat52
          variables My Variables
            variables: dd/mm/yyyy as Date, year, CropYield, CropBiomamas, RootDepth, FlowerDate, MaturityDate, LAI_maximum, TotalNupt, AvgWTInseason, RainSeason, NfertilizerAmount, GrossMiner, NetMiner, SowingNO3_60cm
          events My Variables Events: event=end_year
        Soil CentralIA: same as Corn-Soy_oat45.Corn_135_oat45.paddock.CentralIA
        manager WT_script
          on start_of_day:
          script: same as in Corn-Soy_oat43.Corn_135_oat43.paddock.WT_script
        manager Reset-SWIM: same as Corn-Soy_oat43.Corn_135_oat43.paddock.Reset-SWIM
        manager2 InitialiseWaterTable_Reset: same as Corn-Soy_oat43.Corn_135_oat43.paddock.InitialiseWaterTable_Reset
        manager Sow on a fixed date: same as Corn-Soy_oat46.Corn_135_oat46.paddock.Sow on a fixed date
        manager Tillage: same as Corn-Soy_oat43.Corn_135_oat43.paddock.Tillage
        manager2 SpecialReporter_Annual: same as Corn-Soy_oat43.Corn_135_oat43.paddock.SpecialReporter_Annual
        tracker: same as Corn-Soy_oat43.Corn_0_oat43.paddock.tracker
        manager Fertilise on fixed date: same as Corn-Soy_oat43.Corn_135_oat43.paddock.Fertilise on fixed date
    simulation Corn_202_oat52 -> /simulations/Corn-Soy_oat52/Corn_135_oat52
      area paddock -> /simulations/Corn-Soy_oat52/Corn_135_oat52/paddock
        outputfile: filename=Corn_202_oat52.out; title=Corn_202_oat52
          variables My Variables
            variables: dd/mm/yyyy as Date, year, CropYield, CropBiomamas, RootDepth, FlowerDate, MaturityDate, LAI_maximum, TotalNupt, AvgWTInseason, RainSeason, NfertilizerAmount, GrossMiner, NetMiner, SowingNO3_60cm
          events My Variables Events -> /simulations/Corn-Soy_oat52/Corn_135_oat52/paddock/outputfile/My Variables Events
        Soil CentralIA: same as Corn-Soy_oat52.Corn_0_oat52.paddock.CentralIA
        tracker: same as Corn-Soy_oat43.Corn_0_oat43.paddock.tracker
        manager Fertilise on fixed date: same as Corn-Soy_oat43.Corn_202_oat43.paddock.Fertilise on fixed date
    simulation Corn_270_oat52 -> /simulations/Corn-Soy_oat52/Corn_135_oat52
      area paddock -> /simulations/Corn-Soy_oat52/Corn_135_oat52/paddock
        outputfile: filename=Corn_270_oat52.out; title=Corn_270_oat52
          variables My Variables
            variables: dd/mm/yyyy as Date, year, CropYield, CropBiomamas, RootDepth, FlowerDate, MaturityDate, LAI_maximum, TotalNupt, AvgWTInseason, RainSeason, NfertilizerAmount, GrossMiner, NetMiner, SowingNO3_60cm
          events My Variables Events -> /simulations/Corn-Soy_oat52/Corn_135_oat52/paddock/outputfile/My Variables Events
        Soil CentralIA: same as Corn-Soy_oat52.Corn_0_oat52.paddock.CentralIA
        tracker: same as Corn-Soy_oat43.Corn_0_oat43.paddock.tracker
        manager Fertilise on fixed date: same as Corn-Soy_oat43.Corn_270_oat43.paddock.Fertilise on fixed date
  folder Corn-Soy_oat53
    simulation Corn_0_oat53 -> /simulations/Corn-Soy_oat53/Corn_135_oat53
      area paddock -> /simulations/Corn-Soy_oat53/Corn_135_oat53/paddock
        outputfile: filename=Corn_0_oat53.out; title=Corn_0_oat53
          variables My Variables
            variables: dd/mm/yyyy as Date, year, CropYield, CropBiomamas, RootDepth, FlowerDate, MaturityDate, LAI_maximum, TotalNupt, AvgWTInseason, RainSeason, NfertilizerAmount, GrossMiner, NetMiner, SowingNO3_60cm
          events My Variables Events -> /simulations/Corn-Soy_oat53/Corn_135_oat53/paddock/outputfile/My Variables Events
        Soil CentralIA: YearOfSampling=0; DataSource=CSIRO Sustainable Ecosystems, Toowoomba
          Comments=Soil naming structure: \State\Region\Classification-Local Name (Site/district and locator number); oc and ph estimated
          Water -> /simulations/Corn-Soy_oat53/Corn_135_oat53/paddock/CentralIA/Water
          SoilOrganicMatter -> /simulations/Corn-Soy_oat53/Corn_135_oat53/paddock/CentralIA/SoilOrganicMatter
          Analysis -> /simulations/Corn-Soy_oat53/Corn_135_oat53/paddock/CentralIA/Analysis
          Sample InitialNitrogen -> /simulations/Corn-Soy_oat53/Corn_135_oat53/paddock/CentralIA/InitialNitrogen
          Swim -> /simulations/Corn-Soy_oat53/Corn_135_oat53/paddock/CentralIA/Swim
          SoilTemperature -> /simulations/Corn-Soy_oat53/Corn_135_oat53/paddock/CentralIA/SoilTemperature
        tracker: same as Corn-Soy_oat43.Corn_0_oat43.paddock.tracker
        manager Fertilise on fixed date: same as Corn-Soy_oat43.Corn_0_oat43.paddock.Fertilise on fixed date
    simulation Corn_67_oat53 -> /simulations/Corn-Soy_oat53/Corn_135_oat53
      area paddock -> /simulations/Corn-Soy_oat53/Corn_135_oat53/paddock
        outputfile: filename=Corn_67_oat53.out; title=Corn_67_oat53
          variables My Variables
            variables: dd/mm/yyyy as Date, year, CropYield, CropBiomamas, RootDepth, FlowerDate, MaturityDate, LAI_maximum, TotalNupt, AvgWTInseason, RainSeason, NfertilizerAmount, GrossMiner, NetMiner, SowingNO3_60cm
          events My Variables Events -> /simulations/Corn-Soy_oat53/Corn_135_oat53/paddock/outputfile/My Variables Events
        Soil CentralIA: same as Corn-Soy_oat53.Corn_0_oat53.paddock.CentralIA
        tracker: same as Corn-Soy_oat43.Corn_0_oat43.paddock.tracker
        manager Fertilise on fixed date: same as Corn-Soy_oat43.Corn_67_oat43.paddock.Fertilise on fixed date
    simulation Corn_135_oat53
      metfile met: filename=data-wea\ames_2000-2016.met
      clock
        start_date = 01/01/2000  # Enter the start date of the simulation
        end_date = 31/12/2016  # Enter the end date of the simulation
      summaryfile
      area paddock
        surfaceom SurfaceOrganicMatter
          PoolName = maize  # Organic Matter pool name
          type = maize  # Organic Matter type
          mass = 10000  # Initial surface residue (kg/ha)
          cnr = 70  # C:N ratio of initial residue
          standing_fraction = 0.0  # Fraction of residue standing
        fertiliser
        maize
          ini: filename=XML_corn7.9_gn
        folder Manager folder: same as Corn-Soy_oat43.Corn_135_oat43.paddock.Manager folder
        outputfile: filename=Corn_135_oat53.out; title=Corn_135_oat53
          variables My Variables
            variables: dd/mm/yyyy as Date, year, CropYield, CropBiomamas, RootDepth, FlowerDate, MaturityDate, LAI_maximum, TotalNupt, AvgWTInseason, RainSeason, NfertilizerAmount, GrossMiner, NetMiner, SowingNO3_60cm
          events My Variables Events: event=end_year
        Soil CentralIA: same as Corn-Soy_oat43.Corn_135_oat43.paddock.CentralIA
        manager WT_script
          on start_of_day:
          script: same as in Corn-Soy_oat43.Corn_135_oat43.paddock.WT_script
        manager Reset-SWIM: same as Corn-Soy_oat43.Corn_135_oat43.paddock.Reset-SWIM
        manager2 InitialiseWaterTable_Reset: same as Corn-Soy_oat43.Corn_135_oat43.paddock.InitialiseWaterTable_Reset
        manager Sow on a fixed date
          # Sowing criteria
          date = 5-may  # Enter sowing date (dd-mmm)
          # Sowing parameters
          crop = maize  # Enter name of crop to sow
          density = 8  # Enter sowing density (plants/m2)
          depth = 50  # Enter sowing depth (mm)
          cultivar = psims_110RMoat34  # Enter cultivar
          class = plant  # Enter crop growth class
          row_spacing = 760  # Enter row spacing (mm)
          on start_of_day:
          script: same as in Corn-Soy_oat43.Corn_135_oat43.paddock.Sow on a fixed date
        manager Tillage: same as Corn-Soy_oat43.Corn_135_oat43.paddock.Tillage
        manager2 SpecialReporter_Annual: same as Corn-Soy_oat43.Corn_135_oat43.paddock.SpecialReporter_Annual
        tracker: same as Corn-Soy_oat43.Corn_0_oat43.paddock.tracker
        manager Fertilise on fixed date: same as Corn-Soy_oat43.Corn_135_oat43.paddock.Fertilise on fixed date
    simulation Corn_202_oat53 -> /simulations/Corn-Soy_oat53/Corn_135_oat53
      area paddock -> /simulations/Corn-Soy_oat53/Corn_135_oat53/paddock
        outputfile: filename=Corn_202_oat53.out; title=Corn_202_oat53
          variables My Variables
            variables: dd/mm/yyyy as Date, year, CropYield, CropBiomamas, RootDepth, FlowerDate, MaturityDate, LAI_maximum, TotalNupt, AvgWTInseason, RainSeason, NfertilizerAmount, GrossMiner, NetMiner, SowingNO3_60cm
          events My Variables Events -> /simulations/Corn-Soy_oat53/Corn_135_oat53/paddock/outputfile/My Variables Events
        Soil CentralIA: same as Corn-Soy_oat53.Corn_0_oat53.paddock.CentralIA
        tracker: same as Corn-Soy_oat43.Corn_0_oat43.paddock.tracker
        manager Fertilise on fixed date: same as Corn-Soy_oat43.Corn_202_oat43.paddock.Fertilise on fixed date
    simulation Corn_270_oat53 -> /simulations/Corn-Soy_oat53/Corn_135_oat53
      area paddock -> /simulations/Corn-Soy_oat53/Corn_135_oat53/paddock
        outputfile: filename=Corn_270_oat53.out; title=Corn_270_oat53
          variables My Variables
            variables: dd/mm/yyyy as Date, year, CropYield, CropBiomamas, RootDepth, FlowerDate, MaturityDate, LAI_maximum, TotalNupt, AvgWTInseason, RainSeason, NfertilizerAmount, GrossMiner, NetMiner, SowingNO3_60cm
          events My Variables Events -> /simulations/Corn-Soy_oat53/Corn_135_oat53/paddock/outputfile/My Variables Events
        Soil CentralIA: same as Corn-Soy_oat53.Corn_0_oat53.paddock.CentralIA
        tracker: same as Corn-Soy_oat43.Corn_0_oat43.paddock.tracker
        manager Fertilise on fixed date: same as Corn-Soy_oat43.Corn_270_oat43.paddock.Fertilise on fixed date
  folder Corn-Soy_oat54
    simulation Corn_0_oat54 -> /simulations/Corn-Soy_oat54/Corn_135_oat54
      area paddock -> /simulations/Corn-Soy_oat54/Corn_135_oat54/paddock
        outputfile: filename=Corn_0_oat54.out; title=Corn_0_oat54
          variables My Variables
            variables: dd/mm/yyyy as Date, year, CropYield, CropBiomamas, RootDepth, FlowerDate, MaturityDate, LAI_maximum, TotalNupt, AvgWTInseason, RainSeason, NfertilizerAmount, GrossMiner, NetMiner, SowingNO3_60cm
          events My Variables Events -> /simulations/Corn-Soy_oat54/Corn_135_oat54/paddock/outputfile/My Variables Events
        Soil CentralIA: YearOfSampling=0; DataSource=CSIRO Sustainable Ecosystems, Toowoomba
          Comments=Soil naming structure: \State\Region\Classification-Local Name (Site/district and locator number); oc and ph estimated
          Water -> /simulations/Corn-Soy_oat54/Corn_135_oat54/paddock/CentralIA/Water
          SoilOrganicMatter -> /simulations/Corn-Soy_oat54/Corn_135_oat54/paddock/CentralIA/SoilOrganicMatter
          Analysis -> /simulations/Corn-Soy_oat54/Corn_135_oat54/paddock/CentralIA/Analysis
          Sample InitialNitrogen -> /simulations/Corn-Soy_oat54/Corn_135_oat54/paddock/CentralIA/InitialNitrogen
          Swim -> /simulations/Corn-Soy_oat54/Corn_135_oat54/paddock/CentralIA/Swim
          SoilTemperature -> /simulations/Corn-Soy_oat54/Corn_135_oat54/paddock/CentralIA/SoilTemperature
        tracker: same as Corn-Soy_oat43.Corn_0_oat43.paddock.tracker
        manager Fertilise on fixed date: same as Corn-Soy_oat43.Corn_0_oat43.paddock.Fertilise on fixed date
    simulation Corn_67_oat54 -> /simulations/Corn-Soy_oat54/Corn_135_oat54
      area paddock -> /simulations/Corn-Soy_oat54/Corn_135_oat54/paddock
        outputfile: filename=Corn_67_oat54.out; title=Corn_67_oat54
          variables My Variables
            variables: dd/mm/yyyy as Date, year, CropYield, CropBiomamas, RootDepth, FlowerDate, MaturityDate, LAI_maximum, TotalNupt, AvgWTInseason, RainSeason, NfertilizerAmount, GrossMiner, NetMiner, SowingNO3_60cm
          events My Variables Events -> /simulations/Corn-Soy_oat54/Corn_135_oat54/paddock/outputfile/My Variables Events
        Soil CentralIA: same as Corn-Soy_oat54.Corn_0_oat54.paddock.CentralIA
        tracker: same as Corn-Soy_oat43.Corn_0_oat43.paddock.tracker
        manager Fertilise on fixed date: same as Corn-Soy_oat43.Corn_67_oat43.paddock.Fertilise on fixed date
    simulation Corn_135_oat54
      metfile met: filename=data-wea\ames_2000-2016.met
      clock
        start_date = 01/01/2000  # Enter the start date of the simulation
        end_date = 31/12/2016  # Enter the end date of the simulation
      summaryfile
      area paddock
        surfaceom SurfaceOrganicMatter
          PoolName = maize  # Organic Matter pool name
          type = maize  # Organic Matter type
          mass = 10000  # Initial surface residue (kg/ha)
          cnr = 70  # C:N ratio of initial residue
          standing_fraction = 0.0  # Fraction of residue standing
        fertiliser
        maize
          ini: filename=XML_corn7.9_gn
        folder Manager folder: same as Corn-Soy_oat43.Corn_135_oat43.paddock.Manager folder
        outputfile: filename=Corn_135_oat54.out; title=Corn_135_oat54
          variables My Variables
            variables: dd/mm/yyyy as Date, year, CropYield, CropBiomamas, RootDepth, FlowerDate, MaturityDate, LAI_maximum, TotalNupt, AvgWTInseason, RainSeason, NfertilizerAmount, GrossMiner, NetMiner, SowingNO3_60cm
          events My Variables Events: event=end_year
        Soil CentralIA: same as Corn-Soy_oat45.Corn_135_oat45.paddock.CentralIA
        manager WT_script
          on start_of_day:
          script: same as in Corn-Soy_oat43.Corn_135_oat43.paddock.WT_script
        manager Reset-SWIM: same as Corn-Soy_oat43.Corn_135_oat43.paddock.Reset-SWIM
        manager2 InitialiseWaterTable_Reset: same as Corn-Soy_oat43.Corn_135_oat43.paddock.InitialiseWaterTable_Reset
        manager Sow on a fixed date
          # Sowing criteria
          date = 5-may  # Enter sowing date (dd-mmm)
          # Sowing parameters
          crop = maize  # Enter name of crop to sow
          density = 8  # Enter sowing density (plants/m2)
          depth = 50  # Enter sowing depth (mm)
          cultivar = psims_110RMlowRUE  # Enter cultivar
          class = plant  # Enter crop growth class
          row_spacing = 760  # Enter row spacing (mm)
          on start_of_day:
          script: same as in Corn-Soy_oat43.Corn_135_oat43.paddock.Sow on a fixed date
        manager Tillage: same as Corn-Soy_oat43.Corn_135_oat43.paddock.Tillage
        manager2 SpecialReporter_Annual: same as Corn-Soy_oat43.Corn_135_oat43.paddock.SpecialReporter_Annual
        tracker: same as Corn-Soy_oat43.Corn_0_oat43.paddock.tracker
        manager Fertilise on fixed date: same as Corn-Soy_oat43.Corn_135_oat43.paddock.Fertilise on fixed date
    simulation Corn_202_oat54 -> /simulations/Corn-Soy_oat54/Corn_135_oat54
      area paddock -> /simulations/Corn-Soy_oat54/Corn_135_oat54/paddock
        outputfile: filename=Corn_202_oat54.out; title=Corn_202_oat54
          variables My Variables
            variables: dd/mm/yyyy as Date, year, CropYield, CropBiomamas, RootDepth, FlowerDate, MaturityDate, LAI_maximum, TotalNupt, AvgWTInseason, RainSeason, NfertilizerAmount, GrossMiner, NetMiner, SowingNO3_60cm
          events My Variables Events -> /simulations/Corn-Soy_oat54/Corn_135_oat54/paddock/outputfile/My Variables Events
        Soil CentralIA: same as Corn-Soy_oat54.Corn_0_oat54.paddock.CentralIA
        tracker: same as Corn-Soy_oat43.Corn_0_oat43.paddock.tracker
        manager Fertilise on fixed date: same as Corn-Soy_oat43.Corn_202_oat43.paddock.Fertilise on fixed date
    simulation Corn_270_oat54 -> /simulations/Corn-Soy_oat54/Corn_135_oat54
      area paddock -> /simulations/Corn-Soy_oat54/Corn_135_oat54/paddock
        outputfile: filename=Corn_270_oat54.out; title=Corn_270_oat54
          variables My Variables
            variables: dd/mm/yyyy as Date, year, CropYield, CropBiomamas, RootDepth, FlowerDate, MaturityDate, LAI_maximum, TotalNupt, AvgWTInseason, RainSeason, NfertilizerAmount, GrossMiner, NetMiner, SowingNO3_60cm
          events My Variables Events -> /simulations/Corn-Soy_oat54/Corn_135_oat54/paddock/outputfile/My Variables Events
        Soil CentralIA: same as Corn-Soy_oat54.Corn_0_oat54.paddock.CentralIA
        tracker: same as Corn-Soy_oat43.Corn_0_oat43.paddock.tracker
        manager Fertilise on fixed date: same as Corn-Soy_oat43.Corn_270_oat43.paddock.Fertilise on fixed date
  folder Corn-Soy_oat55
    simulation Corn_0_oat55 -> /simulations/Corn-Soy_oat55/Corn_135_oat55
      area paddock -> /simulations/Corn-Soy_oat55/Corn_135_oat55/paddock
        outputfile: filename=Corn_0_oat55.out; title=Corn_0_oat55
          variables My Variables
            variables: dd/mm/yyyy as Date, year, CropYield, CropBiomamas, RootDepth, FlowerDate, MaturityDate, LAI_maximum, TotalNupt, AvgWTInseason, RainSeason, NfertilizerAmount, GrossMiner, NetMiner, SowingNO3_60cm
          events My Variables Events -> /simulations/Corn-Soy_oat55/Corn_135_oat55/paddock/outputfile/My Variables Events
        Soil CentralIA: YearOfSampling=0; DataSource=CSIRO Sustainable Ecosystems, Toowoomba
          Comments=Soil naming structure: \State\Region\Classification-Local Name (Site/district and locator number); oc and ph estimated
          Water -> /simulations/Corn-Soy_oat55/Corn_135_oat55/paddock/CentralIA/Water
          SoilOrganicMatter -> /simulations/Corn-Soy_oat55/Corn_135_oat55/paddock/CentralIA/SoilOrganicMatter
          Analysis -> /simulations/Corn-Soy_oat55/Corn_135_oat55/paddock/CentralIA/Analysis
          Sample InitialNitrogen -> /simulations/Corn-Soy_oat55/Corn_135_oat55/paddock/CentralIA/InitialNitrogen
          Swim -> /simulations/Corn-Soy_oat55/Corn_135_oat55/paddock/CentralIA/Swim
          SoilTemperature -> /simulations/Corn-Soy_oat55/Corn_135_oat55/paddock/CentralIA/SoilTemperature
        tracker: same as Corn-Soy_oat43.Corn_0_oat43.paddock.tracker
        manager Fertilise on fixed date: same as Corn-Soy_oat43.Corn_0_oat43.paddock.Fertilise on fixed date
    simulation Corn_67_oat55 -> /simulations/Corn-Soy_oat55/Corn_135_oat55
      area paddock -> /simulations/Corn-Soy_oat55/Corn_135_oat55/paddock
        outputfile: filename=Corn_67_oat55.out; title=Corn_67_oat55
          variables My Variables
            variables: dd/mm/yyyy as Date, year, CropYield, CropBiomamas, RootDepth, FlowerDate, MaturityDate, LAI_maximum, TotalNupt, AvgWTInseason, RainSeason, NfertilizerAmount, GrossMiner, NetMiner, SowingNO3_60cm
          events My Variables Events -> /simulations/Corn-Soy_oat55/Corn_135_oat55/paddock/outputfile/My Variables Events
        Soil CentralIA: same as Corn-Soy_oat55.Corn_0_oat55.paddock.CentralIA
        tracker: same as Corn-Soy_oat43.Corn_0_oat43.paddock.tracker
        manager Fertilise on fixed date: same as Corn-Soy_oat43.Corn_67_oat43.paddock.Fertilise on fixed date
    simulation Corn_135_oat55
      metfile met: filename=data-wea\ames_2000-2016.met
      clock
        start_date = 01/01/2000  # Enter the start date of the simulation
        end_date = 31/12/2016  # Enter the end date of the simulation
      summaryfile
      area paddock
        surfaceom SurfaceOrganicMatter
          PoolName = maize  # Organic Matter pool name
          type = maize  # Organic Matter type
          mass = 10000  # Initial surface residue (kg/ha)
          cnr = 70  # C:N ratio of initial residue
          standing_fraction = 0.0  # Fraction of residue standing
        fertiliser
        maize
          ini: filename=XML_corn7.9_gn
        folder Manager folder: same as Corn-Soy_oat43.Corn_135_oat43.paddock.Manager folder
        outputfile: filename=Corn_135_oat55.out; title=Corn_135_oat55
          variables My Variables
            variables: dd/mm/yyyy as Date, year, CropYield, CropBiomamas, RootDepth, FlowerDate, MaturityDate, LAI_maximum, TotalNupt, AvgWTInseason, RainSeason, NfertilizerAmount, GrossMiner, NetMiner, SowingNO3_60cm
          events My Variables Events: event=end_year
        Soil CentralIA: same as Corn-Soy_oat43.Corn_135_oat43.paddock.CentralIA
        manager WT_script
          on start_of_day:
          script: same as in Corn-Soy_oat43.Corn_135_oat43.paddock.WT_script
        manager Reset-SWIM: same as Corn-Soy_oat43.Corn_135_oat43.paddock.Reset-SWIM
        manager2 InitialiseWaterTable_Reset: same as Corn-Soy_oat43.Corn_135_oat43.paddock.InitialiseWaterTable_Reset
        manager Sow on a fixed date
          # Sowing criteria
          date = 5-may  # Enter sowing date (dd-mmm)
          # Sowing parameters
          crop = maize  # Enter name of crop to sow
          density = 8  # Enter sowing density (plants/m2)
          depth = 50  # Enter sowing depth (mm)
          cultivar = psims_110RMoat31  # Enter cultivar
          class = plant  # Enter crop growth class
          row_spacing = 760  # Enter row spacing (mm)
          on start_of_day:
          script: same as in Corn-Soy_oat43.Corn_135_oat43.paddock.Sow on a fixed date
        manager Tillage: same as Corn-Soy_oat43.Corn_135_oat43.paddock.Tillage
        manager2 SpecialReporter_Annual: same as Corn-Soy_oat43.Corn_135_oat43.paddock.SpecialReporter_Annual
        tracker: same as Corn-Soy_oat43.Corn_0_oat43.paddock.tracker
        manager Fertilise on fixed date: same as Corn-Soy_oat43.Corn_135_oat43.paddock.Fertilise on fixed date
    simulation Corn_202_oat55 -> /simulations/Corn-Soy_oat55/Corn_135_oat55
      area paddock -> /simulations/Corn-Soy_oat55/Corn_135_oat55/paddock
        outputfile: filename=Corn_202_oat55.out; title=Corn_202_oat55
          variables My Variables
            variables: dd/mm/yyyy as Date, year, CropYield, CropBiomamas, RootDepth, FlowerDate, MaturityDate, LAI_maximum, TotalNupt, AvgWTInseason, RainSeason, NfertilizerAmount, GrossMiner, NetMiner, SowingNO3_60cm
          events My Variables Events -> /simulations/Corn-Soy_oat55/Corn_135_oat55/paddock/outputfile/My Variables Events
        Soil CentralIA: same as Corn-Soy_oat55.Corn_0_oat55.paddock.CentralIA
        tracker: same as Corn-Soy_oat43.Corn_0_oat43.paddock.tracker
        manager Fertilise on fixed date: same as Corn-Soy_oat43.Corn_202_oat43.paddock.Fertilise on fixed date
    simulation Corn_270_oat55 -> /simulations/Corn-Soy_oat55/Corn_135_oat55
      area paddock -> /simulations/Corn-Soy_oat55/Corn_135_oat55/paddock
        outputfile: filename=Corn_270_oat55.out; title=Corn_270_oat55
          variables My Variables
            variables: dd/mm/yyyy as Date, year, CropYield, CropBiomamas, RootDepth, FlowerDate, MaturityDate, LAI_maximum, TotalNupt, AvgWTInseason, RainSeason, NfertilizerAmount, GrossMiner, NetMiner, SowingNO3_60cm
          events My Variables Events -> /simulations/Corn-Soy_oat55/Corn_135_oat55/paddock/outputfile/My Variables Events
        Soil CentralIA: same as Corn-Soy_oat55.Corn_0_oat55.paddock.CentralIA
        tracker: same as Corn-Soy_oat43.Corn_0_oat43.paddock.tracker
        manager Fertilise on fixed date: same as Corn-Soy_oat43.Corn_270_oat43.paddock.Fertilise on fixed date
  folder Corn-Soy_oat56
    simulation Corn_0_oat56 -> /simulations/Corn-Soy_oat56/Corn_135_oat56
      area paddock -> /simulations/Corn-Soy_oat56/Corn_135_oat56/paddock
        outputfile: filename=Corn_0_oat56.out; title=Corn_0_oat56
          variables My Variables
            variables: dd/mm/yyyy as Date, year, CropYield, CropBiomamas, RootDepth, FlowerDate, MaturityDate, LAI_maximum, TotalNupt, AvgWTInseason, RainSeason, NfertilizerAmount, GrossMiner, NetMiner, SowingNO3_60cm
          events My Variables Events -> /simulations/Corn-Soy_oat56/Corn_135_oat56/paddock/outputfile/My Variables Events
        Soil CentralIA: YearOfSampling=0; DataSource=CSIRO Sustainable Ecosystems, Toowoomba
          Comments=Soil naming structure: \State\Region\Classification-Local Name (Site/district and locator number); oc and ph estimated
          Water -> /simulations/Corn-Soy_oat56/Corn_135_oat56/paddock/CentralIA/Water
          SoilOrganicMatter -> /simulations/Corn-Soy_oat56/Corn_135_oat56/paddock/CentralIA/SoilOrganicMatter
          Analysis -> /simulations/Corn-Soy_oat56/Corn_135_oat56/paddock/CentralIA/Analysis
          Sample InitialNitrogen -> /simulations/Corn-Soy_oat56/Corn_135_oat56/paddock/CentralIA/InitialNitrogen
          Swim -> /simulations/Corn-Soy_oat56/Corn_135_oat56/paddock/CentralIA/Swim
          SoilTemperature -> /simulations/Corn-Soy_oat56/Corn_135_oat56/paddock/CentralIA/SoilTemperature
        tracker: same as Corn-Soy_oat43.Corn_0_oat43.paddock.tracker
        manager Fertilise on fixed date: same as Corn-Soy_oat43.Corn_0_oat43.paddock.Fertilise on fixed date
    simulation Corn_67_oat56 -> /simulations/Corn-Soy_oat56/Corn_135_oat56
      area paddock -> /simulations/Corn-Soy_oat56/Corn_135_oat56/paddock
        outputfile: filename=Corn_67_oat56.out; title=Corn_67_oat56
          variables My Variables
            variables: dd/mm/yyyy as Date, year, CropYield, CropBiomamas, RootDepth, FlowerDate, MaturityDate, LAI_maximum, TotalNupt, AvgWTInseason, RainSeason, NfertilizerAmount, GrossMiner, NetMiner, SowingNO3_60cm
          events My Variables Events -> /simulations/Corn-Soy_oat56/Corn_135_oat56/paddock/outputfile/My Variables Events
        Soil CentralIA: same as Corn-Soy_oat56.Corn_0_oat56.paddock.CentralIA
        tracker: same as Corn-Soy_oat43.Corn_0_oat43.paddock.tracker
        manager Fertilise on fixed date: same as Corn-Soy_oat43.Corn_67_oat43.paddock.Fertilise on fixed date
    simulation Corn_135_oat56
      metfile met: filename=data-wea\ames_2000-2016.met
      clock
        start_date = 01/01/2000  # Enter the start date of the simulation
        end_date = 31/12/2016  # Enter the end date of the simulation
      summaryfile
      area paddock
        surfaceom SurfaceOrganicMatter
          PoolName = maize  # Organic Matter pool name
          type = maize  # Organic Matter type
          mass = 10000  # Initial surface residue (kg/ha)
          cnr = 70  # C:N ratio of initial residue
          standing_fraction = 0.0  # Fraction of residue standing
        fertiliser
        maize
          ini: filename=XML_corn7.9_gn
        folder Manager folder: same as Corn-Soy_oat43.Corn_135_oat43.paddock.Manager folder
        outputfile: filename=Corn_135_oat56.out; title=Corn_135_oat56
          variables My Variables
            variables: dd/mm/yyyy as Date, year, CropYield, CropBiomamas, RootDepth, FlowerDate, MaturityDate, LAI_maximum, TotalNupt, AvgWTInseason, RainSeason, NfertilizerAmount, GrossMiner, NetMiner, SowingNO3_60cm
          events My Variables Events: event=end_year
        Soil CentralIA: same as Corn-Soy_oat45.Corn_135_oat45.paddock.CentralIA
        manager WT_script
          on start_of_day:
          script: same as in Corn-Soy_oat43.Corn_135_oat43.paddock.WT_script
        manager Reset-SWIM: same as Corn-Soy_oat43.Corn_135_oat43.paddock.Reset-SWIM
        manager2 InitialiseWaterTable_Reset: same as Corn-Soy_oat43.Corn_135_oat43.paddock.InitialiseWaterTable_Reset
        manager Sow on a fixed date
          # Sowing criteria
          date = 5-may  # Enter sowing date (dd-mmm)
          # Sowing parameters
          crop = maize  # Enter name of crop to sow
          density = 8  # Enter sowing density (plants/m2)
          depth = 50  # Enter sowing depth (mm)
          cultivar = psims_110RMlowRFV1  # Enter cultivar
          class = plant  # Enter crop growth class
          row_spacing = 760  # Enter row spacing (mm)
          on start_of_day:
          script: same as in Corn-Soy_oat43.Corn_135_oat43.paddock.Sow on a fixed date
        manager Tillage: same as Corn-Soy_oat43.Corn_135_oat43.paddock.Tillage
        manager2 SpecialReporter_Annual: same as Corn-Soy_oat43.Corn_135_oat43.paddock.SpecialReporter_Annual
        tracker: same as Corn-Soy_oat43.Corn_0_oat43.paddock.tracker
        manager Fertilise on fixed date: same as Corn-Soy_oat43.Corn_135_oat43.paddock.Fertilise on fixed date
    simulation Corn_202_oat56 -> /simulations/Corn-Soy_oat56/Corn_135_oat56
      area paddock -> /simulations/Corn-Soy_oat56/Corn_135_oat56/paddock
        outputfile: filename=Corn_202_oat56.out; title=Corn_202_oat56
          variables My Variables
            variables: dd/mm/yyyy as Date, year, CropYield, CropBiomamas, RootDepth, FlowerDate, MaturityDate, LAI_maximum, TotalNupt, AvgWTInseason, RainSeason, NfertilizerAmount, GrossMiner, NetMiner, SowingNO3_60cm
          events My Variables Events -> /simulations/Corn-Soy_oat56/Corn_135_oat56/paddock/outputfile/My Variables Events
        Soil CentralIA: same as Corn-Soy_oat56.Corn_0_oat56.paddock.CentralIA
        tracker: same as Corn-Soy_oat43.Corn_0_oat43.paddock.tracker
        manager Fertilise on fixed date: same as Corn-Soy_oat43.Corn_202_oat43.paddock.Fertilise on fixed date
    simulation Corn_270_oat56 -> /simulations/Corn-Soy_oat56/Corn_135_oat56
      area paddock -> /simulations/Corn-Soy_oat56/Corn_135_oat56/paddock
        outputfile: filename=Corn_270_oat56.out; title=Corn_270_oat56
          variables My Variables
            variables: dd/mm/yyyy as Date, year, CropYield, CropBiomamas, RootDepth, FlowerDate, MaturityDate, LAI_maximum, TotalNupt, AvgWTInseason, RainSeason, NfertilizerAmount, GrossMiner, NetMiner, SowingNO3_60cm
          events My Variables Events -> /simulations/Corn-Soy_oat56/Corn_135_oat56/paddock/outputfile/My Variables Events
        Soil CentralIA: same as Corn-Soy_oat56.Corn_0_oat56.paddock.CentralIA
        tracker: same as Corn-Soy_oat43.Corn_0_oat43.paddock.tracker
        manager Fertilise on fixed date: same as Corn-Soy_oat43.Corn_270_oat43.paddock.Fertilise on fixed date
  folder Corn-Soy_oat57
    simulation Corn_0_oat57 -> /simulations/Corn-Soy_oat57/Corn_135_oat57
      area paddock -> /simulations/Corn-Soy_oat57/Corn_135_oat57/paddock
        outputfile: filename=Corn_0_oat57.out; title=Corn_0_oat57
          variables My Variables
            variables: dd/mm/yyyy as Date, year, CropYield, CropBiomamas, RootDepth, FlowerDate, MaturityDate, LAI_maximum, TotalNupt, AvgWTInseason, RainSeason, NfertilizerAmount, GrossMiner, NetMiner, SowingNO3_60cm
          events My Variables Events -> /simulations/Corn-Soy_oat57/Corn_135_oat57/paddock/outputfile/My Variables Events
        Soil CentralIA: YearOfSampling=0; DataSource=CSIRO Sustainable Ecosystems, Toowoomba
          Comments=Soil naming structure: \State\Region\Classification-Local Name (Site/district and locator number); oc and ph estimated
          Water -> /simulations/Corn-Soy_oat57/Corn_135_oat57/paddock/CentralIA/Water
          SoilOrganicMatter -> /simulations/Corn-Soy_oat57/Corn_135_oat57/paddock/CentralIA/SoilOrganicMatter
          Analysis -> /simulations/Corn-Soy_oat57/Corn_135_oat57/paddock/CentralIA/Analysis
          Sample InitialNitrogen -> /simulations/Corn-Soy_oat57/Corn_135_oat57/paddock/CentralIA/InitialNitrogen
          Swim -> /simulations/Corn-Soy_oat57/Corn_135_oat57/paddock/CentralIA/Swim
          SoilTemperature -> /simulations/Corn-Soy_oat57/Corn_135_oat57/paddock/CentralIA/SoilTemperature
        tracker: same as Corn-Soy_oat43.Corn_0_oat43.paddock.tracker
        manager Fertilise on fixed date: same as Corn-Soy_oat43.Corn_0_oat43.paddock.Fertilise on fixed date
    simulation Corn_67_oat57 -> /simulations/Corn-Soy_oat57/Corn_135_oat57
      area paddock -> /simulations/Corn-Soy_oat57/Corn_135_oat57/paddock
        outputfile: filename=Corn_67_oat57.out; title=Corn_67_oat57
          variables My Variables
            variables: dd/mm/yyyy as Date, year, CropYield, CropBiomamas, RootDepth, FlowerDate, MaturityDate, LAI_maximum, TotalNupt, AvgWTInseason, RainSeason, NfertilizerAmount, GrossMiner, NetMiner, SowingNO3_60cm
          events My Variables Events -> /simulations/Corn-Soy_oat57/Corn_135_oat57/paddock/outputfile/My Variables Events
        Soil CentralIA: same as Corn-Soy_oat57.Corn_0_oat57.paddock.CentralIA
        tracker: same as Corn-Soy_oat43.Corn_0_oat43.paddock.tracker
        manager Fertilise on fixed date: same as Corn-Soy_oat43.Corn_67_oat43.paddock.Fertilise on fixed date
    simulation Corn_135_oat57
      metfile met: filename=data-wea\ames_2000-2016.met
      clock
        start_date = 01/01/2000  # Enter the start date of the simulation
        end_date = 31/12/2016  # Enter the end date of the simulation
      summaryfile
      area paddock
        surfaceom SurfaceOrganicMatter
          PoolName = maize  # Organic Matter pool name
          type = maize  # Organic Matter type
          mass = 10000  # Initial surface residue (kg/ha)
          cnr = 70  # C:N ratio of initial residue
          standing_fraction = 0.0  # Fraction of residue standing
        fertiliser
        maize
          ini: filename=XML_corn7.9_gn
        folder Manager folder: same as Corn-Soy_oat43.Corn_135_oat43.paddock.Manager folder
        outputfile: filename=Corn_135_oat57.out; title=Corn_135_oat57
          variables My Variables
            variables: dd/mm/yyyy as Date, year, CropYield, CropBiomamas, RootDepth, FlowerDate, MaturityDate, LAI_maximum, TotalNupt, AvgWTInseason, RainSeason, NfertilizerAmount, GrossMiner, NetMiner, SowingNO3_60cm
          events My Variables Events: event=end_year
        Soil CentralIA: same as Corn-Soy_oat43.Corn_135_oat43.paddock.CentralIA
        manager WT_script
          on start_of_day:
          script: same as in Corn-Soy_oat43.Corn_135_oat43.paddock.WT_script
        manager Reset-SWIM: same as Corn-Soy_oat43.Corn_135_oat43.paddock.Reset-SWIM
        manager2 InitialiseWaterTable_Reset: same as Corn-Soy_oat43.Corn_135_oat43.paddock.InitialiseWaterTable_Reset
        manager Sow on a fixed date
          # Sowing criteria
          date = 5-may  # Enter sowing date (dd-mmm)
          # Sowing parameters
          crop = maize  # Enter name of crop to sow
          density = 8  # Enter sowing density (plants/m2)
          depth = 50  # Enter sowing depth (mm)
          cultivar = psims_110RMoat39  # Enter cultivar
          class = plant  # Enter crop growth class
          row_spacing = 760  # Enter row spacing (mm)
          on start_of_day:
          script: same as in Corn-Soy_oat43.Corn_135_oat43.paddock.Sow on a fixed date
        manager Tillage: same as Corn-Soy_oat43.Corn_135_oat43.paddock.Tillage
        manager2 SpecialReporter_Annual: same as Corn-Soy_oat43.Corn_135_oat43.paddock.SpecialReporter_Annual
        tracker: same as Corn-Soy_oat43.Corn_0_oat43.paddock.tracker
        manager Fertilise on fixed date: same as Corn-Soy_oat43.Corn_135_oat43.paddock.Fertilise on fixed date
    simulation Corn_202_oat57 -> /simulations/Corn-Soy_oat57/Corn_135_oat57
      area paddock -> /simulations/Corn-Soy_oat57/Corn_135_oat57/paddock
        outputfile: filename=Corn_202_oat57.out; title=Corn_202_oat57
          variables My Variables
            variables: dd/mm/yyyy as Date, year, CropYield, CropBiomamas, RootDepth, FlowerDate, MaturityDate, LAI_maximum, TotalNupt, AvgWTInseason, RainSeason, NfertilizerAmount, GrossMiner, NetMiner, SowingNO3_60cm
          events My Variables Events -> /simulations/Corn-Soy_oat57/Corn_135_oat57/paddock/outputfile/My Variables Events
        Soil CentralIA: same as Corn-Soy_oat57.Corn_0_oat57.paddock.CentralIA
        tracker: same as Corn-Soy_oat43.Corn_0_oat43.paddock.tracker
        manager Fertilise on fixed date: same as Corn-Soy_oat43.Corn_202_oat43.paddock.Fertilise on fixed date
    simulation Corn_270_oat57 -> /simulations/Corn-Soy_oat57/Corn_135_oat57
      area paddock -> /simulations/Corn-Soy_oat57/Corn_135_oat57/paddock
        outputfile: filename=Corn_270_oat57.out; title=Corn_270_oat57
          variables My Variables
            variables: dd/mm/yyyy as Date, year, CropYield, CropBiomamas, RootDepth, FlowerDate, MaturityDate, LAI_maximum, TotalNupt, AvgWTInseason, RainSeason, NfertilizerAmount, GrossMiner, NetMiner, SowingNO3_60cm
          events My Variables Events -> /simulations/Corn-Soy_oat57/Corn_135_oat57/paddock/outputfile/My Variables Events
        Soil CentralIA: same as Corn-Soy_oat57.Corn_0_oat57.paddock.CentralIA
        tracker: same as Corn-Soy_oat43.Corn_0_oat43.paddock.tracker
        manager Fertilise on fixed date: same as Corn-Soy_oat43.Corn_270_oat43.paddock.Fertilise on fixed date
  folder Corn-Soy_oat58
    simulation Corn_0_oat58 -> /simulations/Corn-Soy_oat58/Corn_135_oat58
      area paddock -> /simulations/Corn-Soy_oat58/Corn_135_oat58/paddock
        outputfile: filename=Corn_0_oat58.out; title=Corn_0_oat58
          variables My Variables
            variables: dd/mm/yyyy as Date, year, CropYield, CropBiomamas, RootDepth, FlowerDate, MaturityDate, LAI_maximum, TotalNupt, AvgWTInseason, RainSeason, NfertilizerAmount, GrossMiner, NetMiner, SowingNO3_60cm
          events My Variables Events -> /simulations/Corn-Soy_oat58/Corn_135_oat58/paddock/outputfile/My Variables Events
        Soil CentralIA: YearOfSampling=0; DataSource=CSIRO Sustainable Ecosystems, Toowoomba
          Comments=Soil naming structure: \State\Region\Classification-Local Name (Site/district and locator number); oc and ph estimated
          Water -> /simulations/Corn-Soy_oat58/Corn_135_oat58/paddock/CentralIA/Water
          SoilOrganicMatter -> /simulations/Corn-Soy_oat58/Corn_135_oat58/paddock/CentralIA/SoilOrganicMatter
          Analysis -> /simulations/Corn-Soy_oat58/Corn_135_oat58/paddock/CentralIA/Analysis
          Sample InitialNitrogen -> /simulations/Corn-Soy_oat58/Corn_135_oat58/paddock/CentralIA/InitialNitrogen
          Swim -> /simulations/Corn-Soy_oat58/Corn_135_oat58/paddock/CentralIA/Swim
          SoilTemperature -> /simulations/Corn-Soy_oat58/Corn_135_oat58/paddock/CentralIA/SoilTemperature
        tracker: same as Corn-Soy_oat43.Corn_0_oat43.paddock.tracker
        manager Fertilise on fixed date: same as Corn-Soy_oat43.Corn_0_oat43.paddock.Fertilise on fixed date
    simulation Corn_67_oat58 -> /simulations/Corn-Soy_oat58/Corn_135_oat58
      area paddock -> /simulations/Corn-Soy_oat58/Corn_135_oat58/paddock
        outputfile: filename=Corn_67_oat58.out; title=Corn_67_oat58
          variables My Variables
            variables: dd/mm/yyyy as Date, year, CropYield, CropBiomamas, RootDepth, FlowerDate, MaturityDate, LAI_maximum, TotalNupt, AvgWTInseason, RainSeason, NfertilizerAmount, GrossMiner, NetMiner, SowingNO3_60cm
          events My Variables Events -> /simulations/Corn-Soy_oat58/Corn_135_oat58/paddock/outputfile/My Variables Events
        Soil CentralIA: same as Corn-Soy_oat58.Corn_0_oat58.paddock.CentralIA
        tracker: same as Corn-Soy_oat43.Corn_0_oat43.paddock.tracker
        manager Fertilise on fixed date: same as Corn-Soy_oat43.Corn_67_oat43.paddock.Fertilise on fixed date
    simulation Corn_135_oat58
      metfile met: filename=data-wea\ames_2000-2016.met
      clock
        start_date = 01/01/2000  # Enter the start date of the simulation
        end_date = 31/12/2016  # Enter the end date of the simulation
      summaryfile
      area paddock
        surfaceom SurfaceOrganicMatter
          PoolName = maize  # Organic Matter pool name
          type = maize  # Organic Matter type
          mass = 10000  # Initial surface residue (kg/ha)
          cnr = 70  # C:N ratio of initial residue
          standing_fraction = 0.0  # Fraction of residue standing
        fertiliser
        maize
          ini: filename=XML_corn7.9_gn
        folder Manager folder: same as Corn-Soy_oat43.Corn_135_oat43.paddock.Manager folder
        outputfile: filename=Corn_135_oat58.out; title=Corn_135_oat58
          variables My Variables
            variables: dd/mm/yyyy as Date, year, CropYield, CropBiomamas, RootDepth, FlowerDate, MaturityDate, LAI_maximum, TotalNupt, AvgWTInseason, RainSeason, NfertilizerAmount, GrossMiner, NetMiner, SowingNO3_60cm
          events My Variables Events: event=end_year
        Soil CentralIA: same as Corn-Soy_oat45.Corn_135_oat45.paddock.CentralIA
        manager WT_script
          on start_of_day:
          script: same as in Corn-Soy_oat43.Corn_135_oat43.paddock.WT_script
        manager Reset-SWIM: same as Corn-Soy_oat43.Corn_135_oat43.paddock.Reset-SWIM
        manager2 InitialiseWaterTable_Reset: same as Corn-Soy_oat43.Corn_135_oat43.paddock.InitialiseWaterTable_Reset
        manager Sow on a fixed date
          # Sowing criteria
          date = 5-may  # Enter sowing date (dd-mmm)
          # Sowing parameters
          crop = maize  # Enter name of crop to sow
          density = 8  # Enter sowing density (plants/m2)
          depth = 50  # Enter sowing depth (mm)
          cultivar = psims_110RMlowKN2  # Enter cultivar
          class = plant  # Enter crop growth class
          row_spacing = 760  # Enter row spacing (mm)
          on start_of_day:
          script: same as in Corn-Soy_oat43.Corn_135_oat43.paddock.Sow on a fixed date
        manager Tillage: same as Corn-Soy_oat43.Corn_135_oat43.paddock.Tillage
        manager2 SpecialReporter_Annual: same as Corn-Soy_oat43.Corn_135_oat43.paddock.SpecialReporter_Annual
        tracker: same as Corn-Soy_oat43.Corn_0_oat43.paddock.tracker
        manager Fertilise on fixed date: same as Corn-Soy_oat43.Corn_135_oat43.paddock.Fertilise on fixed date
    simulation Corn_202_oat58 -> /simulations/Corn-Soy_oat58/Corn_135_oat58
      area paddock -> /simulations/Corn-Soy_oat58/Corn_135_oat58/paddock
        outputfile: filename=Corn_202_oat58.out; title=Corn_202_oat58
          variables My Variables
            variables: dd/mm/yyyy as Date, year, CropYield, CropBiomamas, RootDepth, FlowerDate, MaturityDate, LAI_maximum, TotalNupt, AvgWTInseason, RainSeason, NfertilizerAmount, GrossMiner, NetMiner, SowingNO3_60cm
          events My Variables Events -> /simulations/Corn-Soy_oat58/Corn_135_oat58/paddock/outputfile/My Variables Events
        Soil CentralIA: same as Corn-Soy_oat58.Corn_0_oat58.paddock.CentralIA
        tracker: same as Corn-Soy_oat43.Corn_0_oat43.paddock.tracker
        manager Fertilise on fixed date: same as Corn-Soy_oat43.Corn_202_oat43.paddock.Fertilise on fixed date
    simulation Corn_270_oat58 -> /simulations/Corn-Soy_oat58/Corn_135_oat58
      area paddock -> /simulations/Corn-Soy_oat58/Corn_135_oat58/paddock
        outputfile: filename=Corn_270_oat58.out; title=Corn_270_oat58
          variables My Variables
            variables: dd/mm/yyyy as Date, year, CropYield, CropBiomamas, RootDepth, FlowerDate, MaturityDate, LAI_maximum, TotalNupt, AvgWTInseason, RainSeason, NfertilizerAmount, GrossMiner, NetMiner, SowingNO3_60cm
          events My Variables Events -> /simulations/Corn-Soy_oat58/Corn_135_oat58/paddock/outputfile/My Variables Events
        Soil CentralIA: same as Corn-Soy_oat58.Corn_0_oat58.paddock.CentralIA
        tracker: same as Corn-Soy_oat43.Corn_0_oat43.paddock.tracker
        manager Fertilise on fixed date: same as Corn-Soy_oat43.Corn_270_oat43.paddock.Fertilise on fixed date
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